# OpenSim document version 30000
MarkerSet:
  Marker NUI_SKELETON_POSITION_HIP_CENTER: pelvis (-0.08 0 0) fixed=true
  Marker NUI_SKELETON_POSITION_HIP_LEFT: femur_l (0 0 0)
  Marker NUI_SKELETON_POSITION_HIP_RIGHT: femur_r (0 0 0) fixed=true
  Marker NUI_SKELETON_POSITION_KNEE_LEFT: tibia_l (0 0 0)
  Marker NUI_SKELETON_POSITION_KNEE_RIGHT: tibia_r (0 0 0)
  Marker NUI_SKELETON_POSITION_ANKLE_LEFT: calcn_l (0 0 0)
  Marker NUI_SKELETON_POSITION_ANKLE_RIGHT: calcn_r (0 0 0)
  Marker NUI_SKELETON_POSITION_FOOT_LEFT: toes_l (0 0 0)
  Marker NUI_SKELETON_POSITION_FOOT_RIGHT: toes_r (0 0 0)
  Marker NUI_SKELETON_POSITION_SHOULDER_LEFT: humerus_l (0 0 0)
  Marker NUI_SKELETON_POSITION_SHOULDER_RIGHT: humerus_r (0 0 0)
  Marker NUI_SKELETON_POSITION_ELBOW_LEFT: ulna_l (0 0 0)
  Marker NUI_SKELETON_POSITION_ELBOW_RIGHT: ulna_r (0 0 0)
  Marker NUI_SKELETON_POSITION_WRIST_LEFT: hand_l (0 0 0)
  Marker NUI_SKELETON_POSITION_WRIST_RIGHT: hand_r (0 0 0)
  Marker NUI_SKELETON_POSITION_SHOULDER_CENTER: torso (0 0.35 0)
  Marker NUI_SKELETON_POSITION_SPINE: torso (0 0 0)
  Marker NUI_SKELETON_POSITION_HEAD: torso (0 0.5 0)
  Marker NUI_SKELETON_POSITION_HAND_LEFT: hand_l (0 -0.05 0)
  Marker NUI_SKELETON_POSITION_HAND_RIGHT: hand_r (0 -0.05 0)
