# OpenSim document version 30000
InverseKinematicsTool Subject_003:
  results_directory: ./
  model_file: ../Scale/Subject_003_scaled.osim
  constraint_weight: 20
  accuracy: 1e-5
  marker_file: ../MarkerData/Subject_003_Walk3.trc
  time_range: 0 0.98
  report_errors: true
  output_motion_file: Subject_003_Walk3_kinematics.mot
  IKTaskSet:
    IKMarkerTask RASI: apply=true weight=1
    IKMarkerTask LASI: apply=true weight=1
    IKMarkerTask RPSI: apply=true weight=1
    IKMarkerTask LPSI: apply=true weight=1
    IKMarkerTask RTHI: apply=true weight=1
    IKMarkerTask RKNE: apply=true weight=1
    IKMarkerTask RMKNE: apply=false weight=1
    IKMarkerTask RANK: apply=true weight=1
    IKMarkerTask RHEE: apply=true weight=1
    IKMarkerTask RTOE: apply=true weight=1
    IKMarkerTask LTHI: apply=true weight=1
    IKMarkerTask LKNE: apply=true weight=1
    IKMarkerTask LMKNE: apply=false weight=1
    IKMarkerTask LANK: apply=true weight=1
    IKMarkerTask LHEE: apply=true weight=1
    IKMarkerTask LTOE: apply=true weight=1
    IKMarkerTask RTIB: apply=true weight=1
    IKMarkerTask LTIB: apply=true weight=1
    IKMarkerTask RFEP: apply=true weight=1
    IKMarkerTask LFEP: apply=true weight=1
    IKMarkerTask RFEO: apply=true weight=1
    IKMarkerTask LFEO: apply=true weight=1
    IKMarkerTask LTIO: apply=true weight=1
    IKMarkerTask RTIO: apply=true weight=1
