# OpenSim document version 30000
ScaleTool Subject_003:
  mass: 9.9296 [kg]
  height: 1.1
  age: -1
  GenericModelMaker:
    model_file: ../gait2392_PiG.osim
  ModelScaler:
    apply: true
    scaling_order: measurements manualScale
    marker_file: ../MarkerData/Subject_003_static.trc
    time_range: 0 0.1
    preserve_mass_distribution: false
    output_scale_file: Subject_003_ScaleSet.xml
    MeasurementSet:
      Measurement femur_r: apply=true
        MarkerPair: markers=(RASI RFEO)
        BodyScale femur_r: axes=(X Y Z)
      Measurement femur_l: apply=true
        MarkerPair: markers=(LASI LFEO)
        BodyScale femur_l: axes=(X Y Z)
      Measurement tibia_r: apply=true
        MarkerPair: markers=(RFEO RTIO)
        BodyScale tibia_r: axes=(X Y Z)
      Measurement tibia_l: apply=true
        MarkerPair: markers=(LFEO LTIO)
        BodyScale tibia_l: axes=(X Y Z)
      Measurement foot_r: apply=true
        MarkerPair: markers=(RHEE RTOE)
        BodyScale talus_r: axes=(X Y Z)
        BodyScale calcn_r: axes=(X Y Z)
        BodyScale toes_r: axes=(X Y Z)
      Measurement foot_l: apply=true
        MarkerPair: markers=(LHEE LTOE)
        BodyScale talus_l: axes=(X Y Z)
        BodyScale calcn_l: axes=(X Y Z)
        BodyScale toes_l: axes=(X Y Z)
    ScaleSet:
      Scale: scales=(0.663183 0.699071 0.699071) segment=pelvis apply=true
  MarkerPlacer:
    apply: true
    marker_file: ../MarkerData/Subject_003_static.trc
    time_range: 0 0.1
    output_motion_file: Subject_003_StaticPoseAngles.mot
    output_model_file: Subject_003_scaled.osim
    output_marker_file: Subject_003_AdjustedMarkerset.xml
    max_marker_movement: -1
    IKTaskSet:
      IKMarkerTask LASI: apply=true weight=20
      IKMarkerTask RASI: apply=true weight=20
      IKMarkerTask RTOE: apply=true weight=10
      IKMarkerTask RHEE: apply=true weight=1
      IKMarkerTask LTOE: apply=true weight=10
      IKMarkerTask LHEE: apply=true weight=1
      IKCoordinateTask [values shared by the 11 below unless stated]: apply=true weight=1 value_type=manual_value
      IKCoordinateTask pelvis_tilt: value=-0.3516434
      IKCoordinateTask hip_rotation_l: value=0.008988752
      IKCoordinateTask hip_rotation_r: value=0.04654952
      IKCoordinateTask knee_angle_r: value=-0.7432468
      IKCoordinateTask knee_adduction_r: value=-0.1979739
      IKCoordinateTask knee_rotation_r: value=0.3285961
      IKCoordinateTask knee_angle_l: value=-0.01783718
      IKCoordinateTask knee_adduction_l: value=-0.1101869
      IKCoordinateTask knee_rotation_l: value=0.2858332
      IKCoordinateTask ankle_angle_r: value=-0.5955379
      IKCoordinateTask ankle_angle_l: value=0.009882955
