# OpenSim document version 20302
ForceSet model_with_muscles:
  CoordinateActuator blockToGround_xRotation_reserve: coordinate=blockToGround_xRotation optimal_force=1
  CoordinateActuator blockToGround_yRotation_reserve: coordinate=blockToGround_yRotation optimal_force=1
  CoordinateActuator blockToGround_zRotation_reserve: coordinate=blockToGround_zRotation optimal_force=1
  CoordinateActuator blockToGround_xTranslation_reserve: coordinate=blockToGround_xTranslation optimal_force=1
  CoordinateActuator blockToGround_yTranslation_reserve: coordinate=blockToGround_yTranslation optimal_force=1
  CoordinateActuator blockToGround_zTranslation_reserve: coordinate=blockToGround_zTranslation optimal_force=1
