# OpenSim document version 30000
Model Rueckert2013UpperLimb11Muscles:
  length_units: meters
  force_units: N
  gravity: 0 0 0
  credits:
    The OpenSim Development Team (Reinbolt, J; Seth, A; Habib, A; Hamner, S) adapted from a model originally created by Kate Holzbaur (11/22/04) Hamner removed wrapping surfaces for improved performance. License: Creative Commons (CCBY 3.0). You are free to distribute, remix, tweak, and build upon this work, even commercially, as long as you credit us for the original creation. http://creativecommons.org/licenses/by/3.0/
    This model file was adapted by Elmar Rueckert where details are given in the publication below
  publications:
    Elmar Rueckert and Andrea d'Avella. Learned parametrized dynamic movement primitives with shared synergies for controlling robotic and musculoskeletal systems. In Frontiers in Computational Neuroscience. Volumne 6, Year 2013, Number 97.
  BodySet:
    Body ground: mass=0 mass_center=(0 0 0) inertia_xx=0 inertia_yy=0 inertia_zz=0
        meshes=(ground_ribs.vtp ground_spine.vtp ground_skull.vtp ground_jaw.vtp ground_r_clavicle.vtp ground_r_scapula.vtp)
      WrapTorus Delt3: inner_radius=0.04 outer_radius=0.06 active=false
          xyz_body_rotation=(0.6209881 0.32882 -0.5607743) translation=(-0.105305 -0.0158 0.124)
      WrapEllipsoid Thorax: xyz_body_rotation=(0.0434587 -0.3319616 0.1898918) translation=(-0.0386 -0.1273 0.0709)
          quadrant=all dimensions=(0.1 0.135 0.08)
      WrapCylinder TRIlongglen: xyz_body_rotation=(1.37532 -0.294612 2.43596) translation=(-0.043905 -0.0039 0.1478)
          quadrant=x radius=0.003 length=0.03
    Body r_humerus: mass=1.864572 mass_center=(0 -0.180496 0) inertia_xx=0.01481 inertia_yy=0.004551
        inertia_zz=0.013193 meshes=arm_r_humerus.vtp
      CustomJoint r_shoulder: parent_body=ground location_in_parent=(-0.017545 -0.007 0.17) location=(0 0 0)
        Coordinate r_shoulder_elev: motion_type=rotational default_value=0 range=(-1.570796 3.141593) clamped=false
        SpatialTransform: axes_held_at_zero=(rotation1 rotation2 translation1 translation2 translation3)
          TransformAxis rotation3: coordinates=r_shoulder_elev axis=(-0.05889802 0.0023 0.9982614)
              LinearFunction(coefficients=1 0)
      WrapEllipsoid DELT1hh: dimensions=(0.03 0.1 0.05) xyz_body_rotation=(0.05846853 1.004612 0.5703736)
          translation=(-0.0139 -0.0127 -0.0262) quadrant=z
      WrapCylinder delt2hum: radius=0.0094 length=0.05 xyz_body_rotation=(1.680927 -0.02495821 0.05166175)
          translation=(0.0017 -0.0958 0.0011)
      WrapEllipsoid delt3hum: dimensions=(0.01 0.01 0.05) xyz_body_rotation=(1.727352 0.07592182 -2.743134)
          translation=(0.0019 -0.0592 0.0011) quadrant=x
      WrapSphere TMAJ_LAT_PEC_CORBhh: radius=0.03 translation=(0.0007 0 0.006)
      WrapEllipsoid PEC1hh: xyz_body_rotation=(-0.6204646 -0.3104941 0.3637266) translation=(-0.0037 0.0005 -0.0025)
          quadrant=-z dimensions=(0.03 0.02 0.02)
      WrapEllipsoid TRIlonghh: xyz_body_rotation=(3.00162 -0.853466 2.57419) translation=(-0.0078 -0.0041 -0.0014)
          quadrant=z dimensions=(0.035 0.02 0.02)
      WrapEllipsoid BIClonghh: xyz_body_rotation=(-2.00434 -1.00164 0.975465) translation=(0.0033 0.0073 0.0003)
          quadrant=-y dimensions=(0.025 0.02 0.02)
      WrapCylinder TRI: xyz_body_rotation=(-0.14015 -0.00628319 0.154985) translation=(0.0028 -0.2919 -0.0069)
          quadrant=all radius=0.016 length=0.05
    Body r_ulna_radius_hand: mass=1.534315 mass_center=(0 -0.181479 0) inertia_xx=0.019281 inertia_yy=0.001571
        inertia_zz=0.020062
        meshes=(arm_r_ulna.vtp arm_r_radius.vtp arm_r_lunate.vtp arm_r_scaphoid.vtp arm_r_pisiform.vtp arm_r_triquetrum.vtp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)
      CustomJoint r_elbow: parent_body=r_humerus location_in_parent=(0.0061 -0.2904 -0.0123) location=(0 0 0)
        Coordinate r_elbow_flex: motion_type=rotational default_value=1.570796 range=(0 2.268928) clamped=false
        SpatialTransform: axes_held_at_zero=(rotation1 rotation2 translation1 translation2 translation3)
          TransformAxis rotation3: coordinates=r_elbow_flex axis=(0.04940001 0.03660001 0.9981083)
              LinearFunction(coefficients=1 0)
  ForceSet:
    Schutte1993Muscle_Deprecated DELT1: max_isometric_force=277.48 optimal_fiber_length=0.1468
        tendon_slack_length=0.093 pennation_angle=0
      PathPoint: r_humerus (0.00896 -0.11883 0.00585)
      PathPoint: r_humerus (0.01623 -0.11033 0.00412)
      PathPoint: ground (0.034995 -0.006 0.162)
      PathPoint: ground (-0.007675 0.01799 0.105675)
      PathWrap: wrap_object=delt2hum
      PathWrap: wrap_object=DELT1hh method=hybrid range=(2 3)
    Schutte1993Muscle_Deprecated DELT3: max_isometric_force=567.15 optimal_fiber_length=0.1702
        tendon_slack_length=0.0593 pennation_angle=0
      PathPoint: ground (-0.063735 0.02822 0.13588)
      PathPoint: ground (-0.080475 -0.00585 0.17333)
      PathPoint: r_humerus (0.00206 -0.07602 0.01045)
      PathWrap: wrap_object=Delt3
      PathWrap: wrap_object=delt3hum method=hybrid
      PathWrap: wrap_object=TMAJ_LAT_PEC_CORBhh
    Schutte1993Muscle_Deprecated LAT1: max_isometric_force=173.43 optimal_fiber_length=0.3487
        tendon_slack_length=0.1475 pennation_angle=0
      PathPoint P1: r_humerus (0.0105 -0.03415 -0.00653)
      PathPoint P5: ground (-0.09578 -0.11724 0.00882)
    Schutte1993Muscle_Deprecated PECM1: max_isometric_force=410.95 optimal_fiber_length=0.2265
        tendon_slack_length=0.0045 pennation_angle=0
      PathPoint P1: r_humerus (0.01169 -0.04191 0.0078)
      MovingPathPoint default: r_humerus (0.01615 -0.04045 -0.00577) x_coordinate=r_shoulder_elev
          y_coordinate=r_shoulder_elev z_coordinate=r_shoulder_elev
          x_location=PiecewiseLinearFunction(x=0 3.141593, y=0.01615 0.02205)
          y_location=PiecewiseLinearFunction(x=0 3.141593, y=-0.04045 -0.01975)
          z_location=PiecewiseLinearFunction(x=0 3.141593, y=-0.00577 0.00863)
      PathPoint P2: ground (0.01 0.005 0.065)
      PathWrap: wrap_object=Thorax method=hybrid
      PathWrap: wrap_object=PEC1hh method=hybrid
    Schutte1993Muscle_Deprecated TRIlong: max_isometric_force=629 optimal_fiber_length=0.1524
        tendon_slack_length=0.2505 pennation_angle_at_optimal=0.2618 [radians]
      PathPoint P1: ground (-0.05365 -0.01373 0.14723)
      PathPoint P2: r_humerus (-0.02714 -0.11441 -0.00664)
      PathPoint P3: r_humerus (-0.03184 -0.22637 -0.01217)
      PathPoint P4: r_humerus (-0.01743 -0.26757 -0.01208)
      PathPoint P5: r_ulna_radius_hand (-0.0219 0.01046 -0.00078)
      PathWrap: wrap_object=TRI method=hybrid
      PathWrap: wrap_object=TRIlonghh method=hybrid
      PathWrap: wrap_object=TRIlongglen method=hybrid
    Schutte1993Muscle_Deprecated TRIlat: max_isometric_force=1268 optimal_fiber_length=0.0617
        tendon_slack_length=0.1964 pennation_angle_at_optimal=0.2618
      PathPoint P1: r_humerus (-0.00599 -0.12646 0.00428)
      PathPoint P2: r_humerus (-0.02344 -0.14528 0.00928)
      PathPoint P3: r_humerus (-0.03184 -0.22637 -0.01217)
      PathPoint P4: r_humerus (-0.01743 -0.26757 -0.01208)
      PathPoint P5: r_ulna_radius_hand (-0.0219 0.01046 -0.00078)
      PathWrap: wrap_object=TRI method=hybrid
    Schutte1993Muscle_Deprecated TRImed: max_isometric_force=619 optimal_fiber_length=0.049 tendon_slack_length=0.1819
        pennation_angle_at_optimal=0.2618
      PathPoint P1: r_humerus (-0.00838 -0.13695 -0.00906)
      PathPoint P2: r_humerus (-0.02601 -0.15139 -0.0108)
      PathPoint P3: r_humerus (-0.03184 -0.22637 -0.01217)
      PathPoint P4: r_humerus (-0.01743 -0.26757 -0.01208)
      PathPoint P5: r_ulna_radius_hand (-0.0219 0.01046 -0.00078)
      PathWrap: wrap_object=TRI method=hybrid
    Schutte1993Muscle_Deprecated BIClong: max_isometric_force=392 optimal_fiber_length=0.1536
        tendon_slack_length=0.3293 pennation_angle_at_optimal=0.1745
      PathPoint P1: ground (-0.039235 0.00347 0.14795)
      PathPoint P2: ground (-0.028945 0.01391 0.15639)
      PathPoint P3: r_humerus (0.02131 0.01793 0.01028)
      PathPoint P4: r_humerus (0.02378 -0.00511 0.01201)
      PathPoint P5: r_humerus (0.01345 -0.02827 0.00136)
      PathPoint P6: r_humerus (0.01068 -0.07736 -0.00165)
      PathPoint P7: r_humerus (0.01703 -0.12125 0.00024)
      PathPoint P8: r_humerus (0.0228 -0.1754 -0.0063)
      PathPoint P9: r_ulna_radius_hand (0.00751 -0.04839 0.02179)
      PathWrap: wrap_object=BIClonghh method=hybrid range=(2 3)
    Schutte1993Muscle_Deprecated BICshort: max_isometric_force=461 optimal_fiber_length=0.1307
        tendon_slack_length=0.2698 pennation_angle_at_optimal=0.1745
      PathPoint P1: ground (0.004675 -0.01231 0.13475)
      PathPoint P2: ground (-0.007075 -0.04004 0.14507)
      PathPoint P3: r_humerus (0.01117 -0.07576 -0.01101)
      PathPoint P4: r_humerus (0.01703 -0.12125 -0.01079)
      PathPoint P5: r_humerus (0.0228 -0.1754 -0.0063)
      PathPoint P6: r_ulna_radius_hand (0.00751 -0.04839 0.02179)
    Schutte1993Muscle_Deprecated BRA: max_isometric_force=853 optimal_fiber_length=0.1028 tendon_slack_length=0.0975
        pennation_angle_at_optimal=0.1745
      PathPoint P1: r_humerus (0.0068 -0.1739 -0.0036)
      PathPoint P2: r_ulna_radius_hand (-0.0032 -0.0239 0.0009)
      PathWrap: wrap_object=TRI method=hybrid
    Schutte1993Muscle_Deprecated BRD: max_isometric_force=101.58 optimal_fiber_length=0.2703 tendon_slack_length=0.0604
        pennation_angle=0.08
      PathPoint P1: r_humerus (-0.0098 -0.19963 0.00223)
      PathPoint P2: r_ulna_radius_hand (0.01 -0.17 0.0643)
      PathWrap: wrap_object=TRI method=hybrid
  MarkerSet:
    Marker r_radius_styloid: r_ulna_radius_hand (-0.0011 -0.23559 0.0943)
