# OpenSim document version 30000
InverseKinematicsTool:
  results_directory: ./
  constraint_weight: 20
  accuracy: 0.0001
  marker_file: reach.trc
  time_range: 0 4.995
  report_errors: true
  report_marker_locations: false
  IKTaskSet:
    IKMarkerTask R.Clavicle: apply=true weight=1
    IKMarkerTask C7: apply=true weight=100
    IKMarkerTask R.Shoulder: apply=true weight=100
    IKMarkerTask R.Bicep: apply=true weight=1
    IKMarkerTask R.Elbow.Lateral: apply=true weight=100
    IKMarkerTask R.Forearm: apply=true weight=1
    IKMarkerTask R.Radius: apply=true weight=100
    IKMarkerTask Handle: apply=true weight=1
    IKMarkerTask R.Elbow.Medial: apply=true weight=1
    IKMarkerTask R.Ulna: apply=true weight=100
