# OpenSim document version 10902
Model MoBL_ARMS_Upper_Limb_Model_SIMM:
  gravity: 0 -9.80665 0
  defaults: Schutte1993Muscle defaultmuscle: max_isometric_force=546 optimal_fiber_length=0.0535
      tendon_slack_length=0.078 pennation_angle=0.1396263 max_contraction_velocity=0 time_scale=0.1 damping=0.017
      activation_time_constant=0.015 deactivation_time_constant=0.05 activation1=7.667 activation2=1.459854
    tendon_force_length_curve: NaturalCubicSpline: x=(-10 -0.002 -0.001 0 0.00131 0.00281 0.00431 0.00581 0.00731 0.00881 0.0103 0.0118 0.0123 0.033 0.059648 9.2 9.201 9.202 20)
        y=(0 0 0 0 0.0108 0.0257 0.0435 0.0652 0.0915 0.123 0.161 0.208 0.227 1 2 345 345 345 345)
    active_force_length_curve: NaturalCubicSpline: x=(-35 0 0.401 0.402 0.4035 0.52725 0.62875 0.71875 0.86125 1.045 1.2175 1.43875 1.61875 1.62 1.621 2.2 35)
        y=(0 0 0 0 0 0.226667 0.636667 0.856667 0.95 0.993333 0.77 0.246667 0 0 0 0 0)
    passive_force_length_curve: NaturalCubicSpline: x=(-35 0.998 0.999 1.15 1.25 1.35 1.45 1.55 1.65 1.75 1.7501 1.7502 35)
        y=(0 0 0 0 0.035 0.12 0.26 0.55 1.17 2 2 2 2)
  ForceSet:
    ObjectGroup shoulder: members=(CORB DELT1 DELT2 DELT3 INFSP LAT1 LAT2 LAT3 PECM1 PECM2 PECM3 SUBSC SUPSP TMAJ TMIN)
    ObjectGroup elbow: members=(ANC BIClong BICshort BRA BRD ECRB ECRL ECU EDCI EDCL EDCM EDCR EDM FCR FCU FDSL FDSR PL PT TRIlat TRIlong TRImed)
    ObjectGroup forearm: members=(BIClong BICshort BRD ECRB ECRL ECU EDCI EDCL EDCM EDCR EDM EIP EPL FCR FCU FDPI FDPL FDPM FDPR FDSI FDSL FDSM FDSR PL PQ PT SUP)
    ObjectGroup elbow_forearm: members=(BIClong BICshort BRD ECRB ECRL ECU EDCI EDCL EDCM EDCR EDM FCR FCU FDSL FDSR PL PT)
    ObjectGroup wrist: members=(APL ECRB ECRL ECU EDCI EDCL EDCM EDCR EDM EIP EPB EPL FCR FCU FDPI FDPL FDPM FDPR FDSI FDSL FDSM FDSR FPL PL)
    ObjectGroup elbow_forearm_wrist: members=(ECRB ECRL ECU EDCI EDCL EDCM EDCR EDM FCR FCU FDSL FDSR PL)
    ObjectGroup extensor: members=(ECRB ECU EDCI EDCL EDCM EDCR EDM EIP EPL)
    ObjectGroup radial: members=(APL ECRB EDCI EDCM EIP EPB EPL FCR FDPI FDSI FDSM FPL PL)
    ObjectGroup ulnar: members=(ECU EDCL EDCR EDM FCU FDPL FDPM FDPR FDSL FDSR)
    ObjectGroup flexor: members=(APL EPB FCR FCU FDPI FDPL FDPM FDPR FDSI FDSL FDSM FDSR FPL PL)
    ObjectGroup hand: members=(APL EDCI EDCL EDCM EDCR EDM EIP EPB EPL FDPI FDPL FDPM FDPR FDSI FDSL FDSM FDSR FPL PL)
    ObjectGroup pronators: members=(PQ PT)
    ObjectGroup fingers: members=(APL EDCI EDCL EDCM EDCR EDM EIP EPB EPL FDPI FDPL FDPM FDPR FDSI FDSL FDSM FDSR FPL)
    ObjectGroup elbow_forearm_wrist_fing: members=(EDCI EDCL EDCM EDCR EDM FDSL FDSR)
    ObjectGroup forearm_wrist: members=(EIP EPL FDPI FDPL FDPM FDPR FDSI FDSM)
    ObjectGroup forearm_wrist_fing: members=(EIP EPL FDPI FDPL FDPM FDPR FDSI FDSM)
    ObjectGroup thumb: members=(APL EPB EPL FPL)
    ObjectGroup wrist_fing: members=(APL EPB FPL)
    Schutte1993Muscle DELT1: max_isometric_force=1218.9 optimal_fiber_length=0.0976 tendon_slack_length=0.093
        pennation_angle=0.3839724
      PathPoint: humerus (0.00896 -0.11883 0.00585)
      PathPoint: humerus (0.01623 -0.11033 0.00412)
      PathPoint: scapula (0.04347 -0.03252 0.00099)
      PathPoint: clavicle (-0.014 0.01106 0.08021)
      PathWrap: wrap_object=delt2hum
      PathWrap: wrap_object=DELT1hh method=hybrid range=(2 3)
    Schutte1993Muscle DELT2: max_isometric_force=1103.5 optimal_fiber_length=0.1078 tendon_slack_length=0.1095
        pennation_angle=0.2617994
      PathPoint: humerus (0.00461 -0.13611 0.0056)
      PathPoint: DELT2pt2 (0.0272 0.00535 0.04807)
      PathPoint: scapula (0.00005 0.00294 0.02233)
      PathPoint: scapula (-0.01078 -0.00034 0.0062)
      PathWrap: wrap_object=Deltoid2 method=hybrid
      PathWrap: wrap_object=delt2hum
      PathWrap: wrap_object=TMAJ_LAT_PEC_CORBhh
    Schutte1993Muscle DELT3: max_isometric_force=201.6 optimal_fiber_length=0.1367 tendon_slack_length=0.038
        pennation_angle=0.3141593
      PathPoint: scapula (-0.05573 0.00122 -0.02512)
      PathPoint: scapula (-0.07247 -0.03285 0.01233)
      PathPoint: humerus (0.00206 -0.07602 0.01045)
      PathWrap: wrap_object=Delt3
      PathWrap: wrap_object=delt3hum method=hybrid
      PathWrap: wrap_object=TMAJ_LAT_PEC_CORBhh
    Schutte1993Muscle SUPSP: max_isometric_force=499.2 optimal_fiber_length=0.0682 tendon_slack_length=0.0395
        pennation_angle=0.122173
      PathPoint: humerus (0.00256 0.01063 0.02593)
      PathPoint: scapula (-0.01918 0.00127 -0.01271)
      PathPoint: scapula (-0.044 -0.01512 -0.05855)
      PathWrap: wrap_object=SUPSP method=hybrid
    Schutte1993Muscle INFSP: max_isometric_force=1075.8 optimal_fiber_length=0.0755 tendon_slack_length=0.0308
        pennation_angle=0.3316126
      PathPoint: humerus (-0.00887 0.00484 0.02448)
      PathPoint: scapula (-0.07382 -0.05476 -0.04781)
      PathWrap: wrap_object=INFSP
      PathWrap: wrap_object=INFSP_and_TMIN_hum_head method=hybrid
    Schutte1993Muscle SUBSC: max_isometric_force=1306.9 optimal_fiber_length=0.0873 tendon_slack_length=0.033
        pennation_angle=0.3490659
      PathPoint: humerus (0.01403 0.0084 -0.01331)
      PathPoint: scapula (-0.01831 -0.05223 -0.02457)
      PathPoint: scapula (-0.07246 -0.03943 -0.06475)
      PathWrap: wrap_object=SUBSCAP method=hybrid
    Schutte1993Muscle TMIN: max_isometric_force=269.5 optimal_fiber_length=0.0741 tendon_slack_length=0.0713
        pennation_angle=0.418879
      PathPoint: humerus (-0.0011 -0.01264 0.02156)
      PathPoint: scapula (-0.09473 -0.07991 -0.04737)
      PathPoint: scapula (-0.09643 -0.08121 -0.05298)
      PathWrap: wrap_object=TMIN method=hybrid range=(1 2)
      PathWrap: wrap_object=INFSP_and_TMIN_hum_head method=hybrid range=(1 2)
      PathWrap: wrap_object=TMINhum range=(1 2)
    Schutte1993Muscle TMAJ: max_isometric_force=144 optimal_fiber_length=0.1624 tendon_slack_length=0.02
        pennation_angle=0.2792527
      PathPoint: humerus (0.00998 -0.05419 -0.00568)
      PathPoint: scapula (-0.10264 -0.10319 -0.05829)
      PathPoint: scapula (-0.10489 -0.10895 -0.07117)
      PathWrap: wrap_object=TMAJ_LAThum
      PathWrap: wrap_object=LAT_TMAJhh range=(1 2)
      PathWrap: wrap_object=LAT_TMAJ2hh
    Schutte1993Muscle PECM1: max_isometric_force=444.3 optimal_fiber_length=0.1442 tendon_slack_length=0.0028
        pennation_angle=0.296706
      PathPoint: humerus (0.01169 -0.04191 0.0078)
      PathPoint: PEC1pt2 (0.01615 -0.04045 -0.00577)
      PathPoint: PEC1pt3 (0.00958 -0.01509 0.12664)
      PathPoint: clavicle (0.00321 -0.00013 0.05113)
      PathWrap: wrap_object=Thorax method=hybrid
      PathWrap: wrap_object=PEC12hum range=(2 3)
      PathWrap: wrap_object=PEC1hh method=hybrid
    Schutte1993Muscle PECM2: max_isometric_force=658.3 optimal_fiber_length=0.1385 tendon_slack_length=0.089
        pennation_angle=0.4537856
      PathPoint: humerus (0.01274 -0.04289 0.00785)
      PathPoint: PEC2pt2 (0.01453 -0.04568 -0.00687)
      PathPoint: PEC2pt3 (0.02018 -0.04165 0.1269)
      PathPoint: thorax (0.03091 -0.03922 0.09705)
      PathPoint: thorax (0.02769 -0.04498 0.02271)
      PathWrap: wrap_object=Thorax method=hybrid
      PathWrap: wrap_object=PEC12hum range=(2 3)
      PathWrap: wrap_object=TMAJ_LAT_PEC_CORBhh
      PathWrap: wrap_object=PEC23hh
    Schutte1993Muscle PECM3: max_isometric_force=498.1 optimal_fiber_length=0.1385 tendon_slack_length=0.132
        pennation_angle=0.4363323
      PathPoint: humerus (0.01269 -0.04375 0.0075)
      PathPoint: PEC3pt2 (0.01243 -0.05157 -0.01807)
      PathPoint: PEC3pt3 (0.02984 -0.071 0.1151)
      PathPoint: thorax (0.0525 -0.08417 0.08935)
      PathPoint: thorax (0.05724 -0.11654 0.03787)
      PathWrap: wrap_object=Thorax method=hybrid
      PathWrap: wrap_object=PEC3hum range=(2 3)
      PathWrap: wrap_object=PEC23hh
    Schutte1993Muscle LAT1: max_isometric_force=290.5 optimal_fiber_length=0.254 tendon_slack_length=0.12
        pennation_angle=0.4363323
      PathPoint: humerus (0.0105 -0.03415 -0.00653)
      PathPoint: LAT1pt2 (-0.07947 -0.08581 -0.02188)
      PathPoint: LAT1pt3 (-0.11215 -0.09779 -0.05322)
      PathPoint: thorax (-0.11828 -0.10118 0.03316)
      PathPoint: thorax (-0.09578 -0.11724 0.00882)
      PathWrap: wrap_object=TMAJ_LAThum
      PathWrap: wrap_object=LAT_TMAJhh range=(1 2)
      PathWrap: wrap_object=LAT_TMAJ2hh
    Schutte1993Muscle LAT2: max_isometric_force=317.5 optimal_fiber_length=0.2324 tendon_slack_length=0.1765
        pennation_angle=0.3316126
      PathPoint: humerus (0.00968 -0.04071 -0.00611)
      PathPoint: LAT2pt2 (-0.0764 -0.1022 -0.01808)
      PathPoint: LAT2pt3 (-0.10054 -0.13969 -0.05258)
      PathPoint: thorax (-0.10992 -0.16908 0.02878)
      PathPoint: thorax (-0.07186 -0.18818 0.00815)
      PathWrap: wrap_object=TMAJ_LAThum
      PathWrap: wrap_object=LAT_TMAJhh range=(1 2)
      PathWrap: wrap_object=LAT_TMAJ2hh
    Schutte1993Muscle LAT3: max_isometric_force=189 optimal_fiber_length=0.2789 tendon_slack_length=0.1403
        pennation_angle=0.3665191
      PathPoint: humerus (0.01208 -0.03922 -0.00416)
      PathPoint: LAT3pt2 (-0.05678 -0.13303 -0.0213)
      PathPoint: LAT3pt3 (-0.09449 -0.17553 -0.04606)
      PathPoint: thorax (-0.11157 -0.19387 0.05532)
      PathPoint: thorax (-0.07117 -0.24858 0.00907)
      PathWrap: wrap_object=TMAJ_LAThum
      PathWrap: wrap_object=LAT_TMAJhh range=(1 2)
      PathWrap: wrap_object=LAT_TMAJ2hh
    Schutte1993Muscle CORB: max_isometric_force=208.2 optimal_fiber_length=0.0932 tendon_slack_length=0.097
        pennation_angle=0.4712389
      PathPoint: scapula (0.0125 -0.04127 -0.02652)
      PathPoint: scapula (0.00483 -0.06958 -0.01563)
      PathPoint: humerus (0.00743 -0.15048 -0.00782)
      PathWrap: wrap_object=CORBhum
      PathWrap: wrap_object=TMAJ_LAT_PEC_CORBhh
    Schutte1993Muscle TRIlong: max_isometric_force=771.8 optimal_fiber_length=0.134 tendon_slack_length=0.143
        pennation_angle=0.2094395
      PathPoint: scapula (-0.04565 -0.04073 -0.01377)
      PathPoint: humerus (-0.02714 -0.11441 -0.00664)
      PathPoint: humerus (-0.03184 -0.22637 -0.01217)
      PathPoint: humerus (-0.01743 -0.26757 -0.01208)
      PathPoint: ulna (-0.0219 0.01046 -0.00078)
      PathWrap: wrap_object=TRI
      PathWrap: wrap_object=TRIlonghh method=hybrid
      PathWrap: wrap_object=TRIlongglen
    Schutte1993Muscle TRIlat: max_isometric_force=717.5 optimal_fiber_length=0.1138 tendon_slack_length=0.098
        pennation_angle=0.1570796
      PathPoint: humerus (-0.00599 -0.12646 0.00428)
      PathPoint: humerus (-0.02344 -0.14528 0.00928)
      PathPoint: humerus (-0.03184 -0.22637 -0.01217)
      PathPoint: humerus (-0.01743 -0.26757 -0.01208)
      PathPoint: ulna (-0.0219 0.01046 -0.00078)
      PathWrap: wrap_object=TRI
    Schutte1993Muscle TRImed: max_isometric_force=717.5 optimal_fiber_length=0.1138 tendon_slack_length=0.0908
        pennation_angle=0.1570796
      PathPoint: humerus (-0.00838 -0.13695 -0.00906)
      PathPoint: humerus (-0.02601 -0.15139 -0.0108)
      PathPoint: humerus (-0.03184 -0.22637 -0.01217)
      PathPoint: humerus (-0.01743 -0.26757 -0.01208)
      PathPoint: ulna (-0.0219 0.01046 -0.00078)
      PathWrap: wrap_object=TRI
    Schutte1993Muscle ANC: max_isometric_force=283.2 optimal_fiber_length=0.027 tendon_slack_length=0.018
        pennation_angle=0
      PathPoint: humerus (-0.00744 -0.28359 0.00979)
      PathPoint: ulna (-0.02532 -0.00124 0.006)
      PathWrap: wrap_object=ANC method=hybrid
    Schutte1993Muscle SUP: max_isometric_force=379.6 optimal_fiber_length=0.033 tendon_slack_length=0.028
        pennation_angle=0
      PathPoint: radius (0.00996 -0.06096 0.00075)
      PathPoint: radius (0.01201 -0.0517 -0.00107)
      PathPoint: ulna (-0.0136 -0.03384 0.02013)
      PathWrap: wrap_object=SUP
    Schutte1993Muscle BIClong: max_isometric_force=525.1 optimal_fiber_length=0.1157 tendon_slack_length=0.2723
        pennation_angle=0
      PathPoint: scapula (-0.03123 -0.02353 -0.01305)
      PathPoint: scapula (-0.02094 -0.01309 -0.00461)
      PathPoint: humerus (0.02131 0.01793 0.01028)
      PathPoint: humerus (0.02378 -0.00511 0.01201)
      PathPoint: humerus (0.01345 -0.02827 0.00136)
      PathPoint: humerus (0.01068 -0.07736 -0.00165)
      PathPoint: humerus (0.01703 -0.12125 0.00024)
      PathPoint: humerus (0.0228 -0.1754 -0.0063)
      PathPoint: bicpt2 (0 0 0)
      ConditionalPathPoint: bicpt (0 0 0) coordinate=pro_sup range=(-0.6387905 1.570796)
      PathPoint: radius (-0.002 -0.0375 -0.002)
      PathWrap: wrap_object=Elbow_BIC_BRD method=hybrid
      PathWrap: wrap_object=BIClong method=hybrid range=(2 3)
    Schutte1993Muscle BICshort: max_isometric_force=316.8 optimal_fiber_length=0.1321 tendon_slack_length=0.1923
        pennation_angle=0
      PathPoint: scapula (0.01268 -0.03931 -0.02625)
      PathPoint: scapula (0.00093 -0.06704 -0.01593)
      PathPoint: humerus (0.01117 -0.07576 -0.01101)
      PathPoint: humerus (0.01703 -0.12125 -0.01079)
      PathPoint: humerus (0.0228 -0.1754 -0.0063)
      PathPoint: bicpt2 (0 0 0)
      ConditionalPathPoint: bicpt (0 0 0) coordinate=pro_sup range=(-0.6387905 1.570796)
      PathPoint: radius (-0.002 -0.0375 -0.002)
      PathWrap: wrap_object=Elbow_BIC_BRD method=hybrid
    Schutte1993Muscle BRA: max_isometric_force=1177.37 optimal_fiber_length=0.0858 tendon_slack_length=0.0535
        pennation_angle=0
      PathPoint: humerus (0.0068 -0.1739 -0.0036)
      ConditionalPathPoint: humerus (0.01894 -0.28559 -0.01105) coordinate=elbow_flexion range=(0 0.8131489)
      ConditionalPathPoint: ulna (0.00498 -0.01463 0.00128) coordinate=elbow_flexion range=(0 0.8131489)
      PathPoint: ulna (-0.0032 -0.0239 0.0009)
    Schutte1993Muscle BRD: max_isometric_force=276 optimal_fiber_length=0.1726 tendon_slack_length=0.133
        pennation_angle=0
      PathPoint: humerus (-0.0098 -0.19963 0.00223)
      PathPoint: radius (0.03577 -0.12742 0.02315)
      PathPoint: radius (0.0419 -0.221 0.0224)
      PathWrap: wrap_object=Elbow_BIC_BRD method=hybrid
    Schutte1993Muscle ECRL: max_isometric_force=337.3 optimal_fiber_length=0.081 tendon_slack_length=0.244
        pennation_angle=0
      PathPoint: humerus (-0.0073 -0.2609 0.0091)
      PathPoint: radius (0.03195 -0.13463 0.02779)
      PathPoint: radius (0.04243 -0.23684 0.0362)
      PathPoint: hand (0.01717 -0.02122 0.00583)
      PathWrap: wrap_object=Elbow_PT_ECRL method=hybrid
      PathWrap: wrap_object=ECRL
    Schutte1993Muscle ECRB: max_isometric_force=252.5 optimal_fiber_length=0.0585 tendon_slack_length=0.2223
        pennation_angle=0.1570796 mass=0.013852
      PathPoint: humerus (0.01349 -0.29048 0.01698)
      PathPoint: radius (0.02905 -0.13086 0.02385)
      PathPoint: radius (0.03549 -0.22805 0.03937)
      PathPoint: hand (0.005 -0.01136 0.0085)
      PathWrap: wrap_object=ECRB
    Schutte1993Muscle ECU: max_isometric_force=192.9 optimal_fiber_length=0.0622 tendon_slack_length=0.2285
        pennation_angle=0.06981317 mass=0.013651
      PathPoint: humerus (0.00083 -0.28955 0.0188)
      PathPoint: ulna (-0.01391 -0.03201 0.02947)
      PathPoint: ulna (-0.01705 -0.05428 0.02868)
      PathPoint: ulna (-0.01793 -0.09573 0.03278)
      PathPoint: radius (-0.01421 -0.22696 0.03481)
      PathPoint: hand (-0.02251 -0.01401 -0.00128)
      PathWrap: wrap_object=ECU
    Schutte1993Muscle FCR: max_isometric_force=407.9 optimal_fiber_length=0.0628 tendon_slack_length=0.244
        pennation_angle=0.05235988 mass=0.010941
      PathPoint: humerus (0.00758 -0.27806 -0.03705)
      PathPoint: radius (0.0211 -0.21943 0.00127)
      PathPoint: hand (0.01124 -0.01844 -0.00418)
      PathWrap: wrap_object=Elbow_PT_ECRL method=hybrid
      PathWrap: wrap_object=FCR
    Schutte1993Muscle FCU: max_isometric_force=479.8 optimal_fiber_length=0.0509 tendon_slack_length=0.265
        pennation_angle=0.2094395 mass=0.015458
      PathPoint: humerus (0.00219 -0.2774 -0.0388)
      PathPoint: FCUpt (0.00549 0 0)
      PathPoint: radius (0.01082 -0.22327 0.00969)
      PathPoint: hand (-0.02036 -0.01765 -0.00752)
      PathWrap: wrap_object=FCU
      PathWrap: wrap_object=Elbow_PT_ECRL method=hybrid
    Schutte1993Muscle PL: max_isometric_force=101 optimal_fiber_length=0.0638 tendon_slack_length=0.2694
        pennation_angle=0.06981317 mass=0.004016
      PathPoint: humerus (0.00457 -0.27519 -0.03865)
      PathPoint: radius (0.02531 -0.23915 -0.00276)
      PathPoint: hand (0.00917 -0.01898 -0.01754)
      PathPoint: hand (0.00227 -0.03096 0.00493)
      PathWrap: wrap_object=PL method=hybrid
      PathWrap: wrap_object=Elbow_PT_ECRL method=hybrid
    Schutte1993Muscle PT: max_isometric_force=557.2 optimal_fiber_length=0.0492 tendon_slack_length=0.098
        pennation_angle=0.1745329 mass=0.021093
      PathPoint: humerus (0.0036 -0.2759 -0.0365)
      PathPoint: ulna (0.00846 -0.03373 -0.01432)
      PathPoint: ptpt (0.00464 -0.00026 -0.00214)
      ConditionalPathPoint: radius (0.0236 -0.0934 0.0094) coordinate=pro_sup range=(-1.570796 0.5096361)
      PathPoint: radius (0.0254 -0.1088 0.0198)
      PathWrap: wrap_object=Elbow_PT_ECRL method=hybrid
    Schutte1993Muscle PQ: max_isometric_force=284.7 optimal_fiber_length=0.0282 tendon_slack_length=0.005
        pennation_angle=0.1745329 mass=0.005014
      PathPoint: radius (0.03245 -0.19998 0.01962)
      PathPoint: ulna (0.00193 -0.20972 0.03632)
      PathWrap: wrap_object=PQ2
      PathWrap: wrap_object=PQ1
    Schutte1993Muscle FDSL: max_isometric_force=75.3 optimal_fiber_length=0.0515 tendon_slack_length=0.3386
        pennation_angle=0.08726646
      PathPoint: humerus (0.00421 -0.27598 -0.03864)
      PathPoint: radius (0.01377 -0.18718 0.00205)
      PathPoint: hand (-0.00235 -0.01393 -0.01376)
      PathPoint: hand (-0.01995 -0.04281 -0.00742)
      PathPoint: hand (-0.02044 -0.05981 -0.01878)
      PathPoint: hand (-0.01713 -0.07245 -0.02753)
      PathPoint: hand (-0.01156 -0.07271 -0.03656)
      PathPoint: hand (-0.01059 -0.07271 -0.03796)
      PathWrap: wrap_object=FDS method=hybrid
      PathWrap: wrap_object=Elbow_PT_ECRL method=hybrid
      PathWrap: wrap_object=_5rdmcp_FDS range=(4 5)
      PathWrap: wrap_object=Fifthpm_FDS range=(6 7)
    Schutte1993Muscle FDSR: max_isometric_force=171.2 optimal_fiber_length=0.0736 tendon_slack_length=0.328
        pennation_angle=0.06981317
      PathPoint: humerus (0.00479 -0.2788 -0.03731)
      PathPoint: radius (0.01571 -0.18666 0.00267)
      PathPoint: hand (-0.00082 -0.01344 -0.01359)
      PathPoint: hand (-0.00977 -0.05179 0.00004)
      PathPoint: hand (-0.01323 -0.0667 -0.0102)
      PathPoint: hand (-0.00788 -0.08027 -0.02503)
      PathPoint: hand (-0.00299 -0.08125 -0.03395)
      PathPoint: hand (0.00062 -0.08092 -0.03892)
      PathWrap: wrap_object=FDS method=hybrid
      PathWrap: wrap_object=Elbow_PT_ECRL method=hybrid
      PathWrap: wrap_object=_4rdmcp_FDS range=(4 5)
      PathWrap: wrap_object=Fourthpm_FDS range=(6 7)
    Schutte1993Muscle FDSM: max_isometric_force=258.8 optimal_fiber_length=0.0749 tendon_slack_length=0.295
        pennation_angle=0.122173
      PathPoint: ulna (-0.00669 -0.02713 -0.00191)
      PathPoint: radius (0.01899 -0.18706 0.00424)
      PathPoint: hand (0.0068 -0.01377 -0.01399)
      PathPoint: hand (0.00471 -0.03332 -0.00132)
      PathPoint: hand (0.00542 -0.0566 0.0006)
      PathPoint: hand (0.00555 -0.07224 -0.00338)
      PathPoint: hand (0.01167 -0.0881 -0.0167)
      PathPoint: hand (0.01301 -0.0887 -0.02977)
      PathPoint: hand (0.01568 -0.08577 -0.03765)
      PathWrap: wrap_object=FDS method=hybrid
      PathWrap: wrap_object=_3rdmcp_FDS range=(5 6)
      PathWrap: wrap_object=Thirdpm_FDS range=(7 8)
    Schutte1993Muscle FDSI: max_isometric_force=162.5 optimal_fiber_length=0.0835 tendon_slack_length=0.275
        pennation_angle=0.1047198
      PathPoint: ulna (-0.00676 -0.02819 -0.00137)
      PathPoint: radius (0.02145 -0.18623 0.00552)
      PathPoint: hand (0.00889 -0.01366 -0.01387)
      PathPoint: hand (0.01061 -0.03787 0.00024)
      PathPoint: hand (0.01782 -0.05108 0.00418)
      PathPoint: hand (0.01849 -0.07297 -0.00375)
      PathPoint: hand (0.02678 -0.08714 -0.01804)
      PathPoint: hand (0.02667 -0.0874 -0.02678)
      PathPoint: hand (0.0266 -0.08633 -0.02903)
      PathWrap: wrap_object=FDS method=hybrid
      PathWrap: wrap_object=_2rdmcp_FDS range=(5 6)
      PathWrap: wrap_object=Secondpm_FDS range=(7 8)
    Schutte1993Muscle FDPL: max_isometric_force=236.8 optimal_fiber_length=0.0749 tendon_slack_length=0.2819
        pennation_angle=0.1396263
      PathPoint: ulna (-0.00628 -0.03214 0.00254)
      PathPoint: radius (0.01409 -0.18516 0.00861)
      PathPoint: hand (-0.00088 -0.01027 -0.01188)
      PathPoint: hand (-0.01855 -0.04646 -0.00733)
      PathPoint: hand (-0.01808 -0.05841 -0.0156)
      PathPoint: hand (-0.01428 -0.07289 -0.02683)
      PathPoint: hand (-0.0092 -0.07483 -0.03684)
      PathPoint: hand (-0.00312 -0.07405 -0.04165)
      PathPoint: hand (0.00446 -0.07059 -0.04657)
      PathWrap: wrap_object=FDP method=hybrid
      PathWrap: wrap_object=_5rdmcp_FDP range=(4 5)
      PathWrap: wrap_object=Fifthpm_FDP range=(6 7)
      PathWrap: wrap_object=Fifthmd_flex range=(8 9)
    Schutte1993Muscle FDPR: max_isometric_force=172.9 optimal_fiber_length=0.0798 tendon_slack_length=0.2915
        pennation_angle=0.122173
      PathPoint: ulna (-0.00502 -0.03374 0.00273)
      PathPoint: radius (0.0158 -0.18629 0.00803)
      PathPoint: hand (0.00106 -0.01177 -0.01184)
      PathPoint: hand (-0.00855 -0.05542 0.00088)
      PathPoint: hand (-0.01079 -0.06588 -0.00817)
      PathPoint: hand (-0.00547 -0.08154 -0.02256)
      PathPoint: hand (-0.00056 -0.0823 -0.03367)
      PathPoint: hand (0.00609 -0.07837 -0.04238)
      PathPoint: hand (0.01211 -0.0738 -0.04858)
      PathWrap: wrap_object=FDP method=hybrid
      PathWrap: wrap_object=_4rdmcp_FDP range=(4 5)
      PathWrap: wrap_object=Fourthpm_FDP range=(6 7)
      PathWrap: wrap_object=Fourthmd_flex range=(8 9)
    Schutte1993Muscle FDPM: max_isometric_force=212.4 optimal_fiber_length=0.0835 tendon_slack_length=0.303
        pennation_angle=0.1047198
      PathPoint: ulna (-0.00522 -0.03327 0.0021)
      PathPoint: radius (0.01906 -0.18644 0.00785)
      PathPoint: hand (0.00335 -0.0128 -0.01144)
      PathPoint: hand (0.00302 -0.03447 -0.00611)
      PathPoint: hand (0.00252 -0.05863 0.00122)
      PathPoint: hand (0.00285 -0.06985 -0.00133)
      PathPoint: hand (0.00863 -0.08779 -0.01815)
      PathPoint: hand (0.01002 -0.08766 -0.02964)
      PathPoint: hand (0.01633 -0.08157 -0.04435)
      PathPoint: hand (0.01909 -0.07663 -0.05229)
      PathWrap: wrap_object=FDP method=hybrid
      PathWrap: wrap_object=_3rdmcp_FDP range=(5 6)
      PathWrap: wrap_object=Thirdpm_FDP range=(7 8)
      PathWrap: wrap_object=Thirdmd_flex range=(9 10)
    Schutte1993Muscle FDPI: max_isometric_force=197.3 optimal_fiber_length=0.0749 tendon_slack_length=0.3015
        pennation_angle=0.122173
      PathPoint: ulna (-0.00647 -0.03176 0.0028)
      PathPoint: radius (0.0208 -0.1856 0.00915)
      PathPoint: hand (0.00896 -0.01168 -0.01212)
      PathPoint: hand (0.01922 -0.05542 0.00438)
      PathPoint: hand (0.02073 -0.07021 -0.00286)
      PathPoint: hand (0.02904 -0.08588 -0.01782)
      PathPoint: hand (0.02924 -0.08672 -0.02769)
      PathPoint: hand (0.02914 -0.08235 -0.03979)
      PathPoint: hand (0.02847 -0.07771 -0.04766)
      PathWrap: wrap_object=FDP method=hybrid
      PathWrap: wrap_object=_2rdmcp_FDP range=(4 5)
      PathWrap: wrap_object=Secondpm_FDP range=(6 7)
      PathWrap: wrap_object=Secondmd_flex range=(8 9)
    Schutte1993Muscle EDCL: max_isometric_force=39.4 optimal_fiber_length=0.065 tendon_slack_length=0.335
        pennation_angle=0.03490659
      PathPoint: humerus (-0.0004 -0.28831 0.0187)
      PathPoint: EDCpt (0.0013 -0.03888 0.01405)
      PathPoint: radius (0.00993 -0.22304 0.03618)
      PathPoint: hand (-0.02464 -0.04402 0.00169)
      PathPoint: hand (-0.02381 -0.04734 0.00077)
      PathPoint: hand (-0.02395 -0.06613 -0.01001)
      PathPoint: hand (-0.01798 -0.07847 -0.02711)
      PathPoint: hand (-0.01178 -0.07877 -0.03779)
      PathPoint: hand (-0.0015 -0.07586 -0.04586)
      PathPoint: hand (0.00201 -0.07487 -0.04794)
      PathWrap: wrap_object=EDCL range=(3 4)
      PathWrap: wrap_object=_5rdmcp_ext range=(5 6)
      PathWrap: wrap_object=Fifthpm_ext range=(7 8)
      PathWrap: wrap_object=Fifthmd_ext range=(9 10)
    Schutte1993Muscle EDCR: max_isometric_force=109.2 optimal_fiber_length=0.0626 tendon_slack_length=0.365
        pennation_angle=0.05235988
      PathPoint: humerus (-0.00156 -0.28936 0.01782)
      PathPoint: EDCpt (0.0026 -0.03991 0.01552)
      PathPoint: radius (0.00882 -0.22366 0.04284)
      PathPoint: hand (-0.01564 -0.0555 0.00934)
      PathPoint: hand (-0.01427 -0.05819 0.01161)
      PathPoint: hand (-0.0158 -0.07216 -0.00421)
      PathPoint: hand (-0.00825 -0.08735 -0.0226)
      PathPoint: hand (-0.00272 -0.08806 -0.03409)
      PathPoint: hand (0.00763 -0.08026 -0.04658)
      PathPoint: hand (0.01069 -0.07809 -0.04941)
      PathWrap: wrap_object=EDCR
      PathWrap: wrap_object=_4rdmcp_ext range=(5 6)
      PathWrap: wrap_object=Fourthpm_ext range=(7 8)
      PathWrap: wrap_object=Fourthmd_ext range=(9 10)
    Schutte1993Muscle EDCM: max_isometric_force=94.4 optimal_fiber_length=0.0724 tendon_slack_length=0.365
        pennation_angle=0.05235988
      PathPoint: humerus (0.00051 -0.28984 0.01949)
      PathPoint: EDCpt (0.00316 -0.03948 0.01528)
      PathPoint: radius (0.0144 -0.22323 0.04223)
      PathPoint: hand (0.00039 -0.05274 0.01491)
      PathPoint: hand (-0.00087 -0.05574 0.01452)
      PathPoint: hand (0.00186 -0.07718 0.00597)
      PathPoint: hand (0.01007 -0.09313 -0.01774)
      PathPoint: hand (0.01321 -0.09558 -0.03056)
      PathPoint: hand (0.01857 -0.08525 -0.04759)
      PathPoint: hand (0.02056 -0.07993 -0.05341)
      PathPoint: hand (0.02195 -0.07701 -0.05663)
      PathWrap: wrap_object=EDCM
      PathWrap: wrap_object=Thirdmd_ext range=(9 10)
      PathWrap: wrap_object=Thirdpm_ext range=(7 8)
      PathWrap: wrap_object=_3rdmcp_ext range=(5 6)
    Schutte1993Muscle EDCI: max_isometric_force=48.8 optimal_fiber_length=0.07 tendon_slack_length=0.365
        pennation_angle=0.05235988
      PathPoint: humerus (0.00065 -0.28898 0.01869)
      PathPoint: EDCpt (0.00228 -0.03918 0.01483)
      PathPoint: radius (0.01533 -0.22314 0.04196)
      PathPoint: hand (0.01543 -0.0468 0.01639)
      PathPoint: hand (0.01897 -0.05654 0.01438)
      PathPoint: hand (0.01994 -0.07678 0.00594)
      PathPoint: hand (0.02945 -0.09162 -0.01245)
      PathPoint: hand (0.03121 -0.09349 -0.02905)
      PathPoint: hand (0.03013 -0.08487 -0.04268)
      PathPoint: hand (0.02929 -0.08103 -0.04966)
      PathWrap: wrap_object=EDCI range=(3 4)
      PathWrap: wrap_object=_2rdmcp_ext range=(5 6)
      PathWrap: wrap_object=Secondpm_ext range=(7 8)
      PathWrap: wrap_object=Secondmd_ext range=(9 10)
    Schutte1993Muscle EDM: max_isometric_force=72.4 optimal_fiber_length=0.0675 tendon_slack_length=0.335
        pennation_angle=0.05235988
      PathPoint: humerus (0.00089 -0.28919 0.01847)
      PathPoint: ulna (-0.00977 -0.03907 0.03085)
      PathPoint: ulna (-0.00755 -0.08267 0.03646)
      PathPoint: radius (0.00454 -0.22641 0.03678)
      PathPoint: hand (-0.02059 -0.01032 0.00372)
      PathPoint: hand (-0.02563 -0.04722 0.00023)
      PathPoint: hand (-0.02549 -0.06511 -0.01098)
      PathPoint: hand (-0.01933 -0.0781 -0.02718)
      PathPoint: hand (-0.01346 -0.07892 -0.03894)
      PathPoint: hand (-0.00216 -0.07521 -0.04589)
      PathPoint: hand (0.00132 -0.07345 -0.04803)
      PathWrap: wrap_object=EDM method=hybrid range=(4 5)
      PathWrap: wrap_object=Fifthmd_ext range=(10 11)
      PathWrap: wrap_object=Fifthpm_ext range=(8 9)
      PathWrap: wrap_object=_5rdmcp_ext range=(6 7)
    Schutte1993Muscle EIP: max_isometric_force=47.3 optimal_fiber_length=0.0589 tendon_slack_length=0.21
        pennation_angle=0.1047198
      PathPoint: ulna (-0.00394 -0.16652 0.03682)
      PathPoint: ulna (0.00171 -0.17469 0.04049)
      PathPoint: radius (0.01076 -0.22783 0.03664)
      PathPoint: hand (0.00388 -0.02234 0.01184)
      PathPoint: hand (0.01693 -0.0564 0.01377)
      PathPoint: hand (0.01735 -0.07692 0.00581)
      PathPoint: hand (0.02765 -0.09314 -0.01511)
      PathPoint: hand (0.02879 -0.09437 -0.02823)
      PathPoint: hand (0.0287 -0.08524 -0.04295)
      PathPoint: hand (0.02834 -0.07785 -0.05501)
      PathWrap: wrap_object=Extensor_ellipse method=hybrid
      PathWrap: wrap_object=_2rdmcp_ext range=(5 6)
      PathWrap: wrap_object=Secondpm_ext range=(7 8)
      PathWrap: wrap_object=Secondmd_ext range=(9 10)
    Schutte1993Muscle EPL: max_isometric_force=88.3 optimal_fiber_length=0.054 tendon_slack_length=0.2305
        pennation_angle=0.1047198
      PathPoint: ulna (-0.01412 -0.09706 0.02952)
      PathPoint: radius (0.00124 -0.13668 0.0227)
      PathPoint: radius (0.02702 -0.21872 0.03828)
      PathPoint: radius (0.03382 -0.22754 0.04607)
      PathPoint: radius (0.04234 -0.23771 0.04173)
      PathPoint: hand (0.02428 0.00014 0.00608)
      PathPoint: hand (0.02338 -0.00917 -0.00039)
      PathPoint: hand (0.02905 -0.01427 -0.00489)
      PathPoint: hand (0.04414 -0.03417 -0.01814)
      PathPoint: hand (0.04867 -0.04646 -0.02487)
      PathPoint: hand (0.04751 -0.0701 -0.03774)
      PathPoint: hand (0.04011 -0.07565 -0.04283)
      PathWrap: wrap_object=MPthumb
    Schutte1993Muscle EPB: max_isometric_force=46 optimal_fiber_length=0.0675 tendon_slack_length=0.1155
        pennation_angle=0.122173
      PathPoint: radius (0.01924 -0.14695 0.02114)
      PathPoint: radius (0.02276 -0.15857 0.02665)
      PathPoint: radius (0.03831 -0.19722 0.03834)
      PathPoint: radius (0.05235 -0.23611 0.02699)
      PathPoint: hand (0.03123 0.00256 -0.00327)
      PathPoint: hand (0.02972 -0.00794 -0.01436)
      PathPoint: hand (0.04422 -0.033 -0.02422)
      PathPoint: hand (0.04528 -0.04785 -0.03186)
      PathWrap: wrap_object=MPthumb
    Schutte1993Muscle FPL: max_isometric_force=201 optimal_fiber_length=0.0552 tendon_slack_length=0.197
        pennation_angle=0.122173
      PathPoint: radius (0.00971 -0.09458 0.01769)
      PathPoint: radius (0.01658 -0.13525 0.01915)
      PathPoint: radius (0.01869 -0.17932 0.01988)
      PathPoint: radius (0.038 -0.23171 0.0158)
      PathPoint: FPLpt (0.01869 0.00882 -0.01547)
      PathPoint: FPLpt2 (0.01244 -0.02207 -0.02089)
      PathPoint: hand (0.01641 -0.02621 -0.02221)
      PathPoint: hand (0.02457 -0.03294 -0.02237)
      PathPoint: hand (0.02827 -0.05482 -0.03055)
      PathPoint: hand (0.03511 -0.06519 -0.03749)
      PathPoint: hand (0.03533 -0.07656 -0.04118)
      PathWrap: wrap_object=FPL method=hybrid
      PathWrap: wrap_object=IPthumb range=(10 11)
      PathWrap: wrap_object=MPthumb
    Schutte1993Muscle APL: max_isometric_force=116.7 optimal_fiber_length=0.0713 tendon_slack_length=0.1295
        pennation_angle=0.1396263
      PathPoint: radius (0.01154 -0.09477 0.01681)
      PathPoint: radius (0.0303 -0.1397 0.03507)
      PathPoint: radius (0.03993 -0.16072 0.034)
      PathPoint: radius (0.04397 -0.17845 0.03134)
      PathPoint: radius (0.05505 -0.23084 0.02368)
      PathPoint: APLpt (0.03385 0.00634 -0.00745)
      PathPoint: hand (0.02587 0.00205 -0.0165)
      PathPoint: hand (0.02878 -0.00674 -0.0187)
      PathPoint: hand (0.03076 -0.01583 -0.01885)
  BodySet:
    Body ground: mass=0 mass_center=(0 0 0) inertia_xx=0 inertia_yy=0 inertia_zz=0
    Body thorax: mass=0 mass_center=(0 0 0) inertia_xx=1 inertia_yy=1 inertia_zz=1 meshes=thorax.vtp
      WeldJoint ground_thorax: parent_body=ground location_in_parent=(0 0 0) location=(0 0 0)
      WrapEllipsoid Thorax: dimensions=(0.1 0.135 0.08) xyz_body_rotation=(0.0434587 -0.3319616 0.1898918)
          translation=(-0.0502 0.5042 -0.1433)
    Body clavicle: mass=0.156 mass_center=(-0.011096 0.0063723 0.054168) inertia_xx=0.00024259 inertia_yy=0.00025526
        inertia_zz=0.000044423 inertia_xy=-0.000018982 inertia_xz=-0.000069941 inertia_yz=0.000053711
        meshes=clavicle.vtp
      CustomJoint sternoclavicular: parent_body=thorax location_in_parent=(0.006325 0.00693 0.025465) location=(0 0 0)
        Coordinate sternoclavicular_r2: default_value=0 initial_value=0 range=(-99999.9 99999.9) clamped=false
        Coordinate sternoclavicular_r3: default_value=0 initial_value=0 range=(-99999.9 99999.9) clamped=false
        SpatialTransform: axes_held_at_zero=(rotation3 translation1 translation2 translation3)
          TransformAxis rotation1: axis=(0.0153 0.9892987 -0.1451) coordinates=sternoclavicular_r2
          TransformAxis rotation2: axis=(-0.9944725 0 -0.104997) coordinates=sternoclavicular_r3
    Body clavphant: mass=0 mass_center=(0 0 0) inertia_xx=1 inertia_yy=1 inertia_zz=1
      CustomJoint unrotscap: parent_body=clavicle location_in_parent=(-0.01433 0.02007 0.135535) location=(0 0 0)
        Coordinate unrotscap_r3: default_value=0 initial_value=0 range=(-99999.9 99999.9) clamped=false
        Coordinate unrotscap_r2: default_value=0 initial_value=0 range=(-99999.9 99999.9) clamped=false
        SpatialTransform: axes_held_at_zero=(rotation3 translation1 translation2 translation3)
          TransformAxis rotation1: axis=(-0.9944725 0 -0.104997) coordinates=unrotscap_r3
          TransformAxis rotation2: axis=(0.0153 0.9892987 -0.1451) coordinates=unrotscap_r2
    Body scapula: mass=0.70396 mass_center=(-0.054694 -0.035032 -0.043734) inertia_xx=0.0012429 inertia_yy=0.0011504
        inertia_zz=0.0013651 inertia_xy=0.0004494 inertia_xz=0.00040922 inertia_yz=0.0002411 meshes=scapula.vtp
      CustomJoint acromioclavicular: parent_body=clavphant location_in_parent=(0 0 0) location=(0 0 0)
        Coordinate acromioclavicular_r2: default_value=0 initial_value=0 range=(-99999.9 99999.9) clamped=false
        Coordinate acromioclavicular_r3: default_value=0 initial_value=0 range=(-99999.9 99999.9) clamped=false
        Coordinate acromioclavicular_r1: default_value=0 initial_value=0 range=(-99999.9 99999.9) clamped=false
        SpatialTransform: axes_held_at_zero=(translation1 translation2 translation3)
          TransformAxis rotation1: axis=(0.1570949 0.9472686 -0.2792909) coordinates=acromioclavicular_r2
          TransformAxis rotation2: axis=(-0.754084 0.297594 0.585487) coordinates=acromioclavicular_r3
          TransformAxis rotation3: axis=(0.6376999 0.1186 0.7610998) coordinates=acromioclavicular_r1
      WrapEllipsoid Deltoid2: dimensions=(0.03 0.04 0.035) active=false
          xyz_body_rotation=(3.130423 -1.548805 -1.314233) translation=(-0.0058 -0.0378 0.0096) quadrant=-y
      WrapTorus Delt3: inner_radius=0.04 outer_radius=0.06 active=false
          xyz_body_rotation=(0.6209881 0.32882 -0.5607743) translation=(-0.0973 -0.0428 -0.037)
      WrapTorus INFSP: inner_radius=0.008 outer_radius=0.019 xyz_body_rotation=(0.02530727 0.5883505 0.1518436)
          translation=(-0.0561 -0.0199 -0.0112)
      WrapEllipsoid TMIN: dimensions=(0.03 0.03 0.05) xyz_body_rotation=(-2.097537 -0.2808235 -1.763481)
          translation=(-0.0418 -0.0519 -0.0359) quadrant=x
      WrapCylinder TRIlongglen: radius=0.003 length=0.03 xyz_body_rotation=(1.375319 -0.2946116 2.435956)
          translation=(-0.0359 -0.0309 -0.0132) quadrant=x
    Body scapphant: mass=0 mass_center=(0 0 0) inertia_xx=1 inertia_yy=1 inertia_zz=1
      CustomJoint unrothum: parent_body=scapula location_in_parent=(-0.00955 -0.034 0.009) location=(0 0 0)
        Coordinate unrothum_r1: default_value=0 initial_value=0 range=(-99999.9 99999.9) clamped=false
        Coordinate unrothum_r3: default_value=0 initial_value=0 range=(-99999.9 99999.9) clamped=false
        Coordinate unrothum_r2: default_value=0 initial_value=0 range=(-99999.9 99999.9) clamped=false
        SpatialTransform: axes_held_at_zero=(translation1 translation2 translation3)
          TransformAxis rotation1: axis=(0.6376999 0.1186 0.7610998) coordinates=unrothum_r1
          TransformAxis rotation2: axis=(-0.754084 0.297594 0.585487) coordinates=unrothum_r3
          TransformAxis rotation3: axis=(0.1570949 0.9472686 -0.2792909) coordinates=unrothum_r2
    Body humphant: mass=0 mass_center=(0 0 0) inertia_xx=1 inertia_yy=1 inertia_zz=1
      CustomJoint shoulder0: parent_body=scapphant location_in_parent=(0 0 0) location=(0 0 0)
        Coordinate elv_angle: default_value=0 initial_value=0 range=(-1.570796 2.268928) keys=(s_key leftmouse_button)
            clamped=false
        SpatialTransform: axes_held_at_zero=(rotation1 rotation3 translation1 translation2 translation3)
          TransformAxis rotation2: axis=(0.004800001 0.9990892 0.04240001) coordinates=elv_angle
              LinearFunction(coefficients=1 0)
    Body humphant1: mass=0 mass_center=(0 0 0) inertia_xx=1 inertia_yy=1 inertia_zz=1
      CustomJoint shoulder1: parent_body=humphant location_in_parent=(0 0 0) location=(0 0 0)
        Coordinate shoulder_elv: default_value=0 initial_value=0 range=(0 3.141593) keys=(s_key middlemouse_button)
            clamped=false
        Coordinate shoulder1_r2: default_value=0 initial_value=0 range=(-99999.9 99999.9) clamped=false
        SpatialTransform: axes_held_at_zero=(rotation1 translation1 translation2 translation3)
          TransformAxis rotation2: axis=(-0.9982614 0.002300001 0.05889802) coordinates=shoulder_elv
              LinearFunction(coefficients=1 0)
          TransformAxis rotation3: axis=(0.004800001 0.9990892 0.04240001) coordinates=shoulder1_r2
    Body humerus: mass=1.99757 mass_center=(0.01806404 -0.1401407 -0.012746) inertia_xx=0.01227763
        inertia_yy=0.002551327 inertia_zz=0.01257888 inertia_xy=-0.000347406 inertia_xz=-0.000232498
        inertia_yz=0.001229304 meshes=humerus.vtp
      CustomJoint shoulder2: parent_body=humphant1 location_in_parent=(0 0 0) location=(0 0 0)
        Coordinate shoulder_rot: default_value=0 initial_value=0 range=(-1.570796 0.3490659)
            keys=(s_key rightmouse_button) clamped=false
        SpatialTransform: axes_held_at_zero=(rotation1 rotation3 translation1 translation2 translation3)
          TransformAxis rotation2: axis=(0.004800001 0.9990892 0.04240001) coordinates=shoulder_rot
              LinearFunction(coefficients=1 0)
      WrapEllipsoid DELT1hh: dimensions=(0.03 0.1 0.05) xyz_body_rotation=(0.05846853 1.004612 0.5703736)
          translation=(-0.0139 -0.0127 -0.0262) quadrant=z
      WrapCylinder delt2hum: radius=0.0094 length=0.05 xyz_body_rotation=(1.680927 -0.02495821 0.05166175)
          translation=(0.0017 -0.0958 0.0011)
      WrapEllipsoid delt3hum: dimensions=(0.01 0.01 0.05) xyz_body_rotation=(1.727352 0.07592182 -2.743134)
          translation=(0.0019 -0.0592 0.0011) quadrant=x
      WrapEllipsoid SUPSP: dimensions=(0.02 0.02 0.02) xyz_body_rotation=(0.03804818 0.00855211 -1.306728)
          translation=(0.0002 0.0077 0.0043)
      WrapEllipsoid INFSP_and_TMIN_hum_head: dimensions=(0.02 0.025 0.02)
          xyz_body_rotation=(-0.2865831 -0.00907571 -0.06841691) translation=(-0.0003 0.0026 0.0038)
      WrapEllipsoid SUBSCAP: dimensions=(0.02 0.017 0.028) xyz_body_rotation=(-0.9245009 0.288852 0.381529)
          translation=(-0.0025 0.0007 -0.0045)
      WrapCylinder TMINhum: radius=0.007 length=0.07 xyz_body_rotation=(1.753532 0.06928957 2.746276)
          translation=(-0.0014 -0.0455 0) quadrant=x
      WrapSphere TMAJ_LAT_PEC_CORBhh: radius=0.03 translation=(0.0007 0 0.006)
      WrapCylinder TMAJ_LAThum: radius=0.007 length=0.04 xyz_body_rotation=(1.536413 -0.06370452 1.41424)
          translation=(0.0007 -0.0443 -0.0055) quadrant=-x
      WrapEllipsoid PEC1hh: dimensions=(0.03 0.02 0.02) xyz_body_rotation=(-0.6204646 -0.3104941 0.3637266)
          translation=(-0.0037 0.0005 -0.0025) quadrant=-z
      WrapCylinder PEC12hum: radius=0.009 length=0.07 xyz_body_rotation=(1.559277 -0.07749262 -0.9258972)
          translation=(0.002 -0.0508 -0.0017) quadrant=x
      WrapSphere PEC23hh: radius=0.02 translation=(-0.0086 0.0021 -0.0004)
      WrapCylinder PEC3hum: radius=0.008 length=0.07 xyz_body_rotation=(1.440944 -0.0561996 1.751961)
          translation=(0.0009 -0.0551 -0.0004) quadrant=-x
      WrapCylinder LAT_TMAJhh: radius=0.007 length=0.045 xyz_body_rotation=(-0.3050835 -0.01832596 -0.6866125)
          translation=(-0.0224 0.0102 0.0094) quadrant=-y
      WrapSphere LAT_TMAJ2hh: radius=0.03 xyz_body_rotation=(-0.1272345 0.2761111 0.01972222)
          translation=(-0.0016 0.0092 0.0052) quadrant=-z
      WrapCylinder CORBhum: radius=0.008 length=0.05 xyz_body_rotation=(-1.608321 0.09599311 0.8752826)
          translation=(0.0027 -0.1202 -0.0059) quadrant=x
      WrapEllipsoid TRIlonghh: dimensions=(0.035 0.02 0.02) xyz_body_rotation=(3.001617 -0.853466 2.574186)
          translation=(-0.0078 -0.0041 -0.0014) quadrant=z
      WrapCylinder TRI: radius=0.016 length=0.04 xyz_body_rotation=(-0.1401499 -0.00628319 0.1549852)
          translation=(0.0028 -0.2919 -0.0119)
      WrapEllipsoid ANC: dimensions=(0.02 0.02 0.02) xyz_body_rotation=(0.00750492 -0.1966986 1.049292)
          translation=(0.0134 -0.2861 -0.0008) quadrant=-x
      WrapEllipsoid BIClong: dimensions=(0.025 0.02 0.02) xyz_body_rotation=(-2.004336 -1.001644 0.9754645)
          translation=(0.0033 0.0073 0.0003) quadrant=-y
      WrapEllipsoid Elbow_BIC_BRD: dimensions=(0.015 0.015 0.1) xyz_body_rotation=(-0.1286308 0.1375319 0.03071779)
          translation=(0.0019 -0.289 -0.014) quadrant=x
      WrapEllipsoid Elbow_PT_ECRL: dimensions=(0.018 0.025 0.035) xyz_body_rotation=(-0.1610939 -0.1108284 0.6145304)
          translation=(0.003 -0.2872 -0.0069) quadrant=x
    Body ulna: mass=1.1053 mass_center=(0.00971783 -0.09595089 0.024286) inertia_xx=0.005413088 inertia_yy=0.001153179
        inertia_zz=0.004943605 inertia_xy=0.000316858 inertia_xz=-0.000076154 inertia_yz=0.001091688 meshes=ulna.vtp
      CustomJoint elbow: parent_body=humerus location_in_parent=(0.0061 -0.2904 -0.0123) location=(0 0 0)
        Coordinate elbow_flexion: default_value=0 initial_value=0 range=(0 2.268928) keys=(e_key leftmouse_button)
            clamped=false
        SpatialTransform: axes_held_at_zero=(rotation1 rotation2 translation1 translation2 translation3)
          TransformAxis rotation3: axis=(0.04940001 0.03660001 0.9981082) coordinates=elbow_flexion
              LinearFunction(coefficients=1 0)
      WrapCylinder PQ2: radius=0.007 length=0.01 xyz_body_rotation=(1.391376 0.06894051 1.522451)
          translation=(-0.0012 -0.2092 0.0428)
    Body radius: mass=0.23359 mass_center=(0.03363413 -0.1815588 0.0156) inertia_xx=0.000438551 inertia_yy=0.000088594
        inertia_zz=0.000402583 inertia_xy=0.000030141 inertia_xz=-0.000004239 inertia_yz=0.000064177 meshes=radius.vtp
      CustomJoint radioulnar: parent_body=ulna location_in_parent=(0.0004 -0.011503 0.019999) location=(0 0 0)
        Coordinate pro_sup: default_value=0 initial_value=0 range=(-1.570796 1.570796) keys=(p_key leftmouse_button)
            clamped=false
        SpatialTransform: axes_held_at_zero=(rotation1 rotation3 translation1 translation2 translation3)
          TransformAxis rotation2: axis=(-0.01716099 0.9926656 -0.119668) coordinates=pro_sup
              LinearFunction(coefficients=1 0)
      WrapCylinder SUP: radius=0.008 length=0.04 xyz_body_rotation=(1.447751 0.3040364 -2.441017)
          translation=(0.0045 -0.0437 0.0059) quadrant=-x
      WrapTorus ECU: inner_radius=0.006 outer_radius=0.009 xyz_body_rotation=(-0.9866346 -0.1488766 0.222704)
          translation=(-0.0163 -0.2417 0.0349)
      WrapCylinder PQ1: radius=0.01 length=0.01 xyz_body_rotation=(-1.607623 -0.0127409 -2.690251)
          translation=(0.0281 -0.1986 0.0288)
    Body proximal_row: mass=0.0001 mass_center=(0 0 0) inertia_xx=0.000010001 inertia_yy=0.000010001
        inertia_zz=0.000010001 meshes=(lunate.vtp sdfastSCAPHOIDw.vtp sdfastPISIFORMw.vtp sdfastTRIQUETRALw.vtp)
      CustomJoint radiocarpal: parent_body=radius location_in_parent=(0.018 -0.242 0.025) location=(0 0 0)
        Coordinate deviation: default_value=0 initial_value=0 range=(-0.1745329 0.4363323)
            keys=(v_key leftmouse_button) clamped=false
        Coordinate proximal_flexion: default_value=0 initial_value=0 range=(-0.6108652 0.6108652)
            keys=(f_key leftmouse_button) clamped=false
        SpatialTransform: axes_held_at_zero=(rotation2 translation1 translation2 translation3)
          TransformAxis rotation1: axis=(-0.819064 -0.135611 -0.557444) coordinates=deviation
              LinearFunction(coefficients=1 0)
          TransformAxis rotation3: axis=(0.9564267 -0.2522069 0.147104) coordinates=proximal_flexion
              LinearFunction(coefficients=1 0)
      WrapEllipsoid Extensor_ellipse: dimensions=(0.05 0.02 0.013) xyz_body_rotation=(-0.2508038 0.2855359 0.2328269)
          translation=(0.0007 -0.0135 0.0047) quadrant=z
      WrapTorus ECRL: inner_radius=0.008 outer_radius=0.016 xyz_body_rotation=(1.538333 0.2343977 0.7311184)
          translation=(0.0222 -0.0096 0.0208)
      WrapTorus ECRB: inner_radius=0.008 outer_radius=0.01 xyz_body_rotation=(1.312662 -0.1178097 -0.1162389)
          translation=(0.0126 -0.0095 0.0186)
      WrapTorus FCR: inner_radius=0.001 outer_radius=0.0025 xyz_body_rotation=(-1.555961 -0.1532399 -0.1000074)
          translation=(0.0032 -0.0045 -0.019)
      WrapTorus FCU: inner_radius=0.0068 outer_radius=0.008 xyz_body_rotation=(-1.573763 -0.07976155 0.39235)
          translation=(-0.0123 -0.0124 -0.0171)
      WrapEllipsoid PL: dimensions=(0.025 0.014 0.012) xyz_body_rotation=(-0.03159046 0.0996583 0.06335545)
          translation=(0.0057 -0.018 -0.0041) quadrant=-z
      WrapEllipsoid FDS: dimensions=(0.025 0.013 0.012) xyz_body_rotation=(0.00837758 -0.08168141 -0.01710423)
          translation=(0.0012 -0.0057 -0.0003) quadrant=-z
      WrapEllipsoid FDP: dimensions=(0.025 0.013 0.012) xyz_body_rotation=(-1.467473 -0.1946042 0.121824)
          translation=(-0.0022 -0.0069 0.0032) quadrant=y
      WrapTorus EDCL: inner_radius=0.008 outer_radius=0.012 xyz_body_rotation=(2.363176 0.1930334 -0.2691298)
          translation=(-0.0128 -0.0133 0.0148)
      WrapTorus EDCR: inner_radius=0.009 outer_radius=0.011 xyz_body_rotation=(1.983916 0.100531 0.5230752)
          translation=(-0.0098 -0.0137 0.0166)
      WrapTorus EDCM: inner_radius=0.009 outer_radius=0.012 xyz_body_rotation=(1.993166 0.1979203 0.3682645)
          translation=(-0.0007 -0.0117 0.0191)
      WrapTorus EDCI: inner_radius=0.009 outer_radius=0.012 xyz_body_rotation=(1.697682 0.08970992 0.00767945)
          translation=(0.009 -0.0149 0.0211)
      WrapEllipsoid EDM: dimensions=(0.018 0.014 0.008) xyz_body_rotation=(2.962696 0.1593486 0.1179843)
          translation=(-0.0167 -0.0022 0.0048) quadrant=-z
      WrapEllipsoid FPL: dimensions=(0.016 0.01 0.01) xyz_body_rotation=(-0.1663299 -0.08220501 -0.06597345)
          translation=(0.017 -0.025 -0.0033) quadrant=-z
    Body hand: mass=0.5819 mass_center=(-0.00301314 -0.04249931 -0.001122053) inertia_xx=0.00011 inertia_yy=0.00006
        inertia_zz=0.00015 inertia_xy=0.0000009 inertia_xz=-0.0000002 inertia_yz=0.000012
        meshes=(sdfast_1seg_hand_fr_c_5mc.vtp sdfast_1seg_hand_fr_c_4mc.vtp sdfast_1seg_hand_fr_c_3mc.vtp sdfast_1seg_hand_fr_c_2mc.vtp sdfast_1seg_hand_fr_c_trapezium.vtp sdfast_1seg_hand_fr_c_trapezoid.vtp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)
      CustomJoint wrist_hand: parent_body=proximal_row location_in_parent=(0.003992 -0.015054 0.002327)
          location=(0 0 0)
        Coordinate wrist_hand_r1: default_value=0 initial_value=0 range=(-99999.9 99999.9) clamped=false
        Coordinate wrist_hand_r3: default_value=0 initial_value=0 range=(-99999.9 99999.9) clamped=false
        SpatialTransform: axes_held_at_zero=(rotation2 translation1 translation2 translation3)
          TransformAxis rotation1: axis=(0.8991357 -0.3490529 -0.2640399) coordinates=wrist_hand_r1
          TransformAxis rotation3: axis=(0.9971185 0.01069999 -0.07510096) coordinates=wrist_hand_r3
      WrapCylinder _2rdmcp_FDS: radius=0.013 length=0.01 xyz_body_rotation=(0.5939355 1.50011 -2.165779)
          translation=(0.0182 -0.0659 0.0087) quadrant=y
      WrapCylinder _2rdmcp_FDP: radius=0.0105 length=0.01 xyz_body_rotation=(0.5939355 1.50011 -2.235592)
          translation=(0.0182 -0.0659 0.0087) quadrant=y
      WrapCylinder _2rdmcp_ext: radius=0.01 length=0.01 xyz_body_rotation=(0.5939355 1.50011 -1.991246)
          translation=(0.0182 -0.0659 0.0087) quadrant=-y
      WrapEllipsoid _2ndmcp: dimensions=(0.005 0.005 0.03) active=false xyz_body_rotation=(1.486671 -1.296605 2.43072)
          translation=(0.0206 -0.068 0.0044) quadrant=-x
      WrapCylinder _3rdmcp_FDS: radius=0.013 length=0.01 xyz_body_rotation=(0.7703883 1.32837 1.570796)
          translation=(0.0007 -0.0655 0.0092) quadrant=-x
      WrapCylinder _3rdmcp_FDP: radius=0.0105 length=0.01 xyz_body_rotation=(0.7703883 1.32837 1.570796)
          translation=(0.0046 -0.0662 0.0099) quadrant=-x
      WrapCylinder _3rdmcp_ext: radius=0.01 length=0.01 xyz_body_rotation=(0.7703883 1.32837 1.466077)
          translation=(0.0007 -0.0655 0.0092) quadrant=y
      WrapCylinder _4rdmcp_FDS: radius=0.013 length=0.01 xyz_body_rotation=(0.8585275 1.101652 -2.485349)
          translation=(-0.0139 -0.0642 0.0033) quadrant=y
      WrapCylinder _4rdmcp_FDP: radius=0.0105 length=0.01 xyz_body_rotation=(0.8585275 1.101652 -2.485349)
          translation=(-0.0139 -0.0642 0.0033) quadrant=y
      WrapCylinder _4rdmcp_ext: radius=0.01 length=0.01 xyz_body_rotation=(0.8585275 1.101652 -3.096214)
          translation=(-0.0139 -0.0642 0.0033) quadrant=x
      WrapCylinder _5rdmcp_FDS: radius=0.013 length=0.012 xyz_body_rotation=(0.4705408 0.975639 -2.121622)
          translation=(-0.0235 -0.0561 -0.0057) quadrant=y
      WrapCylinder _5rdmcp_FDP: radius=0.0105 length=0.01 xyz_body_rotation=(0.4705408 0.975639 -2.348515)
          translation=(-0.0235 -0.0561 -0.0057) quadrant=y
      WrapCylinder _5rdmcp_ext: radius=0.01 length=0.012 xyz_body_rotation=(0.4705408 0.975639 -1.68529)
          translation=(-0.0235 -0.0561 -0.0057) quadrant=-y
      WrapCylinder Secondpm_FDS: radius=0.0075 length=0.01 xyz_body_rotation=(-1.578127 1.248085 1.025905)
          translation=(0.0307 -0.0924 -0.0222) quadrant=y
      WrapCylinder Secondpm_FDP: radius=0.008 length=0.01 xyz_body_rotation=(-1.578127 1.248085 1.025905)
          translation=(0.0307 -0.0924 -0.0222) quadrant=y
      WrapCylinder Secondpm_ext: radius=0.0055 length=0.012 xyz_body_rotation=(-1.578127 1.248085 1.025905)
          translation=(0.0307 -0.0924 -0.0222) quadrant=-y
      WrapCylinder Secondmd_flex: radius=0.005 length=0.01 xyz_body_rotation=(-1.631708 1.342856 2.116386)
          translation=(0.0291 -0.0821 -0.045) quadrant=y
      WrapCylinder Secondmd_ext: radius=0.002 length=0.01 xyz_body_rotation=(-1.631708 1.342856 2.116386)
          translation=(0.0291 -0.0821 -0.045) quadrant=-y
      WrapCylinder Secondpm: radius=0.004 length=0.01 active=false xyz_body_rotation=(2.2513 -1.370083 1.181588)
          translation=(0.0306 -0.0911 -0.0223)
      WrapCylinder Secondmd: radius=0.003 length=0.01 active=false xyz_body_rotation=(1.355248 -1.383872 -0.5571091)
          translation=(0.0295 -0.0815 -0.0441) quadrant=x
      WrapCylinder MPthumb: radius=0.0085 length=0.02 xyz_body_rotation=(0.3213151 0.1101303 -0.834791)
          translation=(0.0402 -0.0405 -0.0271)
      WrapCylinder IPthumb: radius=0.0045 length=0.01 xyz_body_rotation=(0.3321362 -0.026529 -0.2576106)
          translation=(0.0396 -0.0713 -0.0365) quadrant=-x
      WrapCylinder Thirdpm_FDS: radius=0.0075 length=0.01 xyz_body_rotation=(-0.4078834 1.452463 -0.1453859)
          translation=(0.0122 -0.0934 -0.0238) quadrant=y
      WrapCylinder Thirdpm_FDP: radius=0.008 length=0.01 xyz_body_rotation=(-0.4078834 1.452463 -0.1453859)
          translation=(0.0122 -0.0934 -0.0238) quadrant=y
      WrapCylinder Thirdpm_ext: radius=0.0055 length=0.01 xyz_body_rotation=(-0.4078834 1.452463 -0.1453859)
          translation=(0.0122 -0.0934 -0.0238) quadrant=-y
      WrapCylinder Thirdmd_flex: radius=0.005 length=0.01 xyz_body_rotation=(0.7141887 1.282817 -0.2033309)
          translation=(0.019 -0.0814 -0.0494) quadrant=y
      WrapCylinder Thirdmd_ext: radius=0.002 length=0.01 xyz_body_rotation=(0.7141887 1.282817 -0.2033309)
          translation=(0.019 -0.0814 -0.0494) quadrant=-y
      WrapCylinder Fourthpm_FDS: radius=0.0075 length=0.01 xyz_body_rotation=(0.6962118 0.9768608 -1.218763)
          translation=(-0.005 -0.0871 -0.0289) quadrant=y
      WrapCylinder Fourthpm_FDP: radius=0.008 length=0.01 xyz_body_rotation=(0.6962118 0.9768608 -1.218763)
          translation=(-0.005 -0.0871 -0.0289) quadrant=y
      WrapCylinder Fourthpm_ext: radius=0.0055 length=0.01 xyz_body_rotation=(0.6962118 0.9768608 -1.218763)
          translation=(-0.005 -0.0871 -0.0289) quadrant=-y
      WrapCylinder Fourthmd_flex: radius=0.005 length=0.01 xyz_body_rotation=(0.7531096 0.9258972 -0.1673771)
          translation=(0.0094 -0.0778 -0.0469) quadrant=y
      WrapCylinder Fourthmd_ext: radius=0.002 length=0.01 xyz_body_rotation=(0.7531096 0.9258972 -0.1673771)
          translation=(0.0094 -0.0778 -0.0469) quadrant=-y
      WrapCylinder Fifthpm_FDS: radius=0.0075 length=0.01 xyz_body_rotation=(0.9770353 0.8251917 -1.516866)
          translation=(-0.0154 -0.0784 -0.0329) quadrant=y
      WrapCylinder Fifthpm_FDP: radius=0.008 length=0.01 xyz_body_rotation=(0.9770353 0.8251917 -1.796118)
          translation=(-0.0153 -0.0786 -0.0329) quadrant=y
      WrapCylinder Fifthpm_ext: radius=0.0055 length=0.01 xyz_body_rotation=(0.9770353 0.8251917 -1.080533)
          translation=(-0.0152 -0.0785 -0.0328) quadrant=-y
      WrapCylinder Fifthmd_flex: radius=0.005 length=0.01 xyz_body_rotation=(0.9793042 0.6503097 -0.6208136)
          translation=(0.0007 -0.0741 -0.0457) quadrant=y
      WrapCylinder Fifthmd_ext: radius=0.002 length=0.01 xyz_body_rotation=(0.9793042 0.6503097 -0.6208136)
          translation=(0.007 -0.0741 -0.0457) quadrant=-y
    Body bicpt: mass=0.0001 mass_center=(0 0 0) inertia_xx=0.000010001 inertia_yy=0.000010001 inertia_zz=0.000010001
      CustomJoint bicpt: parent_body=radius location_in_parent=(0 0 0) location=(0 0 0)
        Coordinate bicpt_r1: default_value=0 initial_value=0 range=(-99999.9 99999.9) clamped=false
        Coordinate bicpt_r2: default_value=0 initial_value=0 range=(-99999.9 99999.9) clamped=false
        Coordinate bicpt_r3: default_value=0 initial_value=0 range=(-99999.9 99999.9) clamped=false
        Coordinate bicpt_tx: default_value=-0.0001 initial_value=-0.0001 range=(-99999.9 99999.9) clamped=false
        Coordinate bicpt_ty: default_value=-0.0276 initial_value=-0.0276 range=(-99999.9 99999.9) clamped=false
        Coordinate bicpt_tz: default_value=-0.0043 initial_value=-0.0043 range=(-99999.9 99999.9) clamped=false
        SpatialTransform:
          TransformAxis rotation1: axis=(1 0 0) coordinates=bicpt_r1
          TransformAxis rotation2: axis=(0 1 0) coordinates=bicpt_r2
          TransformAxis rotation3: axis=(0 0 1) coordinates=bicpt_r3
          TransformAxis translation1: axis=(1 0 0) coordinates=bicpt_tx
          TransformAxis translation2: axis=(0 1 0) coordinates=bicpt_ty
          TransformAxis translation3: axis=(0 0 1) coordinates=bicpt_tz
    Body bicpt2: mass=0.0001 mass_center=(0 0 0) inertia_xx=0.000010001 inertia_yy=0.000010001 inertia_zz=0.000010001
      CustomJoint bicpt2: parent_body=radius location_in_parent=(0 0 0) location=(0 0 0)
        Coordinate bicpt2_r1: default_value=0 initial_value=0 range=(-99999.9 99999.9) clamped=false
        Coordinate bicpt2_r2: default_value=0 initial_value=0 range=(-99999.9 99999.9) clamped=false
        Coordinate bicpt2_r3: default_value=0 initial_value=0 range=(-99999.9 99999.9) clamped=false
        Coordinate bicpt2_tx: default_value=0.0146695 initial_value=0.0146695 range=(-99999.9 99999.9) clamped=false
        Coordinate bicpt2_ty: default_value=-0.0102 initial_value=-0.0102 range=(-99999.9 99999.9) clamped=false
        Coordinate bicpt2_tz: default_value=-0.01061843 initial_value=-0.01061843 range=(-99999.9 99999.9)
            clamped=false
        SpatialTransform:
          TransformAxis rotation1: axis=(1 0 0) coordinates=bicpt2_r1
          TransformAxis rotation2: axis=(0 1 0) coordinates=bicpt2_r2
          TransformAxis rotation3: axis=(0 0 1) coordinates=bicpt2_r3
          TransformAxis translation1: axis=(1 0 0) coordinates=bicpt2_tx
          TransformAxis translation2: axis=(0 1 0) coordinates=bicpt2_ty
          TransformAxis translation3: axis=(0 0 1) coordinates=bicpt2_tz
    Body ptpt: mass=0.0001 mass_center=(0 0 0) inertia_xx=0.000010001 inertia_yy=0.000010001 inertia_zz=0.000010001
      CustomJoint ptpt: parent_body=ulna location_in_parent=(0 0 0) location=(0 0 0)
        Coordinate ptpt_r1: default_value=0 initial_value=0 range=(-99999.9 99999.9) clamped=false
        Coordinate ptpt_r2: default_value=0 initial_value=0 range=(-99999.9 99999.9) clamped=false
        Coordinate ptpt_r3: default_value=0 initial_value=0 range=(-99999.9 99999.9) clamped=false
        Coordinate ptpt_tx: default_value=0.00755 initial_value=0.00755 range=(-99999.9 99999.9) clamped=false
        Coordinate ptpt_ty: default_value=-0.0649 initial_value=-0.0649 range=(-99999.9 99999.9) clamped=false
        Coordinate ptpt_tz: default_value=-0.00005 initial_value=-0.00005 range=(-99999.9 99999.9) clamped=false
        SpatialTransform:
          TransformAxis rotation1: axis=(1 0 0) coordinates=ptpt_r1
          TransformAxis rotation2: axis=(0 1 0) coordinates=ptpt_r2
          TransformAxis rotation3: axis=(0 0 1) coordinates=ptpt_r3
          TransformAxis translation1: axis=(1 0 0) coordinates=ptpt_tx
          TransformAxis translation2: axis=(0 1 0) coordinates=ptpt_ty
          TransformAxis translation3: axis=(0 0 1) coordinates=ptpt_tz
    Body FCUpt: mass=0.0001 mass_center=(0 0 0) inertia_xx=0.000010001 inertia_yy=0.000010001 inertia_zz=0.000010001
      CustomJoint FCUpt: parent_body=radius location_in_parent=(0 0 0) location=(0 0 0)
        Coordinate FCUpt_r1: default_value=0 initial_value=0 range=(-99999.9 99999.9) clamped=false
        Coordinate FCUpt_r2: default_value=0 initial_value=0 range=(-99999.9 99999.9) clamped=false
        Coordinate FCUpt_r3: default_value=0 initial_value=0 range=(-99999.9 99999.9) clamped=false
        Coordinate FCUpt_tx: default_value=0.004 initial_value=0.004 range=(-99999.9 99999.9) clamped=false
        Coordinate FCUpt_ty: default_value=-0.1841 initial_value=-0.1841 range=(-99999.9 99999.9) clamped=false
        Coordinate FCUpt_tz: default_value=0.0005 initial_value=0.0005 range=(-99999.9 99999.9) clamped=false
        SpatialTransform:
          TransformAxis rotation1: axis=(1 0 0) coordinates=FCUpt_r1
          TransformAxis rotation2: axis=(0 1 0) coordinates=FCUpt_r2
          TransformAxis rotation3: axis=(0 0 1) coordinates=FCUpt_r3
          TransformAxis translation1: axis=(1 0 0) coordinates=FCUpt_tx
          TransformAxis translation2: axis=(0 1 0) coordinates=FCUpt_ty
          TransformAxis translation3: axis=(0 0 1) coordinates=FCUpt_tz
    Body EDCpt: mass=0.0001 mass_center=(0 0 0) inertia_xx=0.000010001 inertia_yy=0.000010001 inertia_zz=0.000010001
      CustomJoint EDCpt: parent_body=radius location_in_parent=(0 0 0) location=(0 0 0)
        Coordinate EDCpt_r1: default_value=0 initial_value=0 range=(-99999.9 99999.9) clamped=false
        Coordinate EDCpt_r2: default_value=0 initial_value=0 range=(-99999.9 99999.9) clamped=false
        Coordinate EDCpt_r3: default_value=0 initial_value=0 range=(-99999.9 99999.9) clamped=false
        Coordinate EDCpt_tx: default_value=0 initial_value=0 range=(-99999.9 99999.9) clamped=false
        Coordinate EDCpt_ty: default_value=0 initial_value=0 range=(-99999.9 99999.9) clamped=false
        Coordinate EDCpt_tz: default_value=0 initial_value=0 range=(-99999.9 99999.9) clamped=false
        SpatialTransform:
          TransformAxis rotation1: axis=(1 0 0) coordinates=EDCpt_r1
          TransformAxis rotation2: axis=(0 1 0) coordinates=EDCpt_r2
          TransformAxis rotation3: axis=(0 0 1) coordinates=EDCpt_r3
          TransformAxis translation1: axis=(1 0 0) coordinates=EDCpt_tx
          TransformAxis translation2: axis=(0 1 0) coordinates=EDCpt_ty
          TransformAxis translation3: axis=(0 0 1) coordinates=EDCpt_tz
    Body APLpt: mass=0.0001 mass_center=(0 0 0) inertia_xx=0.000010001 inertia_yy=0.000010001 inertia_zz=0.000010001
      CustomJoint APLpt: parent_body=hand location_in_parent=(0 0 0) location=(0 0 0)
        Coordinate APLpt_r1: default_value=0 initial_value=0 range=(-99999.9 99999.9) clamped=false
        Coordinate APLpt_r2: default_value=0 initial_value=0 range=(-99999.9 99999.9) clamped=false
        Coordinate APLpt_r3: default_value=0 initial_value=0 range=(-99999.9 99999.9) clamped=false
        Coordinate APLpt_tx: default_value=0 initial_value=0 range=(-99999.9 99999.9) clamped=false
        Coordinate APLpt_ty: default_value=0 initial_value=0 range=(-99999.9 99999.9) clamped=false
        Coordinate APLpt_tz: default_value=0 initial_value=0 range=(-99999.9 99999.9) clamped=false
        SpatialTransform:
          TransformAxis rotation1: axis=(1 0 0) coordinates=APLpt_r1
          TransformAxis rotation2: axis=(0 1 0) coordinates=APLpt_r2
          TransformAxis rotation3: axis=(0 0 1) coordinates=APLpt_r3
          TransformAxis translation1: axis=(1 0 0) coordinates=APLpt_tx
          TransformAxis translation2: axis=(0 1 0) coordinates=APLpt_ty
          TransformAxis translation3: axis=(0 0 1) coordinates=APLpt_tz
    Body FPLpt: mass=0.0001 mass_center=(0 0 0) inertia_xx=0.000010001 inertia_yy=0.000010001 inertia_zz=0.000010001
      CustomJoint FPLpt: parent_body=hand location_in_parent=(0 0 0) location=(0 0 0)
        Coordinate FPLpt_r1: default_value=0 initial_value=0 range=(-99999.9 99999.9) clamped=false
        Coordinate FPLpt_r2: default_value=0 initial_value=0 range=(-99999.9 99999.9) clamped=false
        Coordinate FPLpt_r3: default_value=0 initial_value=0 range=(-99999.9 99999.9) clamped=false
        Coordinate FPLpt_tx: default_value=0 initial_value=0 range=(-99999.9 99999.9) clamped=false
        Coordinate FPLpt_ty: default_value=0 initial_value=0 range=(-99999.9 99999.9) clamped=false
        Coordinate FPLpt_tz: default_value=0 initial_value=0 range=(-99999.9 99999.9) clamped=false
        SpatialTransform:
          TransformAxis rotation1: axis=(1 0 0) coordinates=FPLpt_r1
          TransformAxis rotation2: axis=(0 1 0) coordinates=FPLpt_r2
          TransformAxis rotation3: axis=(0 0 1) coordinates=FPLpt_r3
          TransformAxis translation1: axis=(1 0 0) coordinates=FPLpt_tx
          TransformAxis translation2: axis=(0 1 0) coordinates=FPLpt_ty
          TransformAxis translation3: axis=(0 0 1) coordinates=FPLpt_tz
    Body FPLpt2: mass=0.0001 mass_center=(0 0 0) inertia_xx=0.000010001 inertia_yy=0.000010001 inertia_zz=0.000010001
      WeldJoint FPLpt2: parent_body=hand location_in_parent=(0 0 0) location=(0 0 0)
    Body PEC1pt2: mass=0.0001 mass_center=(0 0 0) inertia_xx=0.00000001 inertia_yy=0.00000001 inertia_zz=0.00000001
      CustomJoint PEC1pt2: parent_body=humerus location_in_parent=(0 0 0) location=(0 0 0)
        Coordinate PEC1pt2_r1: default_value=0 initial_value=0 range=(-99999.9 99999.9) clamped=false
        Coordinate PEC1pt2_r2: default_value=0 initial_value=0 range=(-99999.9 99999.9) clamped=false
        Coordinate PEC1pt2_r3: default_value=0 initial_value=0 range=(-99999.9 99999.9) clamped=false
        Coordinate PEC1pt2_tx: default_value=0 initial_value=0 range=(-99999.9 99999.9) clamped=false
        Coordinate PEC1pt2_ty: default_value=0 initial_value=0 range=(-99999.9 99999.9) clamped=false
        Coordinate PEC1pt2_tz: default_value=0 initial_value=0 range=(-99999.9 99999.9) clamped=false
        SpatialTransform:
          TransformAxis rotation1: axis=(1 0 0) coordinates=PEC1pt2_r1
          TransformAxis rotation2: axis=(0 1 0) coordinates=PEC1pt2_r2
          TransformAxis rotation3: axis=(0 0 1) coordinates=PEC1pt2_r3
          TransformAxis translation1: axis=(1 0 0) coordinates=PEC1pt2_tx
          TransformAxis translation2: axis=(0 1 0) coordinates=PEC1pt2_ty
          TransformAxis translation3: axis=(0 0 1) coordinates=PEC1pt2_tz
    Body PEC1pt3: mass=0.0001 mass_center=(0 0 0) inertia_xx=0.00000001 inertia_yy=0.00000001 inertia_zz=0.00000001
      CustomJoint PEC1pt3: parent_body=thorax location_in_parent=(0 0 0) location=(0 0 0)
        Coordinate PEC1pt3_r1: default_value=0 initial_value=0 range=(-99999.9 99999.9) clamped=false
        Coordinate PEC1pt3_r2: default_value=0 initial_value=0 range=(-99999.9 99999.9) clamped=false
        Coordinate PEC1pt3_r3: default_value=0 initial_value=0 range=(-99999.9 99999.9) clamped=false
        Coordinate PEC1pt3_tx: default_value=0 initial_value=0 range=(-99999.9 99999.9) clamped=false
        Coordinate PEC1pt3_ty: default_value=0 initial_value=0 range=(-99999.9 99999.9) clamped=false
        Coordinate PEC1pt3_tz: default_value=0 initial_value=0 range=(-99999.9 99999.9) clamped=false
        SpatialTransform:
          TransformAxis rotation1: axis=(1 0 0) coordinates=PEC1pt3_r1
          TransformAxis rotation2: axis=(0 1 0) coordinates=PEC1pt3_r2
          TransformAxis rotation3: axis=(0 0 1) coordinates=PEC1pt3_r3
          TransformAxis translation1: axis=(1 0 0) coordinates=PEC1pt3_tx
          TransformAxis translation2: axis=(0 1 0) coordinates=PEC1pt3_ty
          TransformAxis translation3: axis=(0 0 1) coordinates=PEC1pt3_tz
    Body PEC2pt2: mass=0.0001 mass_center=(0 0 0) inertia_xx=0.00000001 inertia_yy=0.00000001 inertia_zz=0.00000001
      CustomJoint PEC2pt2: parent_body=humerus location_in_parent=(0 0 0) location=(0 0 0)
        Coordinate PEC2pt2_r1: default_value=0 initial_value=0 range=(-99999.9 99999.9) clamped=false
        Coordinate PEC2pt2_r2: default_value=0 initial_value=0 range=(-99999.9 99999.9) clamped=false
        Coordinate PEC2pt2_r3: default_value=0 initial_value=0 range=(-99999.9 99999.9) clamped=false
        Coordinate PEC2pt2_tx: default_value=0 initial_value=0 range=(-99999.9 99999.9) clamped=false
        Coordinate PEC2pt2_ty: default_value=0 initial_value=0 range=(-99999.9 99999.9) clamped=false
        Coordinate PEC2pt2_tz: default_value=0 initial_value=0 range=(-99999.9 99999.9) clamped=false
        SpatialTransform:
          TransformAxis rotation1: axis=(1 0 0) coordinates=PEC2pt2_r1
          TransformAxis rotation2: axis=(0 1 0) coordinates=PEC2pt2_r2
          TransformAxis rotation3: axis=(0 0 1) coordinates=PEC2pt2_r3
          TransformAxis translation1: axis=(1 0 0) coordinates=PEC2pt2_tx
          TransformAxis translation2: axis=(0 1 0) coordinates=PEC2pt2_ty
          TransformAxis translation3: axis=(0 0 1) coordinates=PEC2pt2_tz
    Body PEC2pt3: mass=0.0001 mass_center=(0 0 0) inertia_xx=0.00000001 inertia_yy=0.00000001 inertia_zz=0.00000001
      CustomJoint PEC2pt3: parent_body=thorax location_in_parent=(0 0 0) location=(0 0 0)
        Coordinate PEC2pt3_r1: default_value=0 initial_value=0 range=(-99999.9 99999.9) clamped=false
        Coordinate PEC2pt3_r2: default_value=0 initial_value=0 range=(-99999.9 99999.9) clamped=false
        Coordinate PEC2pt3_r3: default_value=0 initial_value=0 range=(-99999.9 99999.9) clamped=false
        Coordinate PEC2pt3_tx: default_value=0 initial_value=0 range=(-99999.9 99999.9) clamped=false
        Coordinate PEC2pt3_ty: default_value=0 initial_value=0 range=(-99999.9 99999.9) clamped=false
        Coordinate PEC2pt3_tz: default_value=0 initial_value=0 range=(-99999.9 99999.9) clamped=false
        SpatialTransform:
          TransformAxis rotation1: axis=(1 0 0) coordinates=PEC2pt3_r1
          TransformAxis rotation2: axis=(0 1 0) coordinates=PEC2pt3_r2
          TransformAxis rotation3: axis=(0 0 1) coordinates=PEC2pt3_r3
          TransformAxis translation1: axis=(1 0 0) coordinates=PEC2pt3_tx
          TransformAxis translation2: axis=(0 1 0) coordinates=PEC2pt3_ty
          TransformAxis translation3: axis=(0 0 1) coordinates=PEC2pt3_tz
    Body PEC3pt2: mass=0.0001 mass_center=(0 0 0) inertia_xx=0.00000001 inertia_yy=0.00000001 inertia_zz=0.00000001
      CustomJoint PEC3pt2: parent_body=humerus location_in_parent=(0 0 0) location=(0 0 0)
        Coordinate PEC3pt2_r1: default_value=0 initial_value=0 range=(-99999.9 99999.9) clamped=false
        Coordinate PEC3pt2_r2: default_value=0 initial_value=0 range=(-99999.9 99999.9) clamped=false
        Coordinate PEC3pt2_r3: default_value=0 initial_value=0 range=(-99999.9 99999.9) clamped=false
        Coordinate PEC3pt2_tx: default_value=0 initial_value=0 range=(-99999.9 99999.9) clamped=false
        Coordinate PEC3pt2_ty: default_value=0 initial_value=0 range=(-99999.9 99999.9) clamped=false
        Coordinate PEC3pt2_tz: default_value=0 initial_value=0 range=(-99999.9 99999.9) clamped=false
        SpatialTransform:
          TransformAxis rotation1: axis=(1 0 0) coordinates=PEC3pt2_r1
          TransformAxis rotation2: axis=(0 1 0) coordinates=PEC3pt2_r2
          TransformAxis rotation3: axis=(0 0 1) coordinates=PEC3pt2_r3
          TransformAxis translation1: axis=(1 0 0) coordinates=PEC3pt2_tx
          TransformAxis translation2: axis=(0 1 0) coordinates=PEC3pt2_ty
          TransformAxis translation3: axis=(0 0 1) coordinates=PEC3pt2_tz
    Body PEC3pt3: mass=0.0001 mass_center=(0 0 0) inertia_xx=0.00000001 inertia_yy=0.00000001 inertia_zz=0.00000001
      CustomJoint PEC3pt3: parent_body=thorax location_in_parent=(0 0 0) location=(0 0 0)
        Coordinate PEC3pt3_ty: default_value=0.000225322 initial_value=0.000225322 range=(-99999.9 99999.9)
            clamped=false
        SpatialTransform: axes_held_at_zero=(rotation1 rotation2 rotation3 translation1 translation3)
          TransformAxis translation2: axis=(0 1 0) coordinates=PEC3pt3_ty
    Body DELT2pt2a: mass=0.0001 mass_center=(0 0 0) inertia_xx=0.00000001 inertia_yy=0.00000001 inertia_zz=0.00000001
      CustomJoint DELT2pt2a: parent_body=humerus location_in_parent=(0 0 0) location=(0 0 0)
        Coordinate DELT2pt2a_r1: default_value=0 initial_value=0 range=(-99999.9 99999.9) clamped=false
        Coordinate DELT2pt2a_r2: default_value=0 initial_value=0 range=(-99999.9 99999.9) clamped=false
        Coordinate DELT2pt2a_r3: default_value=0 initial_value=0 range=(-99999.9 99999.9) clamped=false
        Coordinate DELT2pt2a_tx: default_value=0 initial_value=0 range=(-99999.9 99999.9) clamped=false
        Coordinate DELT2pt2a_ty: default_value=0 initial_value=0 range=(-99999.9 99999.9) clamped=false
        Coordinate DELT2pt2a_tz: default_value=0 initial_value=0 range=(-99999.9 99999.9) clamped=false
        SpatialTransform:
          TransformAxis rotation1: axis=(1 0 0) coordinates=DELT2pt2a_r1
          TransformAxis rotation2: axis=(0 1 0) coordinates=DELT2pt2a_r2
          TransformAxis rotation3: axis=(0 0 1) coordinates=DELT2pt2a_r3
          TransformAxis translation1: axis=(1 0 0) coordinates=DELT2pt2a_tx
          TransformAxis translation2: axis=(0 1 0) coordinates=DELT2pt2a_ty
          TransformAxis translation3: axis=(0 0 1) coordinates=DELT2pt2a_tz
    Body DELT2pt2: mass=0.0001 mass_center=(0 0 0) inertia_xx=0.00000001 inertia_yy=0.00000001 inertia_zz=0.00000001
      CustomJoint DELT2pt2: parent_body=DELT2pt2a location_in_parent=(0 0 0) location=(0 0 0)
        Coordinate DELT2pt2_r1: default_value=0 initial_value=0 range=(-99999.9 99999.9) clamped=false
        Coordinate DELT2pt2_r2: default_value=0 initial_value=0 range=(-99999.9 99999.9) clamped=false
        Coordinate DELT2pt2_r3: default_value=0 initial_value=0 range=(-99999.9 99999.9) clamped=false
        Coordinate DELT2pt2_tx: default_value=-0.0004399096 initial_value=-0.0004399096 range=(-99999.9 99999.9)
            clamped=false
        Coordinate DELT2pt2_ty: default_value=0 initial_value=0 range=(-99999.9 99999.9) clamped=false
        Coordinate DELT2pt2_tz: default_value=0 initial_value=0 range=(-99999.9 99999.9) clamped=false
        SpatialTransform:
          TransformAxis rotation1: axis=(1 0 0) coordinates=DELT2pt2_r1
          TransformAxis rotation2: axis=(0 1 0) coordinates=DELT2pt2_r2
          TransformAxis rotation3: axis=(0 0 1) coordinates=DELT2pt2_r3
          TransformAxis translation1: axis=(1 0 0) coordinates=DELT2pt2_tx
          TransformAxis translation2: axis=(0 1 0) coordinates=DELT2pt2_ty
          TransformAxis translation3: axis=(0 0 1) coordinates=DELT2pt2_tz
    Body LAT1pt2: mass=0.0001 mass_center=(0 0 0) inertia_xx=0.00000001 inertia_yy=0.00000001 inertia_zz=0.00000001
      CustomJoint LAT1pt2: parent_body=scapula location_in_parent=(0 0 0) location=(0 0 0)
        Coordinate LAT1pt2_r1: default_value=0 initial_value=0 range=(-99999.9 99999.9) clamped=false
        Coordinate LAT1pt2_r2: default_value=0 initial_value=0 range=(-99999.9 99999.9) clamped=false
        Coordinate LAT1pt2_r3: default_value=0 initial_value=0 range=(-99999.9 99999.9) clamped=false
        Coordinate LAT1pt2_tx: default_value=0 initial_value=0 range=(-99999.9 99999.9) clamped=false
        Coordinate LAT1pt2_ty: default_value=0 initial_value=0 range=(-99999.9 99999.9) clamped=false
        Coordinate LAT1pt2_tz: default_value=0 initial_value=0 range=(-99999.9 99999.9) clamped=false
        SpatialTransform:
          TransformAxis rotation1: axis=(1 0 0) coordinates=LAT1pt2_r1
          TransformAxis rotation2: axis=(0 1 0) coordinates=LAT1pt2_r2
          TransformAxis rotation3: axis=(0 0 1) coordinates=LAT1pt2_r3
          TransformAxis translation1: axis=(1 0 0) coordinates=LAT1pt2_tx
          TransformAxis translation2: axis=(0 1 0) coordinates=LAT1pt2_ty
          TransformAxis translation3: axis=(0 0 1) coordinates=LAT1pt2_tz
    Body LAT1pt3: mass=0.0001 mass_center=(0 0 0) inertia_xx=0.00000001 inertia_yy=0.00000001 inertia_zz=0.00000001
      CustomJoint LAT1pt3: parent_body=scapula location_in_parent=(0 0 0) location=(0 0 0)
        Coordinate LAT1pt3_r1: default_value=0 initial_value=0 range=(-99999.9 99999.9) clamped=false
        Coordinate LAT1pt3_r2: default_value=0 initial_value=0 range=(-99999.9 99999.9) clamped=false
        Coordinate LAT1pt3_r3: default_value=0 initial_value=0 range=(-99999.9 99999.9) clamped=false
        Coordinate LAT1pt3_tx: default_value=0 initial_value=0 range=(-99999.9 99999.9) clamped=false
        Coordinate LAT1pt3_ty: default_value=0 initial_value=0 range=(-99999.9 99999.9) clamped=false
        Coordinate LAT1pt3_tz: default_value=0 initial_value=0 range=(-99999.9 99999.9) clamped=false
        SpatialTransform:
          TransformAxis rotation1: axis=(1 0 0) coordinates=LAT1pt3_r1
          TransformAxis rotation2: axis=(0 1 0) coordinates=LAT1pt3_r2
          TransformAxis rotation3: axis=(0 0 1) coordinates=LAT1pt3_r3
          TransformAxis translation1: axis=(1 0 0) coordinates=LAT1pt3_tx
          TransformAxis translation2: axis=(0 1 0) coordinates=LAT1pt3_ty
          TransformAxis translation3: axis=(0 0 1) coordinates=LAT1pt3_tz
    Body LAT2pt2: mass=0.0001 mass_center=(0 0 0) inertia_xx=0.00000001 inertia_yy=0.00000001 inertia_zz=0.00000001
      CustomJoint LAT2pt2: parent_body=scapula location_in_parent=(0 0 0) location=(0 0 0)
        Coordinate LAT2pt2_r1: default_value=0 initial_value=0 range=(-99999.9 99999.9) clamped=false
        Coordinate LAT2pt2_r2: default_value=0 initial_value=0 range=(-99999.9 99999.9) clamped=false
        Coordinate LAT2pt2_r3: default_value=0 initial_value=0 range=(-99999.9 99999.9) clamped=false
        Coordinate LAT2pt2_tx: default_value=0 initial_value=0 range=(-99999.9 99999.9) clamped=false
        Coordinate LAT2pt2_ty: default_value=0 initial_value=0 range=(-99999.9 99999.9) clamped=false
        Coordinate LAT2pt2_tz: default_value=0 initial_value=0 range=(-99999.9 99999.9) clamped=false
        SpatialTransform:
          TransformAxis rotation1: axis=(1 0 0) coordinates=LAT2pt2_r1
          TransformAxis rotation2: axis=(0 1 0) coordinates=LAT2pt2_r2
          TransformAxis rotation3: axis=(0 0 1) coordinates=LAT2pt2_r3
          TransformAxis translation1: axis=(1 0 0) coordinates=LAT2pt2_tx
          TransformAxis translation2: axis=(0 1 0) coordinates=LAT2pt2_ty
          TransformAxis translation3: axis=(0 0 1) coordinates=LAT2pt2_tz
    Body LAT2pt3: mass=0.0001 mass_center=(0 0 0) inertia_xx=0.00000001 inertia_yy=0.00000001 inertia_zz=0.00000001
      CustomJoint LAT2pt3: parent_body=scapula location_in_parent=(0 0 0) location=(0 0 0)
        Coordinate LAT2pt3_r1: default_value=0 initial_value=0 range=(-99999.9 99999.9) clamped=false
        Coordinate LAT2pt3_r2: default_value=0 initial_value=0 range=(-99999.9 99999.9) clamped=false
        Coordinate LAT2pt3_r3: default_value=0 initial_value=0 range=(-99999.9 99999.9) clamped=false
        Coordinate LAT2pt3_tx: default_value=0 initial_value=0 range=(-99999.9 99999.9) clamped=false
        Coordinate LAT2pt3_ty: default_value=0 initial_value=0 range=(-99999.9 99999.9) clamped=false
        Coordinate LAT2pt3_tz: default_value=0 initial_value=0 range=(-99999.9 99999.9) clamped=false
        SpatialTransform:
          TransformAxis rotation1: axis=(1 0 0) coordinates=LAT2pt3_r1
          TransformAxis rotation2: axis=(0 1 0) coordinates=LAT2pt3_r2
          TransformAxis rotation3: axis=(0 0 1) coordinates=LAT2pt3_r3
          TransformAxis translation1: axis=(1 0 0) coordinates=LAT2pt3_tx
          TransformAxis translation2: axis=(0 1 0) coordinates=LAT2pt3_ty
          TransformAxis translation3: axis=(0 0 1) coordinates=LAT2pt3_tz
    Body LAT3pt2: mass=0.0001 mass_center=(0 0 0) inertia_xx=0.00000001 inertia_yy=0.00000001 inertia_zz=0.00000001
      CustomJoint LAT3pt2: parent_body=scapula location_in_parent=(0 0 0) location=(0 0 0)
        Coordinate LAT3pt2_r1: default_value=0 initial_value=0 range=(-99999.9 99999.9) clamped=false
        Coordinate LAT3pt2_r2: default_value=0 initial_value=0 range=(-99999.9 99999.9) clamped=false
        Coordinate LAT3pt2_r3: default_value=0 initial_value=0 range=(-99999.9 99999.9) clamped=false
        Coordinate LAT3pt2_tx: default_value=0 initial_value=0 range=(-99999.9 99999.9) clamped=false
        Coordinate LAT3pt2_ty: default_value=0 initial_value=0 range=(-99999.9 99999.9) clamped=false
        Coordinate LAT3pt2_tz: default_value=0 initial_value=0 range=(-99999.9 99999.9) clamped=false
        SpatialTransform:
          TransformAxis rotation1: axis=(1 0 0) coordinates=LAT3pt2_r1
          TransformAxis rotation2: axis=(0 1 0) coordinates=LAT3pt2_r2
          TransformAxis rotation3: axis=(0 0 1) coordinates=LAT3pt2_r3
          TransformAxis translation1: axis=(1 0 0) coordinates=LAT3pt2_tx
          TransformAxis translation2: axis=(0 1 0) coordinates=LAT3pt2_ty
          TransformAxis translation3: axis=(0 0 1) coordinates=LAT3pt2_tz
    Body LAT3pt3: mass=0.0001 mass_center=(0 0 0) inertia_xx=0.00000001 inertia_yy=0.00000001 inertia_zz=0.00000001
      CustomJoint LAT3pt3: parent_body=scapula location_in_parent=(0 0 0) location=(0 0 0)
        Coordinate LAT3pt3_r1: default_value=0 initial_value=0 range=(-99999.9 99999.9) clamped=false
        Coordinate LAT3pt3_r2: default_value=0 initial_value=0 range=(-99999.9 99999.9) clamped=false
        Coordinate LAT3pt3_r3: default_value=0 initial_value=0 range=(-99999.9 99999.9) clamped=false
        Coordinate LAT3pt3_tx: default_value=0 initial_value=0 range=(-99999.9 99999.9) clamped=false
        Coordinate LAT3pt3_ty: default_value=0 initial_value=0 range=(-99999.9 99999.9) clamped=false
        Coordinate LAT3pt3_tz: default_value=0 initial_value=0 range=(-99999.9 99999.9) clamped=false
        SpatialTransform:
          TransformAxis rotation1: axis=(1 0 0) coordinates=LAT3pt3_r1
          TransformAxis rotation2: axis=(0 1 0) coordinates=LAT3pt3_r2
          TransformAxis rotation3: axis=(0 0 1) coordinates=LAT3pt3_r3
          TransformAxis translation1: axis=(1 0 0) coordinates=LAT3pt3_tx
          TransformAxis translation2: axis=(0 1 0) coordinates=LAT3pt3_ty
          TransformAxis translation3: axis=(0 0 1) coordinates=LAT3pt3_tz
  ConstraintSet:
    CoordinateCouplerConstraint sternoclavicular_r2_con: dependent_coordinate_name=sternoclavicular_r2
        independent_coordinate_names=shoulder_elv
      coupled_coordinates_function f0:
        NaturalCubicSpline: x=(0 2.617994) y=(0 -0.6335545)
    CoordinateCouplerConstraint sternoclavicular_r3_con: dependent_coordinate_name=sternoclavicular_r3
        independent_coordinate_names=shoulder_elv
      coupled_coordinates_function f1:
        NaturalCubicSpline: x=(0 3.141593) y=(0 0.3220132)
    CoordinateCouplerConstraint unrotscap_r2_con: dependent_coordinate_name=unrotscap_r2
        independent_coordinate_names=shoulder_elv
      coupled_coordinates_function f2:
        NaturalCubicSpline: x=(0 2.617994) y=(0 0.6335545)
    CoordinateCouplerConstraint unrotscap_r3_con: dependent_coordinate_name=unrotscap_r3
        independent_coordinate_names=shoulder_elv
      coupled_coordinates_function f3:
        NaturalCubicSpline: x=(0 3.141593) y=(0 -0.3220132)
    CoordinateCouplerConstraint acromioclavicular_r1_con: dependent_coordinate_name=acromioclavicular_r1
        independent_coordinate_names=shoulder_elv
      coupled_coordinates_function f4:
        NaturalCubicSpline: x=(0 2.617994) y=(0 0.4660029)
    CoordinateCouplerConstraint acromioclavicular_r2_con: dependent_coordinate_name=acromioclavicular_r2
        independent_coordinate_names=shoulder_elv
      coupled_coordinates_function f5:
        NaturalCubicSpline: x=(0 2.617994) y=(0 -0.1282817)
    CoordinateCouplerConstraint acromioclavicular_r3_con: dependent_coordinate_name=acromioclavicular_r3
        independent_coordinate_names=shoulder_elv
      coupled_coordinates_function f6:
        NaturalCubicSpline: x=(0 2.617994) y=(0 1.036726)
    CoordinateCouplerConstraint unrothum_r1_con: dependent_coordinate_name=unrothum_r1
        independent_coordinate_names=shoulder_elv
      coupled_coordinates_function f7:
        NaturalCubicSpline: x=(0 2.617994) y=(0 -0.4660029)
    CoordinateCouplerConstraint unrothum_r2_con: dependent_coordinate_name=unrothum_r2
        independent_coordinate_names=shoulder_elv
      coupled_coordinates_function f8:
        NaturalCubicSpline: x=(0 2.617994) y=(0 0.1282817)
    CoordinateCouplerConstraint unrothum_r3_con: dependent_coordinate_name=unrothum_r3
        independent_coordinate_names=shoulder_elv
      coupled_coordinates_function f9:
        NaturalCubicSpline: x=(0 2.617994) y=(0 -1.036726)
    CoordinateCouplerConstraint shoulder1_r2_con: dependent_coordinate_name=shoulder1_r2
        independent_coordinate_names=elv_angle
      coupled_coordinates_function f11:
        NaturalCubicSpline: x=(-1.570796 3.141593) y=(1.570796 -3.141593)
    CoordinateCouplerConstraint wrist_hand_r1_con: dependent_coordinate_name=wrist_hand_r1
        independent_coordinate_names=deviation
      coupled_coordinates_function f18:
        NaturalCubicSpline: x=(-0.1745329 0 0.4363323) y=(-0.2617994 0 0.4363323)
    CoordinateCouplerConstraint wrist_hand_r3_con: dependent_coordinate_name=wrist_hand_r3
        independent_coordinate_names=proximal_flexion
      coupled_coordinates_function f19: LinearFunction(coefficients=1 0)
    CoordinateCouplerConstraint bicpt_r1_con: dependent_coordinate_name=bicpt_r1
        independent_coordinate_names=elbow_flexion
      coupled_coordinates_function f300:
        NaturalCubicSpline: x=(-6.283185 6.283185) y=(0 0)
    CoordinateCouplerConstraint bicpt_r2_con: dependent_coordinate_name=bicpt_r2
        independent_coordinate_names=elbow_flexion
      coupled_coordinates_function f300:
        NaturalCubicSpline: x=(-6.283185 6.283185) y=(0 0)
    CoordinateCouplerConstraint bicpt_r3_con: dependent_coordinate_name=bicpt_r3
        independent_coordinate_names=elbow_flexion
      coupled_coordinates_function f300:
        NaturalCubicSpline: x=(-6.283185 6.283185) y=(0 0)
    CoordinateCouplerConstraint bicpt_tx_con: dependent_coordinate_name=bicpt_tx
        independent_coordinate_names=elbow_flexion
      coupled_coordinates_function f70:
        NaturalCubicSpline: x=(0 2.268928) y=(-0.0001 0.0042)
    CoordinateCouplerConstraint bicpt_ty_con: dependent_coordinate_name=bicpt_ty
        independent_coordinate_names=elbow_flexion
      coupled_coordinates_function f71:
        NaturalCubicSpline: x=(0 2.268928) y=(-0.0276 -0.0425)
    CoordinateCouplerConstraint bicpt_tz_con: dependent_coordinate_name=bicpt_tz
        independent_coordinate_names=elbow_flexion
      coupled_coordinates_function f72:
        NaturalCubicSpline: x=(0 2.268928) y=(-0.0043 -0.0067)
    CoordinateCouplerConstraint bicpt2_r1_con: dependent_coordinate_name=bicpt2_r1
        independent_coordinate_names=elbow_flexion
      coupled_coordinates_function f300:
        NaturalCubicSpline: x=(-6.283185 6.283185) y=(0 0)
    CoordinateCouplerConstraint bicpt2_r2_con: dependent_coordinate_name=bicpt2_r2
        independent_coordinate_names=elbow_flexion
      coupled_coordinates_function f300:
        NaturalCubicSpline: x=(-6.283185 6.283185) y=(0 0)
    CoordinateCouplerConstraint bicpt2_r3_con: dependent_coordinate_name=bicpt2_r3
        independent_coordinate_names=elbow_flexion
      coupled_coordinates_function f300:
        NaturalCubicSpline: x=(-6.283185 6.283185) y=(0 0)
    CoordinateCouplerConstraint bicpt2_tx_con: dependent_coordinate_name=bicpt2_tx independent_coordinate_names=pro_sup
      coupled_coordinates_function f80:
        NaturalCubicSpline: x=(-1.570796 -0.6108652 1.578228) y=(-0.003 0.01 0.01376)
    CoordinateCouplerConstraint bicpt2_ty_con: dependent_coordinate_name=bicpt2_ty
        independent_coordinate_names=elbow_flexion
      coupled_coordinates_function f81:
        NaturalCubicSpline: x=(0 2.274834) y=(-0.0102 -0.045607)
    CoordinateCouplerConstraint bicpt2_tz_con: dependent_coordinate_name=bicpt2_tz independent_coordinate_names=pro_sup
      coupled_coordinates_function f82:
        NaturalCubicSpline: x=(-1.570796 -0.6108652 1.575614) y=(-0.0095 -0.011533 -0.000331)
    CoordinateCouplerConstraint ptpt_r1_con: dependent_coordinate_name=ptpt_r1 independent_coordinate_names=pro_sup
      coupled_coordinates_function f300:
        NaturalCubicSpline: x=(-6.283185 6.283185) y=(0 0)
    CoordinateCouplerConstraint ptpt_r2_con: dependent_coordinate_name=ptpt_r2 independent_coordinate_names=pro_sup
      coupled_coordinates_function f300:
        NaturalCubicSpline: x=(-6.283185 6.283185) y=(0 0)
    CoordinateCouplerConstraint ptpt_r3_con: dependent_coordinate_name=ptpt_r3 independent_coordinate_names=pro_sup
      coupled_coordinates_function f300:
        NaturalCubicSpline: x=(-6.283185 6.283185) y=(0 0)
    CoordinateCouplerConstraint ptpt_tx_con: dependent_coordinate_name=ptpt_tx independent_coordinate_names=pro_sup
      coupled_coordinates_function f90:
        NaturalCubicSpline: x=(-1.570796 1.570796) y=(0.0142 0.0009)
    CoordinateCouplerConstraint ptpt_ty_con: dependent_coordinate_name=ptpt_ty independent_coordinate_names=pro_sup
      coupled_coordinates_function f91:
        NaturalCubicSpline: x=(-1.570796 1.570796) y=(-0.0606 -0.0692)
    CoordinateCouplerConstraint ptpt_tz_con: dependent_coordinate_name=ptpt_tz independent_coordinate_names=pro_sup
      coupled_coordinates_function f92:
        NaturalCubicSpline: x=(-1.570796 1.570796) y=(0.0072 -0.0073)
    CoordinateCouplerConstraint FCUpt_r1_con: dependent_coordinate_name=FCUpt_r1 independent_coordinate_names=pro_sup
      coupled_coordinates_function f300:
        NaturalCubicSpline: x=(-6.283185 6.283185) y=(0 0)
    CoordinateCouplerConstraint FCUpt_r2_con: dependent_coordinate_name=FCUpt_r2 independent_coordinate_names=pro_sup
      coupled_coordinates_function f300:
        NaturalCubicSpline: x=(-6.283185 6.283185) y=(0 0)
    CoordinateCouplerConstraint FCUpt_r3_con: dependent_coordinate_name=FCUpt_r3 independent_coordinate_names=pro_sup
      coupled_coordinates_function f300:
        NaturalCubicSpline: x=(-6.283185 6.283185) y=(0 0)
    CoordinateCouplerConstraint FCUpt_tx_con: dependent_coordinate_name=FCUpt_tx independent_coordinate_names=pro_sup
      coupled_coordinates_function f100:
        NaturalCubicSpline: x=(-1.570796 0 1.570796) y=(-0.0027 0.004 0.0132)
    CoordinateCouplerConstraint FCUpt_ty_con: dependent_coordinate_name=FCUpt_ty independent_coordinate_names=pro_sup
      coupled_coordinates_function f101:
        NaturalCubicSpline: x=(-1.570796 0 1.570796) y=(-0.1838 -0.1841 -0.1821)
    CoordinateCouplerConstraint FCUpt_tz_con: dependent_coordinate_name=FCUpt_tz independent_coordinate_names=pro_sup
      coupled_coordinates_function f102:
        NaturalCubicSpline: x=(-1.570796 0 1.570796) y=(0.0069 0.0005 0.0002)
    CoordinateCouplerConstraint EDCpt_r1_con: dependent_coordinate_name=EDCpt_r1 independent_coordinate_names=pro_sup
      coupled_coordinates_function f300:
        NaturalCubicSpline: x=(-6.283185 6.283185) y=(0 0)
    CoordinateCouplerConstraint EDCpt_r2_con: dependent_coordinate_name=EDCpt_r2 independent_coordinate_names=pro_sup
      coupled_coordinates_function f300:
        NaturalCubicSpline: x=(-6.283185 6.283185) y=(0 0)
    CoordinateCouplerConstraint EDCpt_r3_con: dependent_coordinate_name=EDCpt_r3 independent_coordinate_names=pro_sup
      coupled_coordinates_function f300:
        NaturalCubicSpline: x=(-6.283185 6.283185) y=(0 0)
    CoordinateCouplerConstraint EDCpt_tx_con: dependent_coordinate_name=EDCpt_tx independent_coordinate_names=pro_sup
      coupled_coordinates_function f110:
        NaturalCubicSpline: x=(-1.570796 0 1.570796) y=(0.0108 0 -0.0108)
    CoordinateCouplerConstraint EDCpt_ty_con: dependent_coordinate_name=EDCpt_ty independent_coordinate_names=pro_sup
      coupled_coordinates_function f111:
        NaturalCubicSpline: x=(-1.570796 0 1.570796) y=(-0.0013 0 0.0038)
    CoordinateCouplerConstraint EDCpt_tz_con: dependent_coordinate_name=EDCpt_tz independent_coordinate_names=pro_sup
      coupled_coordinates_function f112:
        NaturalCubicSpline: x=(-1.570796 0 1.570796) y=(-0.0035 0 -0.00089)
    CoordinateCouplerConstraint APLpt_r1_con: dependent_coordinate_name=APLpt_r1
        independent_coordinate_names=proximal_flexion
      coupled_coordinates_function f300:
        NaturalCubicSpline: x=(-6.283185 6.283185) y=(0 0)
    CoordinateCouplerConstraint APLpt_r2_con: dependent_coordinate_name=APLpt_r2
        independent_coordinate_names=proximal_flexion
      coupled_coordinates_function f300:
        NaturalCubicSpline: x=(-6.283185 6.283185) y=(0 0)
    CoordinateCouplerConstraint APLpt_r3_con: dependent_coordinate_name=APLpt_r3
        independent_coordinate_names=proximal_flexion
      coupled_coordinates_function f300:
        NaturalCubicSpline: x=(-6.283185 6.283185) y=(0 0)
    CoordinateCouplerConstraint APLpt_tx_con: dependent_coordinate_name=APLpt_tx
        independent_coordinate_names=proximal_flexion
      coupled_coordinates_function f120:
        NaturalCubicSpline: x=(-0.6108652 0 0.6108652) y=(0 0 -0.0025)
    CoordinateCouplerConstraint APLpt_ty_con: dependent_coordinate_name=APLpt_ty
        independent_coordinate_names=proximal_flexion
      coupled_coordinates_function f121:
        NaturalCubicSpline: x=(-0.6108652 0 0.6108652) y=(0 0 -0.001)
    CoordinateCouplerConstraint APLpt_tz_con: dependent_coordinate_name=APLpt_tz
        independent_coordinate_names=proximal_flexion
      coupled_coordinates_function f122:
        NaturalCubicSpline: x=(-0.6108652 0 0.6108652) y=(0 0 -0.005)
    CoordinateCouplerConstraint FPLpt_r1_con: dependent_coordinate_name=FPLpt_r1
        independent_coordinate_names=proximal_flexion
      coupled_coordinates_function f300:
        NaturalCubicSpline: x=(-6.283185 6.283185) y=(0 0)
    CoordinateCouplerConstraint FPLpt_r2_con: dependent_coordinate_name=FPLpt_r2
        independent_coordinate_names=proximal_flexion
      coupled_coordinates_function f300:
        NaturalCubicSpline: x=(-6.283185 6.283185) y=(0 0)
    CoordinateCouplerConstraint FPLpt_r3_con: dependent_coordinate_name=FPLpt_r3
        independent_coordinate_names=proximal_flexion
      coupled_coordinates_function f300:
        NaturalCubicSpline: x=(-6.283185 6.283185) y=(0 0)
    CoordinateCouplerConstraint FPLpt_tx_con: dependent_coordinate_name=FPLpt_tx
        independent_coordinate_names=proximal_flexion
      coupled_coordinates_function f130:
        NaturalCubicSpline: x=(-0.6108652 0 0.6108652) y=(0 0 -0.0032)
    CoordinateCouplerConstraint FPLpt_ty_con: dependent_coordinate_name=FPLpt_ty
        independent_coordinate_names=proximal_flexion
      coupled_coordinates_function f131:
        NaturalCubicSpline: x=(-0.6108652 0 0.6108652) y=(0 0 -0.0096)
    CoordinateCouplerConstraint FPLpt_tz_con: dependent_coordinate_name=FPLpt_tz
        independent_coordinate_names=proximal_flexion
      coupled_coordinates_function f132:
        NaturalCubicSpline: x=(-0.6108652 0 0.6108652) y=(0 0 -0.0054)
    CoordinateCouplerConstraint PEC1pt2_r1_con: dependent_coordinate_name=PEC1pt2_r1
        independent_coordinate_names=shoulder_elv
      coupled_coordinates_function f300:
        NaturalCubicSpline: x=(-6.283185 6.283185) y=(0 0)
    CoordinateCouplerConstraint PEC1pt2_r2_con: dependent_coordinate_name=PEC1pt2_r2
        independent_coordinate_names=shoulder_elv
      coupled_coordinates_function f300:
        NaturalCubicSpline: x=(-6.283185 6.283185) y=(0 0)
    CoordinateCouplerConstraint PEC1pt2_r3_con: dependent_coordinate_name=PEC1pt2_r3
        independent_coordinate_names=shoulder_elv
      coupled_coordinates_function f300:
        NaturalCubicSpline: x=(-6.283185 6.283185) y=(0 0)
    CoordinateCouplerConstraint PEC1pt2_tx_con: dependent_coordinate_name=PEC1pt2_tx
        independent_coordinate_names=shoulder_elv
      coupled_coordinates_function f150:
        NaturalCubicSpline: x=(0 3.141593) y=(0 0.0059)
    CoordinateCouplerConstraint PEC1pt2_ty_con: dependent_coordinate_name=PEC1pt2_ty
        independent_coordinate_names=shoulder_elv
      coupled_coordinates_function f151:
        NaturalCubicSpline: x=(0 3.141593) y=(0 0.0207)
    CoordinateCouplerConstraint PEC1pt2_tz_con: dependent_coordinate_name=PEC1pt2_tz
        independent_coordinate_names=shoulder_elv
      coupled_coordinates_function f152:
        NaturalCubicSpline: x=(0 3.141593) y=(0 0.0144)
    CoordinateCouplerConstraint PEC1pt3_r1_con: dependent_coordinate_name=PEC1pt3_r1
        independent_coordinate_names=shoulder_elv
      coupled_coordinates_function f300:
        NaturalCubicSpline: x=(-6.283185 6.283185) y=(0 0)
    CoordinateCouplerConstraint PEC1pt3_r2_con: dependent_coordinate_name=PEC1pt3_r2
        independent_coordinate_names=shoulder_elv
      coupled_coordinates_function f300:
        NaturalCubicSpline: x=(-6.283185 6.283185) y=(0 0)
    CoordinateCouplerConstraint PEC1pt3_r3_con: dependent_coordinate_name=PEC1pt3_r3
        independent_coordinate_names=shoulder_elv
      coupled_coordinates_function f300:
        NaturalCubicSpline: x=(-6.283185 6.283185) y=(0 0)
    CoordinateCouplerConstraint PEC1pt3_tx_con: dependent_coordinate_name=PEC1pt3_tx
        independent_coordinate_names=shoulder_elv
      coupled_coordinates_function f160:
        NaturalCubicSpline: x=(0 3.141593) y=(0 -0.0193)
    CoordinateCouplerConstraint PEC1pt3_ty_con: dependent_coordinate_name=PEC1pt3_ty
        independent_coordinate_names=shoulder_elv
      coupled_coordinates_function f161:
        NaturalCubicSpline: x=(0 3.141593) y=(0 0.0466)
    CoordinateCouplerConstraint PEC1pt3_tz_con: dependent_coordinate_name=PEC1pt3_tz
        independent_coordinate_names=shoulder_elv
      coupled_coordinates_function f162:
        NaturalCubicSpline: x=(0 3.141593) y=(0 -0.0442)
    CoordinateCouplerConstraint PEC2pt2_r1_con: dependent_coordinate_name=PEC2pt2_r1
        independent_coordinate_names=shoulder_elv
      coupled_coordinates_function f300:
        NaturalCubicSpline: x=(-6.283185 6.283185) y=(0 0)
    CoordinateCouplerConstraint PEC2pt2_r2_con: dependent_coordinate_name=PEC2pt2_r2
        independent_coordinate_names=shoulder_elv
      coupled_coordinates_function f300:
        NaturalCubicSpline: x=(-6.283185 6.283185) y=(0 0)
    CoordinateCouplerConstraint PEC2pt2_r3_con: dependent_coordinate_name=PEC2pt2_r3
        independent_coordinate_names=shoulder_elv
      coupled_coordinates_function f300:
        NaturalCubicSpline: x=(-6.283185 6.283185) y=(0 0)
    CoordinateCouplerConstraint PEC2pt2_tx_con: dependent_coordinate_name=PEC2pt2_tx
        independent_coordinate_names=shoulder_elv
      coupled_coordinates_function f170:
        NaturalCubicSpline: x=(0 3.141593) y=(0 0.0059)
    CoordinateCouplerConstraint PEC2pt2_ty_con: dependent_coordinate_name=PEC2pt2_ty
        independent_coordinate_names=shoulder_elv
      coupled_coordinates_function f171:
        NaturalCubicSpline: x=(0 3.141593) y=(0 0.0207)
    CoordinateCouplerConstraint PEC2pt2_tz_con: dependent_coordinate_name=PEC2pt2_tz
        independent_coordinate_names=shoulder_elv
      coupled_coordinates_function f172:
        NaturalCubicSpline: x=(0 3.141593) y=(0 0.0144)
    CoordinateCouplerConstraint PEC2pt3_r1_con: dependent_coordinate_name=PEC2pt3_r1
        independent_coordinate_names=shoulder_elv
      coupled_coordinates_function f300:
        NaturalCubicSpline: x=(-6.283185 6.283185) y=(0 0)
    CoordinateCouplerConstraint PEC2pt3_r2_con: dependent_coordinate_name=PEC2pt3_r2
        independent_coordinate_names=shoulder_elv
      coupled_coordinates_function f300:
        NaturalCubicSpline: x=(-6.283185 6.283185) y=(0 0)
    CoordinateCouplerConstraint PEC2pt3_r3_con: dependent_coordinate_name=PEC2pt3_r3
        independent_coordinate_names=shoulder_elv
      coupled_coordinates_function f300:
        NaturalCubicSpline: x=(-6.283185 6.283185) y=(0 0)
    CoordinateCouplerConstraint PEC2pt3_tx_con: dependent_coordinate_name=PEC2pt3_tx
        independent_coordinate_names=shoulder_elv
      coupled_coordinates_function f180:
        NaturalCubicSpline: x=(0 3.141593) y=(0 0.0013)
    CoordinateCouplerConstraint PEC2pt3_ty_con: dependent_coordinate_name=PEC2pt3_ty
        independent_coordinate_names=shoulder_elv
      coupled_coordinates_function f181:
        NaturalCubicSpline: x=(0 3.141593) y=(0 0.0432)
    CoordinateCouplerConstraint PEC2pt3_tz_con: dependent_coordinate_name=PEC2pt3_tz
        independent_coordinate_names=shoulder_elv
      coupled_coordinates_function f182:
        NaturalCubicSpline: x=(0 3.141593) y=(0 -0.0227)
    CoordinateCouplerConstraint PEC3pt2_r1_con: dependent_coordinate_name=PEC3pt2_r1
        independent_coordinate_names=shoulder_elv
      coupled_coordinates_function f300:
        NaturalCubicSpline: x=(-6.283185 6.283185) y=(0 0)
    CoordinateCouplerConstraint PEC3pt2_r2_con: dependent_coordinate_name=PEC3pt2_r2
        independent_coordinate_names=shoulder_elv
      coupled_coordinates_function f300:
        NaturalCubicSpline: x=(-6.283185 6.283185) y=(0 0)
    CoordinateCouplerConstraint PEC3pt2_r3_con: dependent_coordinate_name=PEC3pt2_r3
        independent_coordinate_names=shoulder_elv
      coupled_coordinates_function f300:
        NaturalCubicSpline: x=(-6.283185 6.283185) y=(0 0)
    CoordinateCouplerConstraint PEC3pt2_tx_con: dependent_coordinate_name=PEC3pt2_tx
        independent_coordinate_names=shoulder_elv
      coupled_coordinates_function f190:
        NaturalCubicSpline: x=(0 0.7475172 3.141593) y=(0 0.002482 0.0059)
    CoordinateCouplerConstraint PEC3pt2_ty_con: dependent_coordinate_name=PEC3pt2_ty
        independent_coordinate_names=shoulder_elv
      coupled_coordinates_function f191:
        NaturalCubicSpline: x=(0 3.131491) y=(0 0.011474)
    CoordinateCouplerConstraint PEC3pt2_tz_con: dependent_coordinate_name=PEC3pt2_tz
        independent_coordinate_names=shoulder_elv
      coupled_coordinates_function f192:
        NaturalCubicSpline: x=(0 0.6230557 2.291237 3.125328) y=(0 0.009968 0.018193 0.017746)
    CoordinateCouplerConstraint PEC3pt3_ty_con: dependent_coordinate_name=PEC3pt3_ty
        independent_coordinate_names=shoulder_elv
      coupled_coordinates_function f201:
        NaturalCubicSpline: x=(0.01010158 1.59605 3.141593) y=(0.000222 0.011219 0.0441)
    CoordinateCouplerConstraint DELT2pt2a_r1_con: dependent_coordinate_name=DELT2pt2a_r1
        independent_coordinate_names=shoulder_elv
      coupled_coordinates_function f300:
        NaturalCubicSpline: x=(-6.283185 6.283185) y=(0 0)
    CoordinateCouplerConstraint DELT2pt2a_r2_con: dependent_coordinate_name=DELT2pt2a_r2
        independent_coordinate_names=shoulder_elv
      coupled_coordinates_function f300:
        NaturalCubicSpline: x=(-6.283185 6.283185) y=(0 0)
    CoordinateCouplerConstraint DELT2pt2a_r3_con: dependent_coordinate_name=DELT2pt2a_r3
        independent_coordinate_names=shoulder_elv
      coupled_coordinates_function f300:
        NaturalCubicSpline: x=(-6.283185 6.283185) y=(0 0)
    CoordinateCouplerConstraint DELT2pt2a_tx_con: dependent_coordinate_name=DELT2pt2a_tx
        independent_coordinate_names=shoulder_elv
      coupled_coordinates_function f210:
        NaturalCubicSpline: x=(0 3.141593) y=(0 -0.0169)
    CoordinateCouplerConstraint DELT2pt2a_ty_con: dependent_coordinate_name=DELT2pt2a_ty
        independent_coordinate_names=shoulder_elv
      coupled_coordinates_function f211:
        NaturalCubicSpline: x=(0 3.141593) y=(0 -0.0781)
    CoordinateCouplerConstraint DELT2pt2a_tz_con: dependent_coordinate_name=DELT2pt2a_tz
        independent_coordinate_names=shoulder_elv
      coupled_coordinates_function f212:
        NaturalCubicSpline: x=(0 1.222292 3.141593) y=(0 -0.005395 -0.0363)
    CoordinateCouplerConstraint DELT2pt2_r1_con: dependent_coordinate_name=DELT2pt2_r1
        independent_coordinate_names=shoulder_rot
      coupled_coordinates_function f300:
        NaturalCubicSpline: x=(-6.283185 6.283185) y=(0 0)
    CoordinateCouplerConstraint DELT2pt2_r2_con: dependent_coordinate_name=DELT2pt2_r2
        independent_coordinate_names=shoulder_rot
      coupled_coordinates_function f300:
        NaturalCubicSpline: x=(-6.283185 6.283185) y=(0 0)
    CoordinateCouplerConstraint DELT2pt2_r3_con: dependent_coordinate_name=DELT2pt2_r3
        independent_coordinate_names=shoulder_rot
      coupled_coordinates_function f300:
        NaturalCubicSpline: x=(-6.283185 6.283185) y=(0 0)
    CoordinateCouplerConstraint DELT2pt2_tx_con: dependent_coordinate_name=DELT2pt2_tx
        independent_coordinate_names=shoulder_rot
      coupled_coordinates_function f220:
        NaturalCubicSpline: x=(-1.570796 -0.01015029 0.349046) y=(0.0214 0.000049 -0.020005)
    CoordinateCouplerConstraint DELT2pt2_ty_con: dependent_coordinate_name=DELT2pt2_ty
        independent_coordinate_names=shoulder_rot
      coupled_coordinates_function f221:
        NaturalCubicSpline: x=(-1.570796 -1.181885 -0.1694821 0 0.3490659) y=(-0.0029 -0.002148 -0.000139 0 -0.001644)
    CoordinateCouplerConstraint DELT2pt2_tz_con: dependent_coordinate_name=DELT2pt2_tz
        independent_coordinate_names=shoulder_rot
      coupled_coordinates_function f222:
        NaturalCubicSpline: x=(-1.570796 -0.4966612 0 0.3428927) y=(-0.0455 -0.006762 0 -0.00573)
    CoordinateCouplerConstraint LAT1pt2_r1_con: dependent_coordinate_name=LAT1pt2_r1
        independent_coordinate_names=shoulder_elv
      coupled_coordinates_function f300:
        NaturalCubicSpline: x=(-6.283185 6.283185) y=(0 0)
    CoordinateCouplerConstraint LAT1pt2_r2_con: dependent_coordinate_name=LAT1pt2_r2
        independent_coordinate_names=shoulder_elv
      coupled_coordinates_function f300:
        NaturalCubicSpline: x=(-6.283185 6.283185) y=(0 0)
    CoordinateCouplerConstraint LAT1pt2_r3_con: dependent_coordinate_name=LAT1pt2_r3
        independent_coordinate_names=shoulder_elv
      coupled_coordinates_function f300:
        NaturalCubicSpline: x=(-6.283185 6.283185) y=(0 0)
    CoordinateCouplerConstraint LAT1pt2_tx_con: dependent_coordinate_name=LAT1pt2_tx
        independent_coordinate_names=shoulder_elv
      coupled_coordinates_function f230:
        NaturalCubicSpline: x=(0 3.141593) y=(0 -0.0021)
    CoordinateCouplerConstraint LAT1pt2_ty_con: dependent_coordinate_name=LAT1pt2_ty
        independent_coordinate_names=shoulder_elv
      coupled_coordinates_function f231:
        NaturalCubicSpline: x=(0 3.141593) y=(0 0.0352)
    CoordinateCouplerConstraint LAT1pt2_tz_con: dependent_coordinate_name=LAT1pt2_tz
        independent_coordinate_names=shoulder_elv
      coupled_coordinates_function f232:
        NaturalCubicSpline: x=(0 3.141593) y=(0 -0.0144)
    CoordinateCouplerConstraint LAT1pt3_r1_con: dependent_coordinate_name=LAT1pt3_r1
        independent_coordinate_names=shoulder_elv
      coupled_coordinates_function f300:
        NaturalCubicSpline: x=(-6.283185 6.283185) y=(0 0)
    CoordinateCouplerConstraint LAT1pt3_r2_con: dependent_coordinate_name=LAT1pt3_r2
        independent_coordinate_names=shoulder_elv
      coupled_coordinates_function f300:
        NaturalCubicSpline: x=(-6.283185 6.283185) y=(0 0)
    CoordinateCouplerConstraint LAT1pt3_r3_con: dependent_coordinate_name=LAT1pt3_r3
        independent_coordinate_names=shoulder_elv
      coupled_coordinates_function f300:
        NaturalCubicSpline: x=(-6.283185 6.283185) y=(0 0)
    CoordinateCouplerConstraint LAT1pt3_tx_con: dependent_coordinate_name=LAT1pt3_tx
        independent_coordinate_names=shoulder_elv
      coupled_coordinates_function f240:
        NaturalCubicSpline: x=(0 3.141593) y=(0 0.0058)
    CoordinateCouplerConstraint LAT1pt3_ty_con: dependent_coordinate_name=LAT1pt3_ty
        independent_coordinate_names=shoulder_elv
      coupled_coordinates_function f241:
        NaturalCubicSpline: x=(0 3.141593) y=(0 0.0508)
    CoordinateCouplerConstraint LAT1pt3_tz_con: dependent_coordinate_name=LAT1pt3_tz
        independent_coordinate_names=shoulder_elv
      coupled_coordinates_function f242:
        NaturalCubicSpline: x=(0 3.141593) y=(0 -0.042)
    CoordinateCouplerConstraint LAT2pt2_r1_con: dependent_coordinate_name=LAT2pt2_r1
        independent_coordinate_names=shoulder_elv
      coupled_coordinates_function f300:
        NaturalCubicSpline: x=(-6.283185 6.283185) y=(0 0)
    CoordinateCouplerConstraint LAT2pt2_r2_con: dependent_coordinate_name=LAT2pt2_r2
        independent_coordinate_names=shoulder_elv
      coupled_coordinates_function f300:
        NaturalCubicSpline: x=(-6.283185 6.283185) y=(0 0)
    CoordinateCouplerConstraint LAT2pt2_r3_con: dependent_coordinate_name=LAT2pt2_r3
        independent_coordinate_names=shoulder_elv
      coupled_coordinates_function f300:
        NaturalCubicSpline: x=(-6.283185 6.283185) y=(0 0)
    CoordinateCouplerConstraint LAT2pt2_tx_con: dependent_coordinate_name=LAT2pt2_tx
        independent_coordinate_names=shoulder_elv
      coupled_coordinates_function f250:
        NaturalCubicSpline: x=(0 3.141593) y=(0 -0.0141)
    CoordinateCouplerConstraint LAT2pt2_ty_con: dependent_coordinate_name=LAT2pt2_ty
        independent_coordinate_names=shoulder_elv
      coupled_coordinates_function f251:
        NaturalCubicSpline: x=(0 3.141593) y=(0 0.0305)
    CoordinateCouplerConstraint LAT2pt2_tz_con: dependent_coordinate_name=LAT2pt2_tz
        independent_coordinate_names=shoulder_elv
      coupled_coordinates_function f252:
        NaturalCubicSpline: x=(0 3.141593) y=(0 -0.0129)
    CoordinateCouplerConstraint LAT2pt3_r1_con: dependent_coordinate_name=LAT2pt3_r1
        independent_coordinate_names=shoulder_elv
      coupled_coordinates_function f300:
        NaturalCubicSpline: x=(-6.283185 6.283185) y=(0 0)
    CoordinateCouplerConstraint LAT2pt3_r2_con: dependent_coordinate_name=LAT2pt3_r2
        independent_coordinate_names=shoulder_elv
      coupled_coordinates_function f300:
        NaturalCubicSpline: x=(-6.283185 6.283185) y=(0 0)
    CoordinateCouplerConstraint LAT2pt3_r3_con: dependent_coordinate_name=LAT2pt3_r3
        independent_coordinate_names=shoulder_elv
      coupled_coordinates_function f300:
        NaturalCubicSpline: x=(-6.283185 6.283185) y=(0 0)
    CoordinateCouplerConstraint LAT2pt3_tx_con: dependent_coordinate_name=LAT2pt3_tx
        independent_coordinate_names=shoulder_elv
      coupled_coordinates_function f260:
        NaturalCubicSpline: x=(0 3.141593) y=(0 -0.0294)
    CoordinateCouplerConstraint LAT2pt3_ty_con: dependent_coordinate_name=LAT2pt3_ty
        independent_coordinate_names=shoulder_elv
      coupled_coordinates_function f261:
        NaturalCubicSpline: x=(0 3.141593) y=(0 0.0644)
    CoordinateCouplerConstraint LAT2pt3_tz_con: dependent_coordinate_name=LAT2pt3_tz
        independent_coordinate_names=shoulder_elv
      coupled_coordinates_function f262:
        NaturalCubicSpline: x=(0 3.141593) y=(0 -0.0721)
    CoordinateCouplerConstraint LAT3pt2_r1_con: dependent_coordinate_name=LAT3pt2_r1
        independent_coordinate_names=shoulder_elv
      coupled_coordinates_function f300:
        NaturalCubicSpline: x=(-6.283185 6.283185) y=(0 0)
    CoordinateCouplerConstraint LAT3pt2_r2_con: dependent_coordinate_name=LAT3pt2_r2
        independent_coordinate_names=shoulder_elv
      coupled_coordinates_function f300:
        NaturalCubicSpline: x=(-6.283185 6.283185) y=(0 0)
    CoordinateCouplerConstraint LAT3pt2_r3_con: dependent_coordinate_name=LAT3pt2_r3
        independent_coordinate_names=shoulder_elv
      coupled_coordinates_function f300:
        NaturalCubicSpline: x=(-6.283185 6.283185) y=(0 0)
    CoordinateCouplerConstraint LAT3pt2_tx_con: dependent_coordinate_name=LAT3pt2_tx
        independent_coordinate_names=shoulder_elv
      coupled_coordinates_function f270:
        NaturalCubicSpline: x=(0 3.141593) y=(0 -0.0552)
    CoordinateCouplerConstraint LAT3pt2_ty_con: dependent_coordinate_name=LAT3pt2_ty
        independent_coordinate_names=shoulder_elv
      coupled_coordinates_function f271:
        NaturalCubicSpline: x=(0 3.141593) y=(0 0.0341)
    CoordinateCouplerConstraint LAT3pt2_tz_con: dependent_coordinate_name=LAT3pt2_tz
        independent_coordinate_names=shoulder_elv
      coupled_coordinates_function f272:
        NaturalCubicSpline: x=(0 3.141593) y=(0 -0.0173)
    CoordinateCouplerConstraint LAT3pt3_r1_con: dependent_coordinate_name=LAT3pt3_r1
        independent_coordinate_names=shoulder_elv
      coupled_coordinates_function f300:
        NaturalCubicSpline: x=(-6.283185 6.283185) y=(0 0)
    CoordinateCouplerConstraint LAT3pt3_r2_con: dependent_coordinate_name=LAT3pt3_r2
        independent_coordinate_names=shoulder_elv
      coupled_coordinates_function f300:
        NaturalCubicSpline: x=(-6.283185 6.283185) y=(0 0)
    CoordinateCouplerConstraint LAT3pt3_r3_con: dependent_coordinate_name=LAT3pt3_r3
        independent_coordinate_names=shoulder_elv
      coupled_coordinates_function f300:
        NaturalCubicSpline: x=(-6.283185 6.283185) y=(0 0)
    CoordinateCouplerConstraint LAT3pt3_tx_con: dependent_coordinate_name=LAT3pt3_tx
        independent_coordinate_names=shoulder_elv
      coupled_coordinates_function f280:
        NaturalCubicSpline: x=(0 3.141593) y=(0 -0.0366)
    CoordinateCouplerConstraint LAT3pt3_ty_con: dependent_coordinate_name=LAT3pt3_ty
        independent_coordinate_names=shoulder_elv
      coupled_coordinates_function f281:
        NaturalCubicSpline: x=(0 3.141593) y=(0 0.0744)
    CoordinateCouplerConstraint LAT3pt3_tz_con: dependent_coordinate_name=LAT3pt3_tz
        independent_coordinate_names=shoulder_elv
      coupled_coordinates_function f282:
        NaturalCubicSpline: x=(0 3.141593) y=(0 -0.0901)
