# OpenSim document version 30000
Model Wrist Model:
  credits: Gonzalez, R.V., Buchanan, T.S., Delp, S.L.
  length_units: meters
  force_units: N
  gravity: 0 -9.80665 0
  publications:
    How muscle architecture and moment arms affect wrist flexion-extension moments. Journal of Biomechanics, vol. 30, pp. 705-712, 1997.
  BodySet:
    Body ground: mass=0 mass_center=(0 0 0) inertia_xx=0 inertia_yy=0 inertia_zz=0
        meshes=(ground_ribs.vtp ground_spine.vtp ground_skull.vtp ground_jaw.vtp ground_r_clavicle.vtp ground_r_scapula.vtp)
      WrapCylinder TRIlongglen: xyz_body_rotation=(1.37532 -0.294612 2.43596) translation=(-0.043905 -0.0039 0.1478)
          quadrant=x radius=0.003 length=0.03
    Body humerus: mass=2.0325 mass_center=(0 -0.164502 0) inertia_xx=0.011946 inertia_yy=0.004121 inertia_zz=0.013409
        meshes=humerus.vtp
      CustomJoint shoulder: parent_body=ground location_in_parent=(-0.017545 -0.007 0.17) location=(0 0 0)
        Coordinate shoulder_flexion: motion_type=rotational default_value=0 range=(-1.570796 1.570796) clamped=true
        Coordinate shoulder_adduction: motion_type=rotational default_value=0 range=(-2.094395 1.570796) clamped=true
        Coordinate shoulder_rotation: motion_type=rotational default_value=0 range=(-1.570796 1.570796) clamped=true
        SpatialTransform: axes_held_at_zero=(translation1 translation2 translation3)
          TransformAxis rotation1: coordinates=shoulder_flexion axis=(0 0 1) LinearFunction(coefficients=1 0)
          TransformAxis rotation2: coordinates=shoulder_adduction axis=(1 0 0) LinearFunction(coefficients=1 0)
          TransformAxis rotation3: coordinates=shoulder_rotation axis=(0 1 0) LinearFunction(coefficients=1 0)
      WrapEllipsoid TRIlonghh: xyz_body_rotation=(3.00162 -0.853466 2.57419) translation=(-0.0078 -0.0041 -0.0014)
          quadrant=z dimensions=(0.035 0.02 0.02)
      WrapEllipsoid BIClonghh: xyz_body_rotation=(-2.00434 -1.00164 0.975465) translation=(0.0033 0.0073 0.0003)
          quadrant=-y dimensions=(0.025 0.02 0.02)
      WrapCylinder TRI: xyz_body_rotation=(-0.14015 -0.00628319 0.154985) translation=(0.0028 -0.2919 -0.0119)
          quadrant=all radius=0.016 length=0.05
    Body ulna: mass=0.6075 mass_center=(0 -0.120515 0) inertia_xx=0.002962 inertia_yy=0.000618 inertia_zz=0.003213
        meshes=ulna.vtp
      CustomJoint elbow: parent_body=humerus location_in_parent=(0.0127 -0.274 0.0389) location=(0 0 0)
        Coordinate elbow_flexion: motion_type=rotational default_value=0 range=(0 2.268928) clamped=false
        SpatialTransform: axes_held_at_zero=(rotation2 rotation3 translation1 translation2 translation3)
          TransformAxis rotation1: coordinates=elbow_flexion axis=(0.2260469 0.1910399 0.9551997)
              LinearFunction(coefficients=1 0)
    Body radius: mass=0.6075 mass_center=(0.03 -0.120515 0) inertia_xx=0.002962 inertia_yy=0.000618 inertia_zz=0.003212
        meshes=radius.vtp
      CustomJoint radioulnar: parent_body=ulna location_in_parent=(-0.0065 -0.008 0.027) location=(0 0 0)
        Coordinate pro_sup: motion_type=rotational default_value=0 range=(-2.09 2.09) clamped=false
        SpatialTransform: axes_held_at_zero=(rotation1 rotation3 translation1 translation2 translation3)
          TransformAxis rotation2: coordinates=pro_sup axis=(0.05639802 0.9835774 -0.1714491)
              LinearFunction(coefficients=1 0)
    Body rotaxis: mass=1e-6 mass_center=(0 0 0) inertia_xx=1 inertia_yy=1 inertia_zz=1
      WeldJoint rad-rotaxis: parent_body=radius location_in_parent=(-0.0085 -0.2313 0.0561)
          orientation_in_parent=(-0.261799 0.392699 0) location=(0 0 0)
    Body auxprfem: mass=1e-6 mass_center=(0 0 0) inertia_xx=1 inertia_yy=1 inertia_zz=1
      CustomJoint rotaxis-auxprfem: parent_body=rotaxis location_in_parent=(-0.001 0.009 0) location=(0 0 0)
        Coordinate rotaxis_auxprfem_r3: motion_type=rotational default_value=2.183041e-16 range=(-99999.9 99999.9)
            clamped=false
        SpatialTransform: axes_held_at_zero=(rotation1 rotation2 translation1 translation2 translation3)
          TransformAxis rotation3: coordinates=rotaxis_auxprfem_r3 axis=(0 0 1) LinearFunction(coefficients=1 0)
    Body auxprrud: mass=1e-6 mass_center=(0 0 0) inertia_xx=1 inertia_yy=1 inertia_zz=1
      CustomJoint auxprfem-auxprrud: parent_body=auxprfem location_in_parent=(0 0 0) location=(0 0 0)
        Coordinate deviation: motion_type=rotational default_value=0 range=(-0.4363323 0.6108652) clamped=false
            locked=true
        SpatialTransform: axes_held_at_zero=(rotation2 rotation3 translation1 translation2 translation3)
          TransformAxis rotation1: coordinates=deviation axis=(1 0 0)
            SimmSpline: x=(-0.436332 0 0.610865) y=(-0.163625 0 0.305433)
    Body auxdrfem: mass=1e-6 mass_center=(0 0 0) inertia_xx=1 inertia_yy=1 inertia_zz=1
      CustomJoint auxprrud-auxdrfem: parent_body=auxprrud location_in_parent=(0.001 -0.02 0) location=(0 0 0)
        Coordinate auxprrud_auxdrfem_r3: motion_type=rotational default_value=2.575522e-16 range=(-99999.9 99999.9)
            clamped=false
        SpatialTransform: axes_held_at_zero=(rotation1 rotation2 translation1 translation2 translation3)
          TransformAxis rotation3: coordinates=auxprrud_auxdrfem_r3 axis=(0 0 1) LinearFunction(coefficients=1 0)
    Body auxdrrud: mass=1e-6 mass_center=(0 0 0) inertia_xx=1 inertia_yy=1 inertia_zz=1
      CustomJoint auxdrfem-auxdrrud: parent_body=auxdrfem location_in_parent=(0 0 0) location=(0 0 0)
        Coordinate auxdrfem_auxdrrud_r1: motion_type=rotational default_value=0 range=(-99999.9 99999.9) clamped=false
        SpatialTransform: axes_held_at_zero=(rotation2 rotation3 translation1 translation2 translation3)
          TransformAxis rotation1: coordinates=auxdrfem_auxdrrud_r1 axis=(1 0 0) LinearFunction(coefficients=1 0)
    Body scaphoid: mass=1e-6 mass_center=(0 0 0) inertia_xx=1 inertia_yy=1 inertia_zz=1 meshes=r_scaph.vtp
      WeldJoint prox-scaph: parent_body=auxprrud location_in_parent=(-0.0035 -0.0025 0.009)
          orientation_in_parent=(0.401426 0 0) location=(0 0 0)
    Body lunate: mass=1e-6 mass_center=(0 0 0) inertia_xx=1 inertia_yy=1 inertia_zz=1 meshes=r_lun.vtp
      WeldJoint prox-lun: parent_body=auxprrud location_in_parent=(-0.004 -0.0015 -0.007) location=(0 0 0)
    Body trapezium: mass=1e-6 mass_center=(0 0 0) inertia_xx=1 inertia_yy=1 inertia_zz=1 meshes=r_trpzm.vtp
      WeldJoint dist-trpzm: parent_body=auxdrrud location_in_parent=(0.0035 -0.0035 0.02)
          orientation_in_parent=(-0.261799 0 0) location=(0 0 0)
    Body trapezoid: mass=1e-6 mass_center=(0 0 0) inertia_xx=1 inertia_yy=1 inertia_zz=1 meshes=r_trpzd.vtp
      WeldJoint dist-trpzd: parent_body=auxdrrud location_in_parent=(-0.0015 -0.0044 0.0134)
          orientation_in_parent=(0.349066 -0.174533 0) location=(0 0 0)
    Body capitate: mass=0.4575 mass_center=(0 -0.068095 0) inertia_xx=0.000892 inertia_yy=0.000547 inertia_zz=0.00134
        meshes=r_cap.vtp
      WeldJoint dist-cap: parent_body=auxdrrud location_in_parent=(-0.0155 -0.0018 -0.0055)
          orientation_in_parent=(0.174533 0 0) location=(0 0 0)
    Body pisiform: mass=1e-6 mass_center=(0 0 0) inertia_xx=1 inertia_yy=1 inertia_zz=1 meshes=r_pis.vtp
      WeldJoint prox-pis: parent_body=auxprrud location_in_parent=(0.005 -0.015 -0.0201) location=(0 0 0)
    Body triquetrum: mass=1e-6 mass_center=(0 0 0) inertia_xx=1 inertia_yy=1 inertia_zz=1 meshes=r_triq.vtp
      WeldJoint prox-triq: parent_body=auxprrud location_in_parent=(-0.0055 -0.01 -0.021) location=(0 0 0)
    Body hamate: mass=1e-6 mass_center=(0 0 0) inertia_xx=1 inertia_yy=1 inertia_zz=1 meshes=r_ham.vtp
      WeldJoint dist-ham: parent_body=auxdrrud location_in_parent=(-0.006 -0.005 -0.0175)
          orientation_in_parent=(-0.20944 0 0) location=(0 0 0)
    Body carp_metacarp: mass=1e-6 mass_center=(0 0 0) inertia_xx=1 inertia_yy=1 inertia_zz=1
      WeldJoint auxCMC: parent_body=auxdrrud location_in_parent=(0 0 0) location=(0 0 0)
    Body metacarpal2: mass=1e-6 mass_center=(0 0 0) inertia_xx=1 inertia_yy=1 inertia_zz=1 meshes=fingers1.vtp
      WeldJoint CMC2: parent_body=carp_metacarp location_in_parent=(-0.0047 -0.0095 -0.005)
          orientation_in_parent=(0.174533 0.261799 0) location=(0 0 0)
    Body Iphalanx1: mass=1e-6 mass_center=(0 0 0) inertia_xx=1 inertia_yy=1 inertia_zz=1 meshes=fingers2.vtp
      CustomJoint MCP2: parent_body=metacarpal2 location_in_parent=(-0.002402 -0.0685 0.045) location=(0 0 0)
        Coordinate MCP2_lateral: motion_type=rotational default_value=0 range=(-0.3490659 0.3490659) clamped=false
            locked=true
        Coordinate MCP2_flex: motion_type=rotational default_value=0 range=(-0.1745329 1.570796) clamped=false
            locked=true
        SpatialTransform: axes_held_at_zero=(rotation2 translation1 translation2 translation3)
          TransformAxis rotation1: coordinates=MCP2_lateral axis=(1 0 0) LinearFunction(coefficients=1 0)
          TransformAxis rotation3: coordinates=MCP2_flex axis=(0 0 1) LinearFunction(coefficients=1 0)
    Body Iphalanx2: mass=1e-6 mass_center=(0 0 0) inertia_xx=1 inertia_yy=1 inertia_zz=1 meshes=fingers3.vtp
      CustomJoint PIP: parent_body=Iphalanx1 location_in_parent=(0.0005 -0.04826 0.00799) location=(0 0 0)
        Coordinate PIP_flex: motion_type=rotational default_value=0 range=(-0.08726646 1.570796) clamped=false
            locked=true
        SpatialTransform: axes_held_at_zero=(rotation1 rotation2 translation1 translation2 translation3)
          TransformAxis rotation3: coordinates=PIP_flex axis=(0 0 1) LinearFunction(coefficients=1 0)
    Body Iphalanx3: mass=1e-6 mass_center=(0 0 0) inertia_xx=1 inertia_yy=1 inertia_zz=1 meshes=fingers4.vtp
      CustomJoint DIP: parent_body=Iphalanx2 location_in_parent=(0.00193 -0.03277 0.00472) location=(0 0 0)
        Coordinate DIP_flex: motion_type=rotational default_value=0 range=(-0.08726646 1.570796) clamped=false
            locked=true
        SpatialTransform: axes_held_at_zero=(rotation1 rotation2 translation1 translation2 translation3)
          TransformAxis rotation3: coordinates=DIP_flex axis=(0 0 1) LinearFunction(coefficients=1 0)
    Body metacarpal3: mass=1e-6 mass_center=(0 0 0) inertia_xx=1 inertia_yy=1 inertia_zz=1 meshes=fingers8.vtp
      WeldJoint CMC3: parent_body=carp_metacarp location_in_parent=(-0.0047 -0.0085 -0.005)
          orientation_in_parent=(0.0872665 0.174533 0.0872665) location=(0 0 0)
    Body midfinger: mass=1e-6 mass_center=(0 0 0) inertia_xx=1 inertia_yy=1 inertia_zz=1
        meshes=(fingers6.vtp fingers7.vtp fingers5.vtp)
      WeldJoint MCP3: parent_body=metacarpal3 location_in_parent=(0 -0.003 0) location=(0 0 0)
    Body metacarpal4: mass=1e-6 mass_center=(0 0 0) inertia_xx=1 inertia_yy=1 inertia_zz=1 meshes=fingers12.vtp
      WeldJoint CMC4: parent_body=carp_metacarp location_in_parent=(-0.0047 -0.008 -0.0033)
          orientation_in_parent=(0.0872665 0.174533 0.0872665) location=(0 0 0)
    Body ringfinger: mass=1e-6 mass_center=(0 0 0) inertia_xx=1 inertia_yy=1 inertia_zz=1
        meshes=(fingers10.vtp fingers11.vtp fingers9.vtp)
      WeldJoint MCP4: parent_body=metacarpal4 location_in_parent=(0 -0.0025 0) location=(0 0 0)
    Body metacarpal5: mass=1e-6 mass_center=(0 0 0) inertia_xx=1 inertia_yy=1 inertia_zz=1 meshes=fingers16.vtp
      WeldJoint CMC5: parent_body=carp_metacarp location_in_parent=(-0.002 -0.01 0.0035)
          orientation_in_parent=(0.0872665 0.174533 0.0872665) location=(0 0 0)
    Body littlefinger: mass=1e-6 mass_center=(0 0 0) inertia_xx=1 inertia_yy=1 inertia_zz=1
        meshes=(fingers14.vtp fingers15.vtp fingers13.vtp)
      WeldJoint MCP5: parent_body=metacarpal5 location_in_parent=(0 -0.002 0) location=(0 0 0)
    Body thumb: mass=1e-6 mass_center=(0 0 0) inertia_xx=1 inertia_yy=1 inertia_zz=1
        meshes=(fingers17.vtp fingers18.vtp fingers19.vtp)
      CustomJoint CMC1: parent_body=carp_metacarp location_in_parent=(0.008 -0.0045 0.0219) location=(0 0 0)
        Coordinate thumb_abd: motion_type=rotational default_value=0 range=(-0.7853982 0.2617994) clamped=false
            locked=true
        Coordinate thumb_flex: motion_type=rotational default_value=0 range=(-0.7853982 1.570796) clamped=false
            locked=true
        SpatialTransform: axes_held_at_zero=(rotation3 translation1 translation2 translation3)
          TransformAxis rotation1: coordinates=thumb_abd axis=(1 0 0) LinearFunction(coefficients=1 0)
          TransformAxis rotation2: coordinates=thumb_flex axis=(0.05639802 0.9835774 -0.1714491)
              LinearFunction(coefficients=1 0)
    Body imagine: mass=1e-6 mass_center=(0 0 0) inertia_xx=1 inertia_yy=1 inertia_zz=1
      CustomJoint updown: parent_body=rotaxis location_in_parent=(0 0 0) location=(0 0 0) orientation=(0 0 -1.5708)
        Coordinate flexion: motion_type=rotational default_value=-2.447497e-14 range=(-1.22173 1.22173) clamped=true
            locked=true
        SpatialTransform: axes_held_at_zero=(rotation2 rotation3 translation1 translation2 translation3)
          TransformAxis rotation1: coordinates=flexion axis=(1 0 0)
            SimmSpline: x=(-1.5708 0 1.5708) y=(-0.01 0 0.01)
  ConstraintSet:
    CoordinateCouplerConstraint rotaxis_auxprfem_r3_con: independent_coordinate_names=flexion
        dependent_coordinate_name=rotaxis_auxprfem_r3 scale_factor=1
      coupled_coordinates_function: SimmSpline: x=(-1.5708 1.5708) y=(-0.785398 0.785398)
    CoordinateCouplerConstraint auxprrud_auxdrfem_r3_con: independent_coordinate_names=flexion
        dependent_coordinate_name=auxprrud_auxdrfem_r3 scale_factor=1
      coupled_coordinates_function: SimmSpline: x=(-1.22173 1.22173) y=(-0.610865 0.610865)
    CoordinateCouplerConstraint auxdrfem_auxdrrud_r1_con: independent_coordinate_names=deviation
        dependent_coordinate_name=auxdrfem_auxdrrud_r1 scale_factor=1
      coupled_coordinates_function: SimmSpline: x=(-0.436332 0 0.610865) y=(-0.272708 0 0.305433)
  ForceSet:
    Thelen2003Muscle [values shared by the 6 below unless stated]: min_control=0 max_control=1 optimal_force=1
        max_contraction_velocity=10 activation_time_constant=0.01 deactivation_time_constant=0.04
        FmaxTendonStrain=0.033 FmaxMuscleStrain=0.6 KshapeActive=0.5 KshapePassive=4 Af=0.3 Flen=1.8
    Thelen2003Muscle TRIlong: max_isometric_force=798.52 optimal_fiber_length=0.134 tendon_slack_length=0.143
        pennation_angle_at_optimal=0.2094395 [radians]
      PathPoint P1: ground (-0.05365 -0.01373 0.14723)
      PathPoint P2: humerus (-0.02714 -0.11441 -0.00664)
      PathPoint P3: humerus (-0.03184 -0.22637 -0.01217)
      PathPoint P4: humerus (-0.01743 -0.26757 -0.01208)
      PathPoint P5: ulna (-0.0219 0.01046 -0.00078)
      PathWrap: wrap_object=TRI method=hybrid
      PathWrap: wrap_object=TRIlonghh method=hybrid
      PathWrap: wrap_object=TRIlongglen method=hybrid
    Thelen2003Muscle TRIlat: max_isometric_force=624.3 optimal_fiber_length=0.1138 tendon_slack_length=0.098
        pennation_angle_at_optimal=0.1570796
      PathPoint P1: humerus (-0.00599 -0.12646 0.00428)
      PathPoint P2: humerus (-0.02344 -0.14528 0.00928)
      PathPoint P3: humerus (-0.03184 -0.22637 -0.01217)
      PathPoint P4: humerus (-0.01743 -0.26757 -0.01208)
      PathPoint P5: ulna (-0.0219 0.01046 -0.00078)
      PathWrap: wrap_object=TRI method=hybrid
    Thelen2003Muscle TRImed: max_isometric_force=624.3 optimal_fiber_length=0.1138 tendon_slack_length=0.0908
        pennation_angle_at_optimal=0.1570796
      PathPoint P1: humerus (-0.00838 -0.13695 -0.00906)
      PathPoint P2: humerus (-0.02601 -0.15139 -0.0108)
      PathPoint P3: humerus (-0.03184 -0.22637 -0.01217)
      PathPoint P4: humerus (-0.01743 -0.26757 -0.01208)
      PathPoint P5: ulna (-0.0219 0.01046 -0.00078)
      PathWrap: wrap_object=TRI method=hybrid
    Thelen2003Muscle BIClong: max_isometric_force=624.3 optimal_fiber_length=0.1157 tendon_slack_length=0.2723
        pennation_angle_at_optimal=0
      PathPoint P1: ground (-0.039235 0.00347 0.14795)
      PathPoint P2: ground (-0.028945 0.01391 0.15639)
      PathPoint P3: humerus (0.02131 0.01793 0.01028)
      PathPoint P4: humerus (0.02378 -0.00511 0.01201)
      PathPoint P5: humerus (0.01345 -0.02827 0.00136)
      PathPoint P6: humerus (0.01068 -0.07736 -0.00165)
      PathPoint P7: humerus (0.01703 -0.12125 0.00024)
      PathPoint P8: humerus (0.0228 -0.1754 -0.0063)
      PathPoint P9: radius (-0.002 -0.0375 -0.002)
      PathWrap: wrap_object=BIClonghh method=hybrid range=(2 3)
    Thelen2003Muscle BICshort: max_isometric_force=435.56 optimal_fiber_length=0.1321 tendon_slack_length=0.1923
        pennation_angle_at_optimal=0
      PathPoint P1: ground (0.004675 -0.01231 0.13475)
      PathPoint P2: ground (-0.007075 -0.04004 0.14507)
      PathPoint P3: humerus (0.01117 -0.07576 -0.01101)
      PathPoint P4: humerus (0.01703 -0.12125 -0.01079)
      PathPoint P5: humerus (0.0228 -0.1754 -0.0063)
      PathPoint P6: radius (-0.002 -0.0375 -0.002)
    Thelen2003Muscle BRA: max_isometric_force=987.26 optimal_fiber_length=0.0858 tendon_slack_length=0.0535
        pennation_angle_at_optimal=0
      PathPoint P1: humerus (0.0068 -0.1739 -0.0036)
      PathPoint P2: ulna (-0.0032 -0.0239 0.0009)
      PathWrap: wrap_object=TRI method=hybrid
    Schutte1993Muscle_Deprecated [values shared by the 25 below unless stated]: min_control=0.01 max_control=1
        optimal_force=1 max_contraction_velocity=10 time_scale=0.1 activation1=7.667 activation2=1.459854 damping=0.05
      tendon_force_length_curve: SimmSpline: x=(-10 -0.002 -0.001 0 0.00131 0.00281 0.00431 0.00581 0.00731 0.00881 0.0103 0.0118 0.0123 9.2 9.201 9.202 20)
          y=(0 0 0 0 0.0108 0.0257 0.0435 0.0652 0.0915 0.123 0.161 0.208 0.227 345 345 345 345)
      active_force_length_curve: SimmSpline: x=(-35 0 0.401 0.402 0.4035 0.52725 0.62875 0.71875 0.86125 1.045 1.2175 1.43875 1.61875 1.62 1.621 2.2 35)
          y=(0 0 0 0 0 0.226667 0.636667 0.856667 0.95 0.993333 0.77 0.246667 0 0 0 0 0)
      passive_force_length_curve: SimmSpline: x=(-35 0.998 0.999 1.15 1.25 1.35 1.45 1.55 1.65 1.75 1.7501 1.7502 35)
          y=(0 0 0 0 0.035 0.12 0.26 0.55 1.17 2 2 2 2)
    Schutte1993Muscle_Deprecated FCR: max_isometric_force=59.7 optimal_fiber_length=0.0628 tendon_slack_length=0.2185
        pennation_angle_at_optimal=0.05410521 [radians]
      PathPoint P1: humerus (0.00639 -0.27761 0.01313)
      PathPoint P2: radius (0.00953 -0.21667 0.05024)
      PathPoint P3: trapezoid (0.01395 -0.0012 -0.0067)
      PathPoint P4: metacarpal2 (0.00592 0.00269 0.01328)
    Schutte1993Muscle_Deprecated FCU: max_isometric_force=102.6 optimal_fiber_length=0.0509 tendon_slack_length=0.242
        pennation_angle_at_optimal=0.2111848
      PathPoint P1: humerus (0.00463 -0.27768 0.01318)
      ConditionalPathPoint P2: ulna (-0.00465 -0.22771 0.05589) range=(0.558505 1.5708) coordinate=flexion
      ConditionalPathPoint P3: ulna (-0.01368 -0.22899 0.05805) range=(-1.5708 -0.628319) coordinate=flexion
      ConditionalPathPoint P4: hamate (0.01901 0.0109 0.00261) range=(-1.5708 -0.0349066) coordinate=flexion
      ConditionalPathPoint P5: hamate (0.01899 0.0024 0.0012) range=(-1.5708 0.558505) coordinate=flexion
      PathPoint P6: metacarpal5 (0.00845 -0.0091 -0.01963)
    Schutte1993Muscle_Deprecated ECU_pre-surgery: max_isometric_force=117 optimal_fiber_length=0.0622
        tendon_slack_length=0.231 pennation_angle_at_optimal=0.06108652
      PathPoint P1: humerus (0.02268 -0.26804 0.06679)
      PathPoint P2: radius (-0.00239 -0.01019 0.01329)
      PathPoint P3: radius (-0.01094 -0.03546 0.01362)
      PathPoint P4: ulna (-0.02457 -0.09422 0.03348)
      PathPoint P5: ulna (-0.02793 -0.23106 0.05873)
      PathPoint P6: triquetrum (-0.00094 -0.00436 -0.00442)
      PathPoint P7: metacarpal5 (-0.00458 -0.00734 -0.02848)
    Schutte1993Muscle_Deprecated ECU_post-surgery: max_isometric_force=117 optimal_fiber_length=0.0622
        tendon_slack_length=0.231 pennation_angle_at_optimal=0.06108652
      PathPoint P1: humerus (0.02268 -0.26804 0.06679)
      PathPoint P2: radius (-0.00239 -0.01019 0.01329)
      PathPoint P3: radius (-0.01094 -0.03546 0.01362)
      PathPoint P4: ulna (-0.02457 -0.09422 0.03348)
      PathPoint P5: ulna (-0.02463 -0.1364 0.04159)
      PathPoint P6: ulna (-0.02953 -0.18933 0.07846)
      PathPoint P7: radius (-0.01789 -0.19788 0.06459)
      PathPoint P8: radius (-0.01779 -0.20954 0.07234)
      PathPoint P9: trapezoid (-0.01575 0.00302 0.00216)
      PathPoint P10: metacarpal3 (-0.01502 -0.00464 0.01507)
    Schutte1993Muscle_Deprecated EDM: max_isometric_force=28.8 optimal_fiber_length=0.0675 tendon_slack_length=0.347
        pennation_angle_at_optimal=0.05235988
      PathPoint P1: humerus (0.02257 -0.26792 0.06683)
      PathPoint P2: radius (-0.00523 -0.01802 0.01357)
      PathPoint P3: radius (-0.01075 -0.07282 0.01237)
      PathPoint P4: ulna (-0.03277 -0.22628 0.07769)
      ConditionalPathPoint P5: triquetrum (-0.00965 -0.00461 0.00733) range=(0 0) coordinate=deviation
      PathPoint P6: metacarpal5 (-0.00895 -0.00546 -0.02267)
      PathPoint P7: metacarpal5 (-0.00709 -0.06329 -0.03424)
      PathPoint P8: littlefinger (-0.00281 -0.10702 -0.03713)
      PathPoint P9: littlefinger (-0.00027 -0.13243 -0.0357)
    Schutte1993Muscle_Deprecated ECRB: max_isometric_force=122.9 optimal_fiber_length=0.0585 tendon_slack_length=0.2205
        pennation_angle_at_optimal=0.1553343
      PathPoint P1: humerus (0.02254 -0.26813 0.06679)
      PathPoint P2: radius (-0.00384 -0.1248 0.05482)
      PathPoint P3: radius (-0.01733 -0.20892 0.0704)
      PathPoint P4: trapezoid (-0.01598 0.00257 0.00197)
      PathPoint P5: metacarpal3 (-0.01528 -0.00506 0.01554)
    Schutte1993Muscle_Deprecated ECRL: max_isometric_force=65.7 optimal_fiber_length=0.0936 tendon_slack_length=0.2026
        pennation_angle_at_optimal=0.04363323
      PathPoint P1: humerus (0.01337 -0.26111 0.07069)
      PathPoint P2: humerus (0.02239 -0.26834 0.06679)
      PathPoint P3: radius (-0.00136 -0.12953 0.05532)
      PathPoint P4: radius (-0.0083 -0.21052 0.0752)
      ConditionalPathPoint P5: metacarpal2 (-0.01349 0.01118 0.02204) range=(0 0) coordinate=deviation
      PathPoint P6: metacarpal2 (-0.01108 -0.01106 0.02568)
    Schutte1993Muscle_Deprecated FDSI: max_isometric_force=51.3 optimal_fiber_length=0.0835 tendon_slack_length=0.338
        pennation_angle_at_optimal=0.1047198
      PathPoint P1: humerus (0.0035 -0.29455 0.03226)
      ConditionalPathPoint P2: radius (0.01091 -0.21436 0.04048) range=(0.436332 1.5708) coordinate=flexion
      ConditionalPathPoint P3: radius (0.00183 -0.21671 0.04253) range=(-1.5708 -0.0872665) coordinate=flexion
      ConditionalPathPoint P4: capitate (0.02244 0.01397 0.00139) range=(-1.5708 -0.715585) coordinate=flexion
      ConditionalPathPoint P5: capitate (0.02703 0.00411 0.00444) range=(-1.5708 -0.331613) coordinate=flexion
      PathPoint P6: capitate (0.02944 -0.01143 0.00869)
      PathPoint P7: metacarpal2 (0.01297 -0.01437 0.02183)
      PathPoint P8: metacarpal2 (0.00543 -0.06688 0.04728)
      PathPoint P9: Iphalanx1 (0.00596 -0.04624 0.00883)
      PathPoint P10: Iphalanx3 (0.00581 -0.0059 0.00263)
    Schutte1993Muscle_Deprecated FDSM: max_isometric_force=75.9 optimal_fiber_length=0.0749 tendon_slack_length=0.354
        pennation_angle_at_optimal=0.1221731
      PathPoint P1: humerus (0.0035 -0.29455 0.03226)
      ConditionalPathPoint P2: radius (0.01048 -0.21423 0.03978) range=(0.436332 1.5708) coordinate=flexion
      ConditionalPathPoint P3: radius (0.0019 -0.2167 0.0438) range=(-1.5708 -0.0872665) coordinate=flexion
      ConditionalPathPoint P4: capitate (0.02277 0.01364 0.00172) range=(-1.5708 -0.698132) coordinate=flexion
      ConditionalPathPoint P5: capitate (0.0269 0.0054 0.0037) range=(-1.5708 -0.349066) coordinate=flexion
      PathPoint P6: capitate (0.03 -0.0118 0.0084)
      PathPoint P7: metacarpal3 (0.0144 -0.01632 0.01008)
      PathPoint P8: metacarpal3 (0.00429 -0.08012 0.01596)
      PathPoint P9: midfinger (-0.00048 -0.12516 0.01851)
      PathPoint P10: midfinger (0.00028 -0.17254 0.02483)
    Schutte1993Muscle_Deprecated FDSR: max_isometric_force=48.3 optimal_fiber_length=0.0736 tendon_slack_length=0.3535
        pennation_angle_at_optimal=0.06981317
      PathPoint P1: humerus (0.0035 -0.29455 0.03226)
      ConditionalPathPoint P2: radius (0.01037 -0.21504 0.03862) range=(0.436332 1.5708) coordinate=flexion
      ConditionalPathPoint P3: radius (-0.00037 -0.21764 0.0409) range=(-1.5708 -0.0872665) coordinate=flexion
      ConditionalPathPoint P4: capitate (0.02189 0.01306 0.00048) range=(-1.5708 -0.698132) coordinate=flexion
      ConditionalPathPoint P5: capitate (0.02545 0.00479 0.0023) range=(-1.5708 -0.349066) coordinate=flexion
      PathPoint P6: capitate (0.0289 -0.0155 0.0073)
      PathPoint P7: metacarpal3 (0.0144 -0.0252 -0.00101)
      PathPoint P8: metacarpal4 (0.00807 -0.07635 -0.00696)
      PathPoint P9: ringfinger (0.0033 -0.12455 -0.00441)
      PathPoint P10: ringfinger (0.00672 -0.17283 0.00102)
    Schutte1993Muscle_Deprecated FDSL: max_isometric_force=12 optimal_fiber_length=0.0515 tendon_slack_length=0.343
        pennation_angle_at_optimal=0.08726646
      PathPoint P1: humerus (0.0035 -0.29455 0.03226)
      ConditionalPathPoint P2: radius (0.01048 -0.21423 0.03978) range=(0.479966 1.5708) coordinate=flexion
      ConditionalPathPoint P3: radius (0.001 -0.2177 0.0418) range=(-1.5708 0.0174533) coordinate=flexion
      ConditionalPathPoint P4: capitate (0.02201 0.01258 -0.00027) range=(-1.5708 -0.698132) coordinate=flexion
      ConditionalPathPoint P5: capitate (0.0255 0.0021 0.0025) range=(-1.5708 -0.349066) coordinate=flexion
      PathPoint P6: capitate (0.0268 -0.0129 0.0061)
      PathPoint P7: metacarpal4 (0.01463 -0.02498 -0.01151)
      PathPoint P8: metacarpal5 (0.00674 -0.06152 -0.0347)
      PathPoint P9: littlefinger (0.0073 -0.10135 -0.0357)
      PathPoint P10: littlefinger (0.00983 -0.13986 -0.03115)
    Schutte1993Muscle_Deprecated FDPI: max_isometric_force=53.1 optimal_fiber_length=0.0749 tendon_slack_length=0.322
        pennation_angle_at_optimal=0.1221731
      PathPoint P1: ulna (-0.0113 -0.03157 0.00208)
      ConditionalPathPoint P2: radius (0.00797 -0.21647 0.04395) range=(0.349066 1.5708) coordinate=flexion
      ConditionalPathPoint P3: radius (0.0013 -0.21659 0.04619) range=(-1.5708 0.0174533) coordinate=flexion
      ConditionalPathPoint P4: capitate (0.02269 0.01117 0.00347) range=(-1.5708 -0.383972) coordinate=flexion
      ConditionalPathPoint P5: capitate (0.02499 0.00065 0.00589) range=(-1.5708 -0.383972) coordinate=flexion
      PathPoint P6: metacarpal2 (0.013 -0.0048 0.01072)
      PathPoint P7: metacarpal2 (0.00363 -0.06662 0.0449)
      PathPoint P8: Iphalanx1 (0.00494 -0.0506 0.00914)
      PathPoint P9: Iphalanx2 (0.0095 -0.03028 0.00343)
    Schutte1993Muscle_Deprecated FDPM: max_isometric_force=66.9 optimal_fiber_length=0.0835 tendon_slack_length=0.32
        pennation_angle_at_optimal=0.1047198
      PathPoint P1: ulna (-0.0113 -0.03157 0.00208)
      ConditionalPathPoint P2: radius (0.00433 -0.21689 0.0427) range=(0.279253 1.5708) coordinate=flexion
      ConditionalPathPoint P3: radius (-0.00152 -0.21639 0.04445) range=(-1.5708 0) coordinate=flexion
      ConditionalPathPoint P4: capitate (0.02125 0.01055 0.00154) range=(-1.5708 -0.436332) coordinate=flexion
      ConditionalPathPoint P5: capitate (0.02346 0.00125 0.00384) range=(-1.5708 -0.174533) coordinate=flexion
      PathPoint P6: metacarpal3 (0.01168 -0.00745 0.00755)
      PathPoint P7: metacarpal3 (0.00765 -0.07598 0.01288)
      PathPoint P8: midfinger (0.00087 -0.1259 0.01853)
      PathPoint P9: midfinger (0.00142 -0.16485 0.0224)
    Schutte1993Muscle_Deprecated FDPR: max_isometric_force=51.6 optimal_fiber_length=0.0798 tendon_slack_length=0.314
        pennation_angle_at_optimal=0.1221731
      PathPoint P1: ulna (-0.0113 -0.03157 0.00208)
      ConditionalPathPoint P2: radius (0.00438 -0.21834 0.03741) range=(0.314159 1.5708) coordinate=flexion
      ConditionalPathPoint P3: radius (-0.00261 -0.217 0.04286) range=(-1.5708 -0.314159) coordinate=flexion
      ConditionalPathPoint P4: capitate (0.0238 0.01117 -0.00097) range=(-1.5708 -0.436332) coordinate=flexion
      ConditionalPathPoint P5: capitate (0.02829 0.00175 0.00473) range=(-1.5708 0.174533) coordinate=flexion
      PathPoint P6: metacarpal3 (0.01263 -0.0153 0.00166)
      PathPoint P7: metacarpal4 (0.00788 -0.07665 -0.0056)
      PathPoint P8: ringfinger (0.00288 -0.12885 -0.0044)
      PathPoint P9: ringfinger (0.00609 -0.15981 -0.0023)
    Schutte1993Muscle_Deprecated FDPL: max_isometric_force=66 optimal_fiber_length=0.0749 tendon_slack_length=0.3036
        pennation_angle_at_optimal=0.1396263
      PathPoint P1: ulna (-0.0113 -0.03157 0.00208)
      ConditionalPathPoint P2: radius (0.00377 -0.21886 0.03584) range=(0.349066 1.5708) coordinate=flexion
      ConditionalPathPoint P3: radius (-0.0015 -0.217 0.0433) range=(-1.5708 -0.296706) coordinate=flexion
      ConditionalPathPoint P4: capitate (0.02424 0.01233 0.0008) range=(-1.5708 -0.436332) coordinate=flexion
      ConditionalPathPoint P5: capitate (0.02829 0.00175 0.00473) range=(-1.5708 0.19984) coordinate=flexion
      PathPoint P6: metacarpal4 (0.01286 -0.01597 -0.00617)
      PathPoint P7: metacarpal5 (0.00655 -0.06359 -0.03689)
      PathPoint P8: littlefinger (0.00865 -0.10564 -0.03479)
      PathPoint P9: littlefinger (0.0092 -0.13216 -0.03269)
    Schutte1993Muscle_Deprecated EDCL: max_isometric_force=18 optimal_fiber_length=0.065 tendon_slack_length=0.3495
        pennation_angle_at_optimal=0.03490659
      PathPoint P1: humerus (0.01056 -0.26789 0.07127)
      PathPoint P2: radius (-0.0082 -0.04004 0.01668)
      PathPoint P3: radius (-0.01974 -0.18469 0.04807)
      PathPoint P4: radius (-0.02211 -0.21097 0.05287)
      ConditionalPathPoint P5: scaphoid (-0.01357 -0.0079 -0.01241) range=(0 0) coordinate=deviation
      ConditionalPathPoint P6: capitate (-0.00192 -0.01151 0.00084) range=(0 0) coordinate=deviation
      ConditionalPathPoint P7: metacarpal3 (-0.01096 -0.02472 -0.01035) range=(-0.0698132 1.74533) coordinate=flexion
      PathPoint P8: metacarpal5 (-0.00801 -0.06389 -0.03508)
      PathPoint P9: littlefinger (-0.00303 -0.10372 -0.03765)
      PathPoint P10: littlefinger (0.00129 -0.13957 -0.03333)
    Schutte1993Muscle_Deprecated EDCR: max_isometric_force=38.7 optimal_fiber_length=0.0626 tendon_slack_length=0.39
        pennation_angle_at_optimal=0.05235988
      PathPoint P1: humerus (0.01011 -0.26789 0.07127)
      PathPoint P2: radius (-0.0082 -0.04004 0.01668)
      PathPoint P3: radius (-0.01766 -0.18446 0.04898)
      PathPoint P4: radius (-0.02021 -0.21054 0.05596)
      ConditionalPathPoint P5: scaphoid (-0.01286 -0.0042 -0.01106) range=(0 0) coordinate=deviation
      ConditionalPathPoint P6: metacarpal3 (-0.00903 0.00837 -0.00741) range=(0.226893 1.74533) coordinate=flexion
      PathPoint P7: metacarpal4 (-0.01378 -0.07606 -0.01001)
      PathPoint P8: ringfinger (-0.0088 -0.12604 -0.00859)
      PathPoint P9: ringfinger (-0.00093 -0.16987 -0.00249)
    Schutte1993Muscle_Deprecated EDCM: max_isometric_force=45.9 optimal_fiber_length=0.0724 tendon_slack_length=0.39
        pennation_angle_at_optimal=0.05235988
      PathPoint P1: humerus (0.01011 -0.26789 0.07127)
      PathPoint P2: radius (-0.0082 -0.04004 0.01668)
      PathPoint P3: radius (-0.01675 -0.18466 0.04682)
      PathPoint P4: radius (-0.01933 -0.21054 0.05152)
      ConditionalPathPoint P5: scaphoid (-0.01198 -0.00332 -0.01283) range=(0 0) coordinate=deviation
      ConditionalPathPoint P6: metacarpal3 (-0.01257 0.00659 -0.00208) range=(-0.349066 1.74533) coordinate=flexion
      PathPoint P7: metacarpal3 (-0.01348 -0.07696 0.01108)
      PathPoint P8: midfinger (-0.01347 -0.13109 0.01966)
      PathPoint P9: midfinger (-0.00737 -0.17492 0.02576)
    Schutte1993Muscle_Deprecated EDCI: max_isometric_force=23.4 optimal_fiber_length=0.07 tendon_slack_length=0.385
        pennation_angle_at_optimal=0.05235988
      PathPoint P1: humerus (0.01011 -0.26789 0.07127)
      PathPoint P2: radius (-0.0082 -0.04004 0.01668)
      PathPoint P3: radius (-0.02209 -0.18446 0.04898)
      PathPoint P4: radius (-0.02376 -0.21054 0.0533)
      ConditionalPathPoint P5: scaphoid (-0.01359 -0.00761 -0.01108) range=(0 0) coordinate=deviation
      ConditionalPathPoint P6: capitate (-0.00196 -0.00655 0.00232) range=(0 0) coordinate=deviation
      ConditionalPathPoint P7: metacarpal3 (-0.01421 -0.01886 0.0078) range=(0.0174533 1.74533) coordinate=flexion
      PathPoint P8: metacarpal2 (-0.01225 -0.06926 0.04042)
      PathPoint P9: Iphalanx1 (-0.00658 -0.04852 0.0044)
      PathPoint P10: Iphalanx3 (-0.00291 -0.01043 7e-5)
    Schutte1993Muscle_Deprecated FPL: max_isometric_force=62.4 optimal_fiber_length=0.0552 tendon_slack_length=0.1988
        pennation_angle_at_optimal=0.1221731
      PathPoint P1: radius (-0.00284 -0.09605 0.02992)
      PathPoint P2: radius (-0.00166 -0.13532 0.04257)
      PathPoint P3: radius (-0.00037 -0.16882 0.04439)
      ConditionalPathPoint P4: radius (0.00345 -0.21433 0.04621) range=(-1.5708 0.174533) coordinate=flexion
      ConditionalPathPoint P5: thumb (0.00577 0.01018 -0.01528) range=(-1.5708 0.0174533) coordinate=flexion
      PathPoint P6: thumb (0.0063 -0.0177 0.0199)
      PathPoint P7: thumb (9e-5 -0.04175 0.03446)
      PathPoint P8: thumb (0.00081 -0.04594 0.03877)
      PathPoint P9: thumb (0.00577 -0.06923 0.04948)
      PathPoint P10: thumb (0.00493 -0.07776 0.05542)
    Schutte1993Muscle_Deprecated APL: max_isometric_force=57.9 optimal_fiber_length=0.0713 tendon_slack_length=0.125
        pennation_angle_at_optimal=0.1308997
      PathPoint P1: radius (-0.00494 -0.09677 0.03004)
      PathPoint P2: radius (-0.00892 -0.13772 0.05255)
      PathPoint P3: radius (-0.0066 -0.15947 0.06132)
      PathPoint P4: radius (-0.00682 -0.17731 0.06462)
      PathPoint P5: radius (-0.00282 -0.20831 0.07607)
      ConditionalPathPoint P6: radius (0.00117 -0.21506 0.07845) range=(-1.5708 -0.471239) coordinate=flexion
      ConditionalPathPoint P7: trapezium (0.00722 0.00906 0.01082) range=(-1.5708 0.785398) coordinate=flexion
      PathPoint P8: thumb (0.00384 0.00196 0.01452)
      PathPoint P9: thumb (0.00816 -0.02324 0.03082)
    Schutte1993Muscle_Deprecated EPB: max_isometric_force=14.1 optimal_fiber_length=0.0675 tendon_slack_length=0.11
        pennation_angle_at_optimal=0.1256637
      PathPoint P1: radius (-0.00294 -0.13573 0.04196)
      PathPoint P2: radius (-0.00701 -0.14896 0.04387)
      PathPoint P3: radius (-0.01283 -0.17881 0.05817)
      PathPoint P4: radius (-0.00547 -0.19041 0.06961)
      PathPoint P5: radius (0.00469 -0.21769 0.0756)
      ConditionalPathPoint P6: trapezium (-0.00078 0.00458 0.01475) range=(-1.5708 -0.349066) coordinate=flexion
      PathPoint P7: thumb (-0.00387 0.00011 0.01647)
      PathPoint P8: thumb (0.00452 -0.02214 0.03593)
      PathPoint P9: thumb (0.0073 -0.03012 0.04408)
      PathPoint P10: thumb (0.00871 -0.03603 0.048)
    Schutte1993Muscle_Deprecated EPL: max_isometric_force=44.1 optimal_fiber_length=0.054 tendon_slack_length=0.22
        pennation_angle_at_optimal=0.1047198
      PathPoint P1: ulna (-0.02127 -0.0916 0.03268)
      PathPoint P2: radius (-0.01652 -0.16952 0.03814)
      PathPoint P3: radius (-0.01762 -0.20537 0.0523)
      PathPoint P4: scaphoid (-0.008 0.00038 -0.00774)
      PathPoint P5: scaphoid (-0.0084 -0.00663 0.00319)
      PathPoint P6: thumb (-0.0133 -0.00263 0.01214)
      PathPoint P7: thumb (-0.00352 -0.03198 0.04462)
      PathPoint P8: thumb (0.00081 -0.04107 0.05071)
      PathPoint P9: thumb (0.00966 -0.06693 0.06022)
      PathPoint P10: thumb (0.01228 -0.07282 0.06269)
    Schutte1993Muscle_Deprecated EIP: max_isometric_force=25.2 optimal_fiber_length=0.0589 tendon_slack_length=0.24804
        pennation_angle_at_optimal=0.1047198
      PathPoint P1: ulna (-0.01974 -0.14668 0.04449)
      PathPoint P2: radius (-0.01612 -0.20811 0.05228)
      PathPoint P3: scaphoid (-0.01119 -0.00448 -0.00483)
      PathPoint P4: metacarpal2 (-0.01312 0.00595 0.0075)
      PathPoint P5: metacarpal2 (-0.01022 -0.07179 0.04293)
      PathPoint P6: Iphalanx3 (-0.00452 -0.0182 0.00396)
    Schutte1993Muscle_Deprecated PL: max_isometric_force=20.7 optimal_fiber_length=0.0638 tendon_slack_length=0.236
        pennation_angle_at_optimal=0.06981317
      PathPoint P1: humerus (0.00468 -0.27698 0.01316)
      PathPoint P2: radius (0.01122 -0.20758 0.04487)
      ConditionalPathPoint P3: capitate (0.03689 0.00135 0.00732) range=(-1.5708 0.593412) coordinate=flexion
      PathPoint P4: metacarpal3 (0.00932 -0.02377 0.00981)
    ObjectGroup flexors: members=(APL EPB FCR FCU FDPI FDPL FDPM FDPR FDSI FDSL FDSM FDSR FPL PL)
    ObjectGroup radial deviators: members=(APL ECRB ECRL EDCI EIP EPB EPL FCR FDPI FDSI FPL PL)
    ObjectGroup wrist: members=(ECRB ECRL ECU_pre-surgery ECU_post-surgery FCR FCU)
    ObjectGroup ulnar deviators: members=(ECU_pre-surgery ECU_post-surgery EDCL EDCR EDM FCU FDPL FDPM FDPR FDSL FDSR)
    ObjectGroup extensors: members=(ECRB ECRL ECU_pre-surgery ECU_post-surgery EDCI EDCL EDCM EDCR EDM EIP EPL)
    ObjectGroup transfer: members=(ECRB ECU_pre-surgery)
    ObjectGroup final: members=ECU_post-surgery
    ObjectGroup hand: members=(EDCI EDCL EDCM EDCR EDM EIP FDPI FDPL FDPM FDPR FDSI FDSL FDSM FDSR FPL PL)
    ObjectGroup thumb: members=(APL EPB EPL)
  MarkerSet:
    Marker index_finger_marker: Iphalanx3 (0.0051986 -0.0206966 0.000890147) fixed=true
