# OpenSim document version 10902
Model Stanford VA Upper Limb Model:
  gravity: 0 -9.80665 0
  defaults: Schutte1993Muscle defaultmuscle: max_isometric_force=546 optimal_fiber_length=0.0535
      tendon_slack_length=0.078 pennation_angle=0.1396263 max_contraction_velocity=0
    tendon_force_length_curve: NaturalCubicSpline: x=(-10 -0.002 -0.001 0 0.00131 0.00281 0.00431 0.00581 0.00731 0.00881 0.0103 0.0118 0.0123 9.2 9.201 9.202 20)
        y=(0 0 0 0 0.0108 0.0257 0.0435 0.0652 0.0915 0.123 0.161 0.208 0.227 345 345 345 345)
    active_force_length_curve: NaturalCubicSpline: x=(-35 0 0.401 0.402 0.4035 0.52725 0.62875 0.71875 0.86125 1.045 1.2175 1.43875 1.61875 1.62 1.621 2.2 35)
        y=(0 0 0 0 0 0.226667 0.636667 0.856667 0.95 0.993333 0.77 0.246667 0 0 0 0 0)
    passive_force_length_curve: NaturalCubicSpline: x=(-35 0.998 0.999 1.15 1.25 1.35 1.45 1.55 1.65 1.75 1.7501 1.7502 35)
        y=(0 0 0 0 0.035 0.12 0.26 0.55 1.17 2 2 2 2)
  ForceSet:
    ObjectGroup shoulder: members=(CORB DELT1 DELT2 DELT3 INFSP LAT1 LAT2 LAT3 PECM1 PECM2 PECM3 SUBSC SUPSP TMAJ TMIN)
    ObjectGroup elbow: members=(ANC BIClong BICshort BRA BRD ECRL PT TRIlat TRIlong TRImed)
    ObjectGroup forearm: members=(APL ECRB ECU EDCI EDCL EDCM EDCR EDM EIP EPB EPL FCR FCU FDPI FDPL FDPM FDPR FDSI FDSL FDSM FDSR FPL PL PQ PT SUP)
    ObjectGroup extensor: members=(ECRB ECU EDCI EDCL EDCM EDCR EDM EIP EPL)
    ObjectGroup radial: members=(APL ECRB EDCI EDCM EIP EPB EPL FCR FDPI FDSI FDSM FPL PL)
    ObjectGroup wrist: members=(ECRB ECU FCR FCU)
    ObjectGroup ulnar: members=(ECU EDCL EDCR EDM FCU FDPL FDPM FDPR FDSL FDSR)
    ObjectGroup flexor: members=(APL EPB FCR FCU FDPI FDPL FDPM FDPR FDSI FDSL FDSM FDSR FPL PL)
    ObjectGroup hand: members=(APL EDCI EDCL EDCM EDCR EDM EIP EPB EPL FDPI FDPL FDPM FDPR FDSI FDSL FDSM FDSR FPL PL)
    ObjectGroup thumb: members=(APL EPB EPL FPL)
    Schutte1993Muscle DELT1: max_isometric_force=1142.6 optimal_fiber_length=0.0976 tendon_slack_length=0.093
        pennation_angle=0.3839724
      PathPoint: humerus (0.00896 -0.11883 0.00585)
      PathPoint: humerus (0.01623 -0.11033 0.00412)
      PathPoint: scapula (0.04347 -0.03252 0.00099)
      PathPoint: clavicle (-0.014 0.01106 0.08021)
      PathWrap: wrap_object=delt2hum
      PathWrap: wrap_object=DELT1hh method=hybrid range=(2 3)
    Schutte1993Muscle DELT2: max_isometric_force=1142.6 optimal_fiber_length=0.1078 tendon_slack_length=0.1095
        pennation_angle=0.2617994
      PathPoint: humerus (0.00461 -0.13611 0.0056)
      PathPoint: DELT2pt2 (0.0272 0.00535 0.04807)
      PathPoint: scapula (0.00005 0.00294 0.02233)
      PathPoint: scapula (-0.01078 -0.00034 0.0062)
      PathWrap: wrap_object=Deltoid2 method=hybrid
      PathWrap: wrap_object=delt2hum
      PathWrap: wrap_object=TMAJ_LAT_PEC_CORBhh
    Schutte1993Muscle DELT3: max_isometric_force=259.88 optimal_fiber_length=0.1367 tendon_slack_length=0.038
        pennation_angle=0.3141593
      PathPoint: scapula (-0.05573 0.00122 -0.02512)
      PathPoint: scapula (-0.07247 -0.03285 0.01233)
      PathPoint: humerus (0.00206 -0.07602 0.01045)
      PathWrap: wrap_object=Delt3
      PathWrap: wrap_object=delt3hum method=hybrid
      PathWrap: wrap_object=TMAJ_LAT_PEC_CORBhh
    Schutte1993Muscle SUPSP: max_isometric_force=487.82 optimal_fiber_length=0.0682 tendon_slack_length=0.0395
        pennation_angle=0.122173
      PathPoint: humerus (0.00256 0.01063 0.02593)
      PathPoint: scapula (-0.01918 0.00127 -0.01271)
      PathPoint: scapula (-0.044 -0.01512 -0.05855)
      PathWrap: wrap_object=SUPSP method=hybrid
    Schutte1993Muscle INFSP: max_isometric_force=1210.84 optimal_fiber_length=0.0755 tendon_slack_length=0.0308
        pennation_angle=0.3228859
      PathPoint: humerus (-0.00887 0.00484 0.02448)
      PathPoint: scapula (-0.07382 -0.05476 -0.04781)
      PathWrap: wrap_object=INFSP
      PathWrap: wrap_object=INFSP_and_TMIN_hum_head method=hybrid
    Schutte1993Muscle SUBSC: max_isometric_force=1377.81 optimal_fiber_length=0.0873 tendon_slack_length=0.033
        pennation_angle=0.3490659
      PathPoint: humerus (0.01403 0.0084 -0.01331)
      PathPoint: scapula (-0.01831 -0.05223 -0.02457)
      PathPoint: scapula (-0.07246 -0.03943 -0.06475)
      PathWrap: wrap_object=SUBSCAP method=hybrid
    Schutte1993Muscle TMIN: max_isometric_force=354.25 optimal_fiber_length=0.0741 tendon_slack_length=0.0713
        pennation_angle=0.418879
      PathPoint: humerus (-0.0011 -0.01264 0.02156)
      PathPoint: scapula (-0.09473 -0.07991 -0.04737)
      PathPoint: scapula (-0.09643 -0.08121 -0.05298)
      PathWrap: wrap_object=TMIN method=hybrid range=(1 2)
      PathWrap: wrap_object=INFSP_and_TMIN_hum_head method=hybrid range=(1 2)
      PathWrap: wrap_object=TMINhum range=(1 2)
    Schutte1993Muscle TMAJ: max_isometric_force=425.39 optimal_fiber_length=0.1624 tendon_slack_length=0.02
        pennation_angle=0.2792527
      PathPoint: humerus (0.00998 -0.05419 -0.00568)
      PathPoint: scapula (-0.10264 -0.10319 -0.05829)
      PathPoint: scapula (-0.10489 -0.10895 -0.07117)
      PathWrap: wrap_object=TMAJ_LAThum
      PathWrap: wrap_object=LAT_TMAJhh range=(1 2)
      PathWrap: wrap_object=LAT_TMAJ2hh
    Schutte1993Muscle PECM1: max_isometric_force=364.41 optimal_fiber_length=0.1442 tendon_slack_length=0.0028
        pennation_angle=0.296706
      PathPoint: humerus (0.01169 -0.04191 0.0078)
      PathPoint: PEC1pt2 (0.01615 -0.04045 -0.00577)
      PathPoint: PEC1pt3 (0.00958 -0.01509 0.12664)
      PathPoint: clavicle (0.00321 -0.00013 0.05113)
      PathWrap: wrap_object=Thorax method=hybrid
      PathWrap: wrap_object=PEC12hum range=(2 3)
      PathWrap: wrap_object=PEC1hh method=hybrid
    Schutte1993Muscle PECM2: max_isometric_force=515.41 optimal_fiber_length=0.1385 tendon_slack_length=0.089
        pennation_angle=0.4363323
      PathPoint: humerus (0.01274 -0.04289 0.00785)
      PathPoint: PEC2pt2 (0.01453 -0.04568 -0.00687)
      PathPoint: PEC2pt3 (0.02018 -0.04165 0.1269)
      PathPoint: thorax (0.03091 -0.03922 0.09705)
      PathPoint: thorax (0.02769 -0.04498 0.02271)
      PathWrap: wrap_object=Thorax method=hybrid
      PathWrap: wrap_object=PEC12hum range=(2 3)
      PathWrap: wrap_object=TMAJ_LAT_PEC_CORBhh
      PathWrap: wrap_object=PEC23hh
    Schutte1993Muscle PECM3: max_isometric_force=390.55 optimal_fiber_length=0.1385 tendon_slack_length=0.132
        pennation_angle=0.4363323
      PathPoint: humerus (0.01269 -0.04375 0.0075)
      PathPoint: PEC3pt2 (0.01243 -0.05157 -0.01807)
      PathPoint: PEC3pt3 (0.02984 -0.071 0.1151)
      PathPoint: thorax (0.0525 -0.08417 0.08935)
      PathPoint: thorax (0.05724 -0.11654 0.03787)
      PathWrap: wrap_object=Thorax method=hybrid
      PathWrap: wrap_object=PEC3hum range=(2 3)
      PathWrap: wrap_object=PEC23hh
    Schutte1993Muscle LAT1: max_isometric_force=389.1 optimal_fiber_length=0.254 tendon_slack_length=0.12
        pennation_angle=0.4363323
      PathPoint: humerus (0.0105 -0.03415 -0.00653)
      PathPoint: LAT1pt2 (-0.07947 -0.08581 -0.02188)
      PathPoint: LAT1pt3 (-0.11215 -0.09779 -0.05322)
      PathPoint: thorax (-0.11828 -0.10118 0.03316)
      PathPoint: thorax (-0.09578 -0.11724 0.00882)
      PathWrap: wrap_object=TMAJ_LAThum
      PathWrap: wrap_object=LAT_TMAJhh range=(1 2)
      PathWrap: wrap_object=LAT_TMAJ2hh
    Schutte1993Muscle LAT2: max_isometric_force=389.1 optimal_fiber_length=0.2324 tendon_slack_length=0.1765
        pennation_angle=0.3316126
      PathPoint: humerus (0.00968 -0.04071 -0.00611)
      PathPoint: LAT2pt2 (-0.0764 -0.1022 -0.01808)
      PathPoint: LAT2pt3 (-0.10054 -0.13969 -0.05258)
      PathPoint: thorax (-0.10992 -0.16908 0.02878)
      PathPoint: thorax (-0.07186 -0.18818 0.00815)
      PathWrap: wrap_object=TMAJ_LAThum
      PathWrap: wrap_object=LAT_TMAJhh range=(1 2)
      PathWrap: wrap_object=LAT_TMAJ2hh
    Schutte1993Muscle LAT3: max_isometric_force=281.66 optimal_fiber_length=0.2789 tendon_slack_length=0.1403
        pennation_angle=0.3665191
      PathPoint: humerus (0.01208 -0.03922 -0.00416)
      PathPoint: LAT3pt2 (-0.05678 -0.13303 -0.0213)
      PathPoint: LAT3pt3 (-0.09449 -0.17553 -0.04606)
      PathPoint: thorax (-0.11157 -0.19387 0.05532)
      PathPoint: thorax (-0.07117 -0.24858 0.00907)
      PathWrap: wrap_object=TMAJ_LAThum
      PathWrap: wrap_object=LAT_TMAJhh range=(1 2)
      PathWrap: wrap_object=LAT_TMAJ2hh
    Schutte1993Muscle CORB: max_isometric_force=242.46 optimal_fiber_length=0.0932 tendon_slack_length=0.097
        pennation_angle=0
      PathPoint: scapula (0.0125 -0.04127 -0.02652)
      PathPoint: scapula (0.00483 -0.06958 -0.01563)
      PathPoint: humerus (0.00743 -0.15048 -0.00782)
      PathWrap: wrap_object=CORBhum
      PathWrap: wrap_object=TMAJ_LAT_PEC_CORBhh
    Schutte1993Muscle TRIlong: max_isometric_force=798.52 optimal_fiber_length=0.134 tendon_slack_length=0.143
        pennation_angle=0.2094395
      PathPoint: scapula (-0.04565 -0.04073 -0.01377)
      PathPoint: humerus (-0.02714 -0.11441 -0.00664)
      PathPoint: humerus (-0.03184 -0.22637 -0.01217)
      PathPoint: humerus (-0.01743 -0.26757 -0.01208)
      PathPoint: ulna (-0.0219 0.01046 -0.00078)
      PathWrap: wrap_object=TRI
      PathWrap: wrap_object=TRIlonghh method=hybrid
      PathWrap: wrap_object=TRIlongglen
    Schutte1993Muscle TRIlat: max_isometric_force=624.3 optimal_fiber_length=0.1138 tendon_slack_length=0.098
        pennation_angle=0.1570796
      PathPoint: humerus (-0.00599 -0.12646 0.00428)
      PathPoint: humerus (-0.02344 -0.14528 0.00928)
      PathPoint: humerus (-0.03184 -0.22637 -0.01217)
      PathPoint: humerus (-0.01743 -0.26757 -0.01208)
      PathPoint: ulna (-0.0219 0.01046 -0.00078)
      PathWrap: wrap_object=TRI
    Schutte1993Muscle TRImed: max_isometric_force=624.3 optimal_fiber_length=0.1138 tendon_slack_length=0.0908
        pennation_angle=0.1570796
      PathPoint: humerus (-0.00838 -0.13695 -0.00906)
      PathPoint: humerus (-0.02601 -0.15139 -0.0108)
      PathPoint: humerus (-0.03184 -0.22637 -0.01217)
      PathPoint: humerus (-0.01743 -0.26757 -0.01208)
      PathPoint: ulna (-0.0219 0.01046 -0.00078)
      PathWrap: wrap_object=TRI
    Schutte1993Muscle ANC: max_isometric_force=350 optimal_fiber_length=0.027 tendon_slack_length=0.018
        pennation_angle=0
      PathPoint: humerus (-0.00744 -0.28359 0.00979)
      PathPoint: ulna (-0.02532 -0.00124 0.006)
      PathWrap: wrap_object=ANC method=hybrid
    Schutte1993Muscle SUP: max_isometric_force=476 optimal_fiber_length=0.033 tendon_slack_length=0.028
        pennation_angle=0
      PathPoint: radius (0.00996 -0.06096 0.00075)
      PathPoint: radius (0.01201 -0.0517 -0.00107)
      PathPoint: ulna (-0.0136 -0.03384 0.02013)
      PathWrap: wrap_object=SUP
    Schutte1993Muscle BIClong: max_isometric_force=624.3 optimal_fiber_length=0.1157 tendon_slack_length=0.2723
        pennation_angle=0
      PathPoint: scapula (-0.03123 -0.02353 -0.01305)
      PathPoint: scapula (-0.02094 -0.01309 -0.00461)
      PathPoint: humerus (0.02131 0.01793 0.01028)
      PathPoint: humerus (0.02378 -0.00511 0.01201)
      PathPoint: humerus (0.01345 -0.02827 0.00136)
      PathPoint: humerus (0.01068 -0.07736 -0.00165)
      PathPoint: humerus (0.01703 -0.12125 0.00024)
      PathPoint: humerus (0.0228 -0.1754 -0.0063)
      PathPoint: bicpt2 (0 0 0)
      ConditionalPathPoint: bicpt (0 0 0) coordinate=pro_sup range=(-0.6387905 1.570796)
      PathPoint: radius (-0.002 -0.0375 -0.002)
      PathWrap: wrap_object=Elbow_BIC_BRD method=hybrid
      PathWrap: wrap_object=BIClong method=hybrid range=(2 3)
    Schutte1993Muscle BICshort: max_isometric_force=435.56 optimal_fiber_length=0.1321 tendon_slack_length=0.1923
        pennation_angle=0
      PathPoint: scapula (0.01268 -0.03931 -0.02625)
      PathPoint: scapula (0.00093 -0.06704 -0.01593)
      PathPoint: humerus (0.01117 -0.07576 -0.01101)
      PathPoint: humerus (0.01703 -0.12125 -0.01079)
      PathPoint: humerus (0.0228 -0.1754 -0.0063)
      PathPoint: bicpt2 (0 0 0)
      ConditionalPathPoint: bicpt (0 0 0) coordinate=pro_sup range=(-0.6387905 1.570796)
      PathPoint: radius (-0.002 -0.0375 -0.002)
      PathWrap: wrap_object=Elbow_BIC_BRD method=hybrid
    Schutte1993Muscle BRA: max_isometric_force=987.26 optimal_fiber_length=0.0858 tendon_slack_length=0.0535
        pennation_angle=0
      PathPoint: humerus (0.0068 -0.1739 -0.0036)
      ConditionalPathPoint: humerus (0.01894 -0.28559 -0.01105) coordinate=elbow_flexion range=(0 0.8131489)
      ConditionalPathPoint: ulna (0.00498 -0.01463 0.00128) coordinate=elbow_flexion range=(0 0.8131489)
      PathPoint: ulna (-0.0032 -0.0239 0.0009)
    Schutte1993Muscle BRD: max_isometric_force=261.33 optimal_fiber_length=0.1726 tendon_slack_length=0.133
        pennation_angle=0
      PathPoint: humerus (-0.0098 -0.19963 0.00223)
      PathPoint: radius (0.03577 -0.12742 0.02315)
      PathPoint: radius (0.0419 -0.221 0.0224)
      PathWrap: wrap_object=Elbow_BIC_BRD method=hybrid
    Schutte1993Muscle ECRL: max_isometric_force=304.89 optimal_fiber_length=0.081 tendon_slack_length=0.224
        pennation_angle=0
      PathPoint: humerus (-0.0073 -0.2609 0.0091)
      PathPoint: radius (0.03195 -0.13463 0.02779)
      PathPoint: radius (0.04243 -0.23684 0.0362)
      PathPoint: secondmc (0.00249 0.0164 0.0008)
      PathWrap: wrap_object=Elbow_PT_ECRL method=hybrid
      PathWrap: wrap_object=ECRL
    Schutte1993Muscle ECRB: max_isometric_force=100.52 optimal_fiber_length=0.0585 tendon_slack_length=0.2223
        pennation_angle=0.1553343
      PathPoint: humerus (0.01349 -0.29048 0.01698)
      PathPoint: radius (0.02905 -0.13086 0.02385)
      PathPoint: radius (0.03549 -0.22805 0.03937)
      PathPoint: thirdmc (0.00452 0.02788 0.00112)
      PathWrap: wrap_object=ECRB
    Schutte1993Muscle ECU: max_isometric_force=93.17 optimal_fiber_length=0.0622 tendon_slack_length=0.2285
        pennation_angle=0.06108652
      PathPoint: humerus (0.00083 -0.28955 0.0188)
      PathPoint: ulna (-0.01391 -0.03201 0.02947)
      PathPoint: ulna (-0.01705 -0.05428 0.02868)
      PathPoint: ulna (-0.01793 -0.09573 0.03278)
      PathPoint: radius (-0.01421 -0.22696 0.03481)
      PathPoint: fifthmc (-0.00061 0.02067 0.00294)
      PathWrap: wrap_object=ECU
    Schutte1993Muscle FCR: max_isometric_force=73.96 optimal_fiber_length=0.0628 tendon_slack_length=0.244
        pennation_angle=0.05410521
      PathPoint: humerus (0.00758 -0.27806 -0.03705)
      PathPoint: radius (0.0211 -0.21943 0.00127)
      PathPoint: secondmc (-0.00345 0.01918 -0.00921)
      PathWrap: wrap_object=Elbow_PT_ECRL method=hybrid
      PathWrap: wrap_object=FCR
    Schutte1993Muscle FCU: max_isometric_force=128.93 optimal_fiber_length=0.0509 tendon_slack_length=0.265
        pennation_angle=0.2111848
      PathPoint: humerus (0.00219 -0.2774 -0.0388)
      PathPoint: FCUpt (0.00549 0 0)
      PathPoint: radius (0.01082 -0.22327 0.00969)
      PathPoint: fifthmc (0.00154 0.01703 -0.0033)
      PathWrap: wrap_object=FCU
      PathWrap: wrap_object=Elbow_PT_ECRL method=hybrid
    Schutte1993Muscle PL: max_isometric_force=26.72 optimal_fiber_length=0.0638 tendon_slack_length=0.2694
        pennation_angle=0.06981317
      PathPoint: humerus (0.00457 -0.27519 -0.03865)
      PathPoint: radius (0.02531 -0.23915 -0.00276)
      PathPoint: capitate (0.00917 -0.01898 -0.01754)
      PathPoint: thirdmc (0.00179 0.00828 -0.00245)
      PathWrap: wrap_object=PL method=hybrid
      PathWrap: wrap_object=Elbow_PT_ECRL method=hybrid
    Schutte1993Muscle PT: max_isometric_force=566.22 optimal_fiber_length=0.0492 tendon_slack_length=0.098
        pennation_angle=0.1745329
      PathPoint: humerus (0.0036 -0.2759 -0.0365)
      PathPoint: ulna (0.00846 -0.03373 -0.01432)
      PathPoint: ptpt (0.00464 -0.00026 -0.00214)
      ConditionalPathPoint: radius (0.0236 -0.0934 0.0094) coordinate=pro_sup range=(-1.570796 0.5096361)
      PathPoint: radius (0.0254 -0.1088 0.0198)
      PathWrap: wrap_object=Elbow_PT_ECRL method=hybrid
    Schutte1993Muscle PQ: max_isometric_force=75.48 optimal_fiber_length=0.0282 tendon_slack_length=0.005
        pennation_angle=0.1745329
      PathPoint: radius (0.03245 -0.19998 0.01962)
      PathPoint: ulna (0.00193 -0.20972 0.03632)
      PathWrap: wrap_object=PQ2
      PathWrap: wrap_object=PQ1
    Schutte1993Muscle FDSL: max_isometric_force=16.55 optimal_fiber_length=0.0515 tendon_slack_length=0.3383
        pennation_angle=0.08726646
      PathPoint: humerus (0.00421 -0.27598 -0.03864)
      PathPoint: radius (0.01377 -0.18718 0.00205)
      PathPoint: capitate (-0.00235 -0.01393 -0.01376)
      PathPoint: fourthmc (-0.00294 0.00846 -0.01213)
      PathPoint: fifthmc (-0.00032 -0.01968 -0.00757)
      PathPoint: 5proxph (-0.00323 -0.03568 -0.00417)
      PathPoint: 5midph (-0.0026 -0.01983 -0.0035)
      PathWrap: wrap_object=FDS method=hybrid
      PathWrap: wrap_object=Elbow_PT_ECRL method=hybrid
    Schutte1993Muscle FDSR: max_isometric_force=57.9 optimal_fiber_length=0.0736 tendon_slack_length=0.328
        pennation_angle=0.06981317
      PathPoint: humerus (0.00479 -0.2788 -0.03731)
      PathPoint: radius (0.01571 -0.18666 0.00267)
      PathPoint: capitate (-0.00082 -0.01344 -0.01359)
      PathPoint: thirdmc (-0.00914 0.00544 -0.01085)
      PathPoint: fourthmc (-0.0029 -0.02334 -0.00767)
      PathPoint: 4proxph (-0.00172 -0.03947 -0.00102)
      PathPoint: 4midph (-0.00002 -0.02501 0.00029)
      PathWrap: wrap_object=FDS method=hybrid
      PathWrap: wrap_object=Elbow_PT_ECRL method=hybrid
    Schutte1993Muscle FDSM: max_isometric_force=91.03 optimal_fiber_length=0.0749 tendon_slack_length=0.295
        pennation_angle=0.122173
      PathPoint: ulna (-0.00669 -0.02713 -0.00191)
      PathPoint: radius (0.01899 -0.18706 0.00424)
      PathPoint: capitate (0.0068 -0.01377 -0.01399)
      PathPoint: thirdmc (0.00128 0.00639 -0.00952)
      PathPoint: thirdmc (0.00263 -0.02478 -0.00183)
      PathPoint: 3proxph (0.00252 -0.04307 0.00417)
      PathPoint: 3midph (0.00155 -0.02773 0.00067)
      PathWrap: wrap_object=FDS method=hybrid
    Schutte1993Muscle FDSI: max_isometric_force=61.24 optimal_fiber_length=0.0835 tendon_slack_length=0.275
        pennation_angle=0.1047198
      PathPoint: ulna (-0.00676 -0.02819 -0.00137)
      PathPoint: radius (0.02145 -0.18623 0.00552)
      PathPoint: capitate (0.00889 -0.01366 -0.01387)
      PathPoint: secondmc (-0.00407 -0.00025 -0.00479)
      PathPoint: secondmc (0.00304 -0.02206 -0.00579)
      PathPoint: 2proxph (0.00427 -0.03367 0.00444)
      PathPoint: 2midph (0.00228 -0.02088 -0.00029)
      PathWrap: wrap_object=FDS method=hybrid
      PathWrap: wrap_object=2ndmcp method=hybrid
    Schutte1993Muscle FDPL: max_isometric_force=79.65 optimal_fiber_length=0.0749 tendon_slack_length=0.2819
        pennation_angle=0.1396263
      PathPoint: ulna (-0.00628 -0.03214 0.00254)
      PathPoint: radius (0.01409 -0.18516 0.00861)
      PathPoint: capitate (-0.00088 -0.01027 -0.01188)
      PathPoint: fourthmc (-0.00686 0.0089 -0.00619)
      PathPoint: fifthmc (-0.00185 -0.01878 -0.00706)
      PathPoint: 5proxph (-0.0049 -0.03465 -0.00598)
      PathPoint: 5distph (-0.00032 -0.00433 -0.00165)
      PathWrap: wrap_object=FDP method=hybrid
    Schutte1993Muscle FDPR: max_isometric_force=64.08 optimal_fiber_length=0.0798 tendon_slack_length=0.282
        pennation_angle=0.122173
      PathPoint: ulna (-0.00502 -0.03374 0.00273)
      PathPoint: radius (0.0158 -0.18629 0.00803)
      PathPoint: capitate (0.00106 -0.01177 -0.01184)
      PathPoint: thirdmc (-0.0104 0.00473 -0.00804)
      PathPoint: fourthmc (-0.00289 -0.02297 -0.00609)
      PathPoint: 4proxph (-0.00304 -0.04002 -0.00075)
      PathPoint: 4distph (0.0001 -0.0066 -0.00066)
      PathWrap: wrap_object=FDP method=hybrid
    Schutte1993Muscle FDPM: max_isometric_force=81.65 optimal_fiber_length=0.0835 tendon_slack_length=0.293
        pennation_angle=0.1047198
      PathPoint: ulna (-0.00522 -0.03327 0.0021)
      PathPoint: radius (0.01906 -0.18644 0.00785)
      PathPoint: capitate (0.00335 -0.0128 -0.01144)
      PathPoint: thirdmc (-0.00128 0.00609 -0.00838)
      PathPoint: thirdmc (0.00034 -0.02347 -0.00303)
      PathPoint: 3proxph (0.00102 -0.04333 0.00294)
      PathPoint: 3distph (0.00023 -0.00505 -0.00226)
      PathWrap: wrap_object=FDP method=hybrid
    Schutte1993Muscle FDPI: max_isometric_force=68.27 optimal_fiber_length=0.0749 tendon_slack_length=0.2935
        pennation_angle=0.122173
      PathPoint: ulna (-0.00647 -0.03176 0.0028)
      PathPoint: radius (0.0208 -0.1856 0.00915)
      PathPoint: capitate (0.00896 -0.01168 -0.01212)
      PathPoint: secondmc (-0.00432 0.00663 -0.00248)
      PathPoint: secondmc (0.0042 -0.02262 -0.00499)
      PathPoint: 2proxph (0.00581 -0.03555 0.00306)
      PathPoint: 2distph (0.00046 -0.0046 -0.00301)
      PathWrap: wrap_object=FDP method=hybrid
      PathWrap: wrap_object=2ndmcp method=hybrid
    Schutte1993Muscle EDCL: max_isometric_force=13.11 optimal_fiber_length=0.065 tendon_slack_length=0.2965
        pennation_angle=0.03490659
      PathPoint: humerus (-0.0004 -0.28831 0.0187)
      PathPoint: EDCpt (0.0013 -0.03888 0.01405)
      PathPoint: radius (0.00993 -0.22304 0.03618)
      PathPoint: fifthmc (-0.00478 -0.01915 0.00447)
      PathPoint: 5proxph (-0.00716 -0.03302 -0.00089)
      PathPoint: 5distph (-0.00142 0.00068 0.00115)
      PathWrap: wrap_object=EDCL range=(3 4)
    Schutte1993Muscle EDCR: max_isometric_force=34.04 optimal_fiber_length=0.0626 tendon_slack_length=0.327
        pennation_angle=0.05235988
      PathPoint: humerus (-0.00156 -0.28936 0.01782)
      PathPoint: EDCpt (0.0026 -0.03991 0.01552)
      PathPoint: radius (0.00882 -0.22366 0.04284)
      PathPoint: fourthmc (-0.00338 -0.0233 0.00513)
      PathPoint: 4proxph (-0.00546 -0.03868 0.00413)
      PathPoint: 4distph (-0.00171 -0.00375 0.00241)
      PathWrap: wrap_object=EDCR
    Schutte1993Muscle EDCM: max_isometric_force=35.32 optimal_fiber_length=0.0724 tendon_slack_length=0.335
        pennation_angle=0.05235988
      PathPoint: humerus (0.00051 -0.28984 0.01949)
      PathPoint: EDCpt (0.00316 -0.03948 0.01528)
      PathPoint: radius (0.0144 -0.22323 0.04223)
      PathPoint: thirdmc (0.00131 -0.02342 0.00764)
      PathPoint: 3proxph (0.00179 -0.04239 0.01003)
      PathPoint: 3distph (0.00077 -0.01111 0.00201)
      PathWrap: wrap_object=EDCM
    Schutte1993Muscle EDCI: max_isometric_force=18.26 optimal_fiber_length=0.07 tendon_slack_length=0.322
        pennation_angle=0.05235988
      PathPoint: humerus (0.00065 -0.28898 0.01869)
      PathPoint: EDCpt (0.00228 -0.03918 0.01483)
      PathPoint: radius (0.01533 -0.22314 0.04196)
      PathPoint: secondmc (0.00474 -0.02656 0.01293)
      PathPoint: 2proxph (0.00192 -0.01101 0.01021)
      PathPoint: 2proxph (0.00771 -0.04191 0.01399)
      PathPoint: 2midph (0.00123 -0.00941 0.00581)
      PathPoint: 2midph (0.0026 -0.01959 0.00363)
      PathPoint: 2distph (0.00025 -0.0037 0.00228)
      PathWrap: wrap_object=EDCI range=(3 4)
      PathWrap: wrap_object=Secondpm range=(6 7)
      PathWrap: wrap_object=Secondmd range=(8 9)
    Schutte1993Muscle EDM: max_isometric_force=25.25 optimal_fiber_length=0.0675 tendon_slack_length=0.322
        pennation_angle=0.05235988
      PathPoint: humerus (0.00089 -0.28919 0.01847)
      PathPoint: ulna (-0.00977 -0.03907 0.03085)
      PathPoint: ulna (-0.00755 -0.08267 0.03646)
      PathPoint: radius (0.00454 -0.22641 0.03678)
      PathPoint: fifthmc (0.00131 0.02436 0.00794)
      PathPoint: fifthmc (-0.00537 -0.01848 0.00316)
      PathPoint: 5proxph (-0.0054 -0.03237 0.00015)
      PathPoint: 5distph (-0.00226 -0.00334 0.00062)
      PathWrap: wrap_object=EDM method=hybrid range=(4 5)
    Schutte1993Muscle EIP: max_isometric_force=21.7 optimal_fiber_length=0.0589 tendon_slack_length=0.186
        pennation_angle=0.1047198
      PathPoint: ulna (-0.00394 -0.16652 0.03682)
      PathPoint: ulna (0.00171 -0.17469 0.04049)
      PathPoint: radius (0.01076 -0.22783 0.03664)
      PathPoint: secondmc (-0.01081 0.01528 0.00681)
      PathPoint: secondmc (0.00441 -0.02602 0.01285)
      PathPoint: 2proxph (0.00171 -0.01033 0.00947)
      PathPoint: 2proxph (0.00714 -0.04133 0.01413)
      PathPoint: 2midph (0.00115 -0.00899 0.00597)
      PathPoint: 2midph (0.00294 -0.02043 0.00377)
      PathPoint: 2distph (0.00264 -0.01233 0.00266)
      PathWrap: wrap_object=Extensor_ellipse method=hybrid
      PathWrap: wrap_object=Secondpm range=(7 8)
      PathWrap: wrap_object=Secondmd range=(9 10)
    Schutte1993Muscle EPL: max_isometric_force=39.46 optimal_fiber_length=0.054 tendon_slack_length=0.2205
        pennation_angle=0.1047198
      PathPoint: ulna (-0.01412 -0.09706 0.02952)
      PathPoint: radius (0.00124 -0.13668 0.0227)
      PathPoint: radius (0.02702 -0.21872 0.03828)
      PathPoint: radius (0.03382 -0.22754 0.04607)
      PathPoint: radius (0.04234 -0.23771 0.04173)
      PathPoint: capitate (0.02428 0.00014 0.00608)
      PathPoint: trapezium (0.00809 -0.0046 0.00992)
      PathPoint: firstmc (0.00656 -0.0043 0.00792)
      PathPoint: firstmc (0.02165 -0.0242 -0.00533)
      PathPoint: proximal_thumb (0.01147 -0.00362 0.00156)
      PathPoint: proximal_thumb (0.01921 -0.0265 -0.01038)
      PathPoint: distal_thumb (0.00543 -0.00714 -0.00464)
      PathWrap: wrap_object=MPthumb
    Schutte1993Muscle EPB: max_isometric_force=14.2 optimal_fiber_length=0.0675 tendon_slack_length=0.1155
        pennation_angle=0.1256637
      PathPoint: radius (0.01924 -0.14695 0.02114)
      PathPoint: radius (0.02276 -0.15857 0.02665)
      PathPoint: radius (0.03831 -0.19722 0.03834)
      PathPoint: radius (0.05235 -0.23611 0.02699)
      PathPoint: capitate (0.03123 0.00256 -0.00327)
      PathPoint: firstmc1 (0.01443 -0.00337 -0.00405)
      PathPoint: firstmc (0.02173 -0.02303 -0.01141)
      PathPoint: proximal_thumb (0.00927 -0.00618 -0.00557)
      PathWrap: wrap_object=MPthumb
    Schutte1993Muscle FPL: max_isometric_force=77.2 optimal_fiber_length=0.0552 tendon_slack_length=0.1938
        pennation_angle=0.122173
      PathPoint: radius (0.00971 -0.09458 0.01769)
      PathPoint: radius (0.01658 -0.13525 0.01915)
      PathPoint: radius (0.01869 -0.17932 0.01988)
      PathPoint: radius (0.038 -0.23171 0.0158)
      PathPoint: FPLpt (0.01869 0.00882 -0.01547)
      PathPoint: FPLpt2 (0.01244 -0.02207 -0.02089)
      PathPoint: firstmc (-0.00608 -0.01624 -0.0094)
      PathPoint: firstmc (0.00208 -0.02297 -0.00956)
      PathPoint: proximal_thumb (-0.0045 -0.01842 -0.00508)
      PathPoint: proximal_thumb (0.0059 -0.02602 -0.01114)
      PathPoint: distal_thumb (0.00242 -0.01127 -0.00412)
      PathWrap: wrap_object=FPL method=hybrid
      PathWrap: wrap_object=IPthumb
      PathWrap: wrap_object=MPthumb
    Schutte1993Muscle APL: max_isometric_force=59.53 optimal_fiber_length=0.0713 tendon_slack_length=0.1295
        pennation_angle=0.1308997
      PathPoint: radius (0.01154 -0.09477 0.01681)
      PathPoint: radius (0.0303 -0.1397 0.03507)
      PathPoint: radius (0.03993 -0.16072 0.034)
      PathPoint: radius (0.04397 -0.17845 0.03134)
      PathPoint: radius (0.05505 -0.23084 0.02368)
      PathPoint: APLpt (0.03385 0.00634 -0.00745)
      PathPoint: firstmc1 (0.01058 0.00662 -0.00619)
      PathPoint: firstmc (0.00629 0.00323 -0.00589)
      PathPoint: firstmc (0.00827 -0.00586 -0.00604)
      PathWrap: wrap_object=APL range=(5 6)
  BodySet:
    Body ground: mass=0 mass_center=(0 0 0) inertia_xx=0 inertia_yy=0 inertia_zz=0
    Body thorax: mass=0 mass_center=(0 0 0) inertia_xx=0 inertia_yy=0 inertia_zz=0 meshes=thorax.vtp
      WeldJoint ground_thorax: parent_body=ground location_in_parent=(0 0 0) location=(0 0 0)
      WrapEllipsoid Thorax: dimensions=(0.1 0.135 0.08) xyz_body_rotation=(0.0434587 -0.3319616 0.1898918)
          translation=(-0.0386 -0.1273 0.0709)
    Body clavicle: mass=0 mass_center=(0 0 0) inertia_xx=0 inertia_yy=0 inertia_zz=0 meshes=clavicle.vtp
      CustomJoint sternoclavicular: parent_body=thorax location_in_parent=(0.006325 0.00693 0.025465) location=(0 0 0)
        Coordinate sternoclavicular_r2: default_value=0 initial_value=0 range=(-99999.9 99999.9) clamped=false
        Coordinate sternoclavicular_r3: default_value=0 initial_value=0 range=(-99999.9 99999.9) clamped=false
        SpatialTransform: axes_held_at_zero=(rotation3 translation1 translation2 translation3)
          TransformAxis rotation1: axis=(0.0153 0.9892987 -0.1451) coordinates=sternoclavicular_r2
          TransformAxis rotation2: axis=(-0.9944725 0 -0.104997) coordinates=sternoclavicular_r3
    Body clavphant: mass=0 mass_center=(0 0 0) inertia_xx=0 inertia_yy=0 inertia_zz=0
      CustomJoint unrotscap: parent_body=clavicle location_in_parent=(-0.01433 0.02007 0.135535) location=(0 0 0)
        Coordinate unrotscap_r3: default_value=0 initial_value=0 range=(-99999.9 99999.9) clamped=false
        Coordinate unrotscap_r2: default_value=0 initial_value=0 range=(-99999.9 99999.9) clamped=false
        SpatialTransform: axes_held_at_zero=(rotation3 translation1 translation2 translation3)
          TransformAxis rotation1: axis=(-0.9944725 0 -0.104997) coordinates=unrotscap_r3
          TransformAxis rotation2: axis=(0.0153 0.9892987 -0.1451) coordinates=unrotscap_r2
    Body scapula: mass=0 mass_center=(0 0 0) inertia_xx=0 inertia_yy=0 inertia_zz=0 meshes=scapula.vtp
      CustomJoint acromioclavicular: parent_body=clavphant location_in_parent=(0 0 0) location=(0 0 0)
        Coordinate acromioclavicular_r2: default_value=0 initial_value=0 range=(-99999.9 99999.9) clamped=false
        Coordinate acromioclavicular_r3: default_value=0 initial_value=0 range=(-99999.9 99999.9) clamped=false
        Coordinate acromioclavicular_r1: default_value=0 initial_value=0 range=(-99999.9 99999.9) clamped=false
        SpatialTransform: axes_held_at_zero=(translation1 translation2 translation3)
          TransformAxis rotation1: axis=(0.1570949 0.9472686 -0.2792909) coordinates=acromioclavicular_r2
          TransformAxis rotation2: axis=(-0.754084 0.297594 0.585487) coordinates=acromioclavicular_r3
          TransformAxis rotation3: axis=(0.6376999 0.1186 0.7610998) coordinates=acromioclavicular_r1
      WrapEllipsoid Deltoid2: dimensions=(0.03 0.04 0.035) active=false
          xyz_body_rotation=(3.130423 -1.548805 -1.314233) translation=(-0.0058 -0.0378 0.0096) quadrant=-y
      WrapTorus Delt3: inner_radius=0.04 outer_radius=0.06 active=false
          xyz_body_rotation=(0.6209881 0.32882 -0.5607743) translation=(-0.0973 -0.0428 -0.037)
      WrapTorus INFSP: inner_radius=0.008 outer_radius=0.019 xyz_body_rotation=(0.02530727 0.5883505 0.1518436)
          translation=(-0.0561 -0.0199 -0.0112)
      WrapEllipsoid TMIN: dimensions=(0.03 0.03 0.05) xyz_body_rotation=(-2.097537 -0.2808235 -1.763481)
          translation=(-0.0418 -0.0519 -0.0359) quadrant=x
      WrapCylinder TRIlongglen: radius=0.003 length=0.03 xyz_body_rotation=(1.375319 -0.2946116 2.435956)
          translation=(-0.0359 -0.0309 -0.0132) quadrant=x
    Body scapphant: mass=0 mass_center=(0 0 0) inertia_xx=0 inertia_yy=0 inertia_zz=0
      CustomJoint unrothum: parent_body=scapula location_in_parent=(-0.00955 -0.034 0.009) location=(0 0 0)
        Coordinate unrothum_r1: default_value=0 initial_value=0 range=(-99999.9 99999.9) clamped=false
        Coordinate unrothum_r3: default_value=0 initial_value=0 range=(-99999.9 99999.9) clamped=false
        Coordinate unrothum_r2: default_value=0 initial_value=0 range=(-99999.9 99999.9) clamped=false
        SpatialTransform: axes_held_at_zero=(translation1 translation2 translation3)
          TransformAxis rotation1: axis=(0.6376999 0.1186 0.7610998) coordinates=unrothum_r1
          TransformAxis rotation2: axis=(-0.754084 0.297594 0.585487) coordinates=unrothum_r3
          TransformAxis rotation3: axis=(0.1570949 0.9472686 -0.2792909) coordinates=unrothum_r2
    Body humphant: mass=0 mass_center=(0 0 0) inertia_xx=0 inertia_yy=0 inertia_zz=0
      CustomJoint shoulder0: parent_body=scapphant location_in_parent=(0 0 0) location=(0 0 0)
        Coordinate elv_angle: default_value=0 initial_value=0 range=(-1.570796 2.268928) keys=(s_key leftmouse_button)
            clamped=true
        SpatialTransform: axes_held_at_zero=(rotation1 rotation3 translation1 translation2 translation3)
          TransformAxis rotation2: axis=(0.004800001 0.9990892 0.04240001) coordinates=elv_angle
              LinearFunction(coefficients=1 0)
    Body humphant1: mass=0 mass_center=(0 0 0) inertia_xx=0 inertia_yy=0 inertia_zz=0
      CustomJoint shoulder1: parent_body=humphant location_in_parent=(0 0 0) location=(0 0 0)
        Coordinate shoulder_elv: default_value=0 initial_value=0 range=(0 3.141593) keys=(s_key middlemouse_button)
            clamped=true
        Coordinate shoulder1_r2: default_value=1.583068 initial_value=1.583068 range=(-99999.9 99999.9) clamped=false
        SpatialTransform: axes_held_at_zero=(rotation1 translation1 translation2 translation3)
          TransformAxis rotation2: axis=(-0.9982614 0.002300001 0.05889802) coordinates=shoulder_elv
              LinearFunction(coefficients=1 0)
          TransformAxis rotation3: axis=(0.004800001 0.9990892 0.04240001) coordinates=shoulder1_r2
    Body humerus: mass=0 mass_center=(0 0 0) inertia_xx=0 inertia_yy=0 inertia_zz=0 meshes=humerus.vtp
      CustomJoint shoulder2: parent_body=humphant1 location_in_parent=(0 0 0) location=(0 0 0)
        Coordinate shoulder_rot: default_value=0 initial_value=0 range=(-1.570796 0.3490659)
            keys=(s_key rightmouse_button) clamped=true
        SpatialTransform: axes_held_at_zero=(rotation1 rotation3 translation1 translation2 translation3)
          TransformAxis rotation2: axis=(0.004800001 0.9990892 0.04240001) coordinates=shoulder_rot
              LinearFunction(coefficients=1 0)
      WrapEllipsoid DELT1hh: dimensions=(0.03 0.1 0.05) xyz_body_rotation=(0.05846853 1.004612 0.5703736)
          translation=(-0.0139 -0.0127 -0.0262) quadrant=z
      WrapCylinder delt2hum: radius=0.0094 length=0.05 xyz_body_rotation=(1.680927 -0.02495821 0.05166175)
          translation=(0.0017 -0.0958 0.0011)
      WrapEllipsoid delt3hum: dimensions=(0.01 0.01 0.05) xyz_body_rotation=(1.727352 0.07592182 -2.743134)
          translation=(0.0019 -0.0592 0.0011) quadrant=x
      WrapEllipsoid SUPSP: dimensions=(0.02 0.02 0.02) xyz_body_rotation=(0.03804818 0.00855211 -1.306728)
          translation=(0.0002 0.0077 0.0043)
      WrapEllipsoid INFSP_and_TMIN_hum_head: dimensions=(0.02 0.025 0.02)
          xyz_body_rotation=(-0.2865831 -0.00907571 -0.06841691) translation=(-0.0003 0.0026 0.0038)
      WrapEllipsoid SUBSCAP: dimensions=(0.02 0.017 0.028) xyz_body_rotation=(-0.9245009 0.288852 0.381529)
          translation=(-0.0025 0.0007 -0.0045)
      WrapCylinder TMINhum: radius=0.007 length=0.07 xyz_body_rotation=(1.753532 0.06928957 2.746276)
          translation=(-0.0014 -0.0455 0) quadrant=x
      WrapSphere TMAJ_LAT_PEC_CORBhh: radius=0.03 translation=(0.0007 0 0.006)
      WrapCylinder TMAJ_LAThum: radius=0.007 length=0.04 xyz_body_rotation=(1.536413 -0.06370452 1.41424)
          translation=(0.0007 -0.0443 -0.0055) quadrant=-x
      WrapEllipsoid PEC1hh: dimensions=(0.03 0.02 0.02) xyz_body_rotation=(-0.6204646 -0.3104941 0.3637266)
          translation=(-0.0037 0.0005 -0.0025) quadrant=-z
      WrapCylinder PEC12hum: radius=0.009 length=0.07 xyz_body_rotation=(1.559277 -0.07749262 -0.9258972)
          translation=(0.002 -0.0508 -0.0017) quadrant=x
      WrapSphere PEC23hh: radius=0.02 translation=(-0.0086 0.0021 -0.0004)
      WrapCylinder PEC3hum: radius=0.008 length=0.07 xyz_body_rotation=(1.440944 -0.0561996 1.751961)
          translation=(0.0009 -0.0551 -0.0004) quadrant=-x
      WrapCylinder LAT_TMAJhh: radius=0.007 length=0.045 xyz_body_rotation=(-0.3050835 -0.01832596 -0.6866125)
          translation=(-0.0224 0.0102 0.0094) quadrant=-y
      WrapSphere LAT_TMAJ2hh: radius=0.03 xyz_body_rotation=(-0.1272345 0.2761111 0.01972222)
          translation=(-0.0016 0.0092 0.0052) quadrant=-z
      WrapCylinder CORBhum: radius=0.008 length=0.05 xyz_body_rotation=(-1.608321 0.09599311 0.8752826)
          translation=(0.0027 -0.1202 -0.0059) quadrant=x
      WrapEllipsoid TRIlonghh: dimensions=(0.035 0.02 0.02) xyz_body_rotation=(3.001617 -0.853466 2.574186)
          translation=(-0.0078 -0.0041 -0.0014) quadrant=z
      WrapCylinder TRI: radius=0.016 length=0.04 xyz_body_rotation=(-0.1401499 -0.00628319 0.1549852)
          translation=(0.0028 -0.2919 -0.0119)
      WrapEllipsoid ANC: dimensions=(0.02 0.02 0.02) xyz_body_rotation=(0.00750492 -0.1966986 1.049292)
          translation=(0.0134 -0.2861 -0.0008) quadrant=-x
      WrapEllipsoid BIClong: dimensions=(0.025 0.02 0.02) xyz_body_rotation=(-2.004336 -1.001644 0.9754645)
          translation=(0.0033 0.0073 0.0003) quadrant=-y
      WrapEllipsoid Elbow_BIC_BRD: dimensions=(0.015 0.015 0.1) xyz_body_rotation=(-0.1286308 0.1375319 0.03071779)
          translation=(0.0019 -0.289 -0.014) quadrant=x
      WrapEllipsoid Elbow_PT_ECRL: dimensions=(0.018 0.025 0.035) xyz_body_rotation=(-0.1610939 -0.1108284 0.6145304)
          translation=(0.003 -0.2872 -0.0069) quadrant=x
    Body ulna: mass=0 mass_center=(0 0 0) inertia_xx=0 inertia_yy=0 inertia_zz=0 meshes=ulna.vtp
      CustomJoint elbow: parent_body=humerus location_in_parent=(0.0061 -0.2904 -0.0123) location=(0 0 0)
        Coordinate elbow_flexion: default_value=0 initial_value=0 range=(0 2.268928) keys=(e_key leftmouse_button)
            clamped=true
        SpatialTransform: axes_held_at_zero=(rotation1 rotation2 translation1 translation2 translation3)
          TransformAxis rotation3: axis=(0.04940001 0.03660001 0.9981082) coordinates=elbow_flexion
              LinearFunction(coefficients=1 0)
      WrapCylinder PQ2: radius=0.007 length=0.01 xyz_body_rotation=(1.391376 0.06894051 1.522451)
          translation=(-0.0012 -0.2092 0.0428)
    Body radius: mass=0 mass_center=(0 0 0) inertia_xx=0 inertia_yy=0 inertia_zz=0 meshes=radius.vtp
      CustomJoint radioulnar: parent_body=ulna location_in_parent=(0.0004 -0.011503 0.019999) location=(0 0 0)
        Coordinate pro_sup: default_value=0 initial_value=0 range=(-1.570796 1.570796) keys=(p_key leftmouse_button)
            clamped=true
        SpatialTransform: axes_held_at_zero=(rotation1 rotation3 translation1 translation2 translation3)
          TransformAxis rotation2: axis=(-0.01716099 0.9926656 -0.119668) coordinates=pro_sup
              LinearFunction(coefficients=1 0)
      WrapCylinder SUP: radius=0.008 length=0.04 xyz_body_rotation=(1.447751 0.3040364 -2.441017)
          translation=(0.0045 -0.0437 0.0059) quadrant=-x
      WrapTorus ECU: inner_radius=0.006 outer_radius=0.009 xyz_body_rotation=(-0.9866346 -0.1488766 0.222704)
          translation=(-0.0163 -0.2417 0.0349)
      WrapCylinder PQ1: radius=0.01 length=0.01 xyz_body_rotation=(-1.607623 -0.0127409 -2.690251)
          translation=(0.0281 -0.1986 0.0288)
    Body lunate: mass=0 mass_center=(0 0 0) inertia_xx=0 inertia_yy=0 inertia_zz=0 meshes=lunate.vtp
      CustomJoint radiocarpal: parent_body=radius location_in_parent=(0.018 -0.242 0.025) location=(0 0 0)
        Coordinate deviation: default_value=0 initial_value=0 range=(-0.1745329 0.4363323)
            keys=(v_key leftmouse_button) clamped=true
        Coordinate flexion: default_value=0 initial_value=0 range=(-1.22173 1.22173) keys=(f_key leftmouse_button)
            clamped=true
        SpatialTransform: axes_held_at_zero=(rotation2 translation1 translation2 translation3)
          TransformAxis rotation1: axis=(-0.819064 -0.135611 -0.557444) coordinates=deviation
            NaturalCubicSpline: x=(-0.1745329 0 0.4363323) y=(-0.1745329 0 0.4363323)
          TransformAxis rotation3: axis=(0.9564267 -0.2522069 0.147104) coordinates=flexion
            NaturalCubicSpline: x=(-1.570796 1.570796) y=(-0.7853982 0.7853982)
      WrapEllipsoid Extensor_ellipse: dimensions=(0.05 0.02 0.013) xyz_body_rotation=(-0.2508038 0.2855359 0.2328269)
          translation=(0.0007 -0.0135 0.0047) quadrant=z
      WrapTorus ECRL: inner_radius=0.008 outer_radius=0.016 xyz_body_rotation=(1.538333 0.2343977 0.7311184)
          translation=(0.0222 -0.0096 0.0208)
      WrapTorus ECRB: inner_radius=0.008 outer_radius=0.01 xyz_body_rotation=(1.312662 -0.1178097 -0.1162389)
          translation=(0.0126 -0.0095 0.0186)
      WrapTorus FCR: inner_radius=0.001 outer_radius=0.0025 xyz_body_rotation=(-1.555961 -0.1532399 -0.1000074)
          translation=(0.0032 -0.0045 -0.019)
      WrapTorus FCU: inner_radius=0.0068 outer_radius=0.008 xyz_body_rotation=(-1.573763 -0.07976155 0.39235)
          translation=(-0.0123 -0.0124 -0.0171)
      WrapEllipsoid PL: dimensions=(0.025 0.014 0.012) xyz_body_rotation=(-0.03159046 0.0996583 0.06335545)
          translation=(0.0057 -0.018 -0.0041) quadrant=-z
      WrapEllipsoid FDS: dimensions=(0.025 0.013 0.012) xyz_body_rotation=(0.00837758 -0.08168141 -0.01710423)
          translation=(0.0012 -0.0057 -0.0003) quadrant=-z
      WrapEllipsoid FDP: dimensions=(0.025 0.013 0.012) xyz_body_rotation=(-1.467473 -0.1946042 0.121824)
          translation=(-0.0022 -0.0069 0.0032) quadrant=y
      WrapTorus EDCL: inner_radius=0.008 outer_radius=0.012 xyz_body_rotation=(2.363176 0.1930334 -0.2691298)
          translation=(-0.0128 -0.0133 0.0148)
      WrapTorus EDCR: inner_radius=0.009 outer_radius=0.011 xyz_body_rotation=(1.983916 0.100531 0.5230752)
          translation=(-0.0098 -0.0137 0.0166)
      WrapTorus EDCM: inner_radius=0.009 outer_radius=0.012 xyz_body_rotation=(1.993166 0.1979203 0.3682645)
          translation=(-0.0007 -0.0117 0.0191)
      WrapTorus EDCI: inner_radius=0.009 outer_radius=0.012 xyz_body_rotation=(1.697682 0.08970992 0.00767945)
          translation=(0.009 -0.0149 0.0211)
      WrapEllipsoid EDM: dimensions=(0.018 0.014 0.008) xyz_body_rotation=(2.962696 0.1593486 0.1179843)
          translation=(-0.0167 -0.0022 0.0048) quadrant=-z
      WrapEllipsoid FPL: dimensions=(0.016 0.01 0.01) xyz_body_rotation=(-0.1663299 -0.08220501 -0.06597345)
          translation=(0.017 -0.025 -0.0033) quadrant=-z
    Body scaphoid: mass=0 mass_center=(0 0 0) inertia_xx=0 inertia_yy=0 inertia_zz=0 meshes=scaphoid.vtp
      WeldJoint lun_scaph: parent_body=lunate location_in_parent=(0.012345 -0.004464 -0.001254) location=(0 0 0)
    Body pisiform: mass=0 mass_center=(0 0 0) inertia_xx=0 inertia_yy=0 inertia_zz=0 meshes=pisiform.vtp
      WeldJoint lun_pis: parent_body=lunate location_in_parent=(-0.013388 -0.009886 -0.010593) location=(0 0 0)
    Body triquetrum: mass=0 mass_center=(0 0 0) inertia_xx=0 inertia_yy=0 inertia_zz=0 meshes=triquetrum.vtp
      WeldJoint lun_triq: parent_body=lunate location_in_parent=(-0.010784 -0.007499 -0.001289) location=(0 0 0)
    Body capitate: mass=0 mass_center=(0 0 0) inertia_xx=0 inertia_yy=0 inertia_zz=0 meshes=capitate.vtp
      CustomJoint proximal_distal: parent_body=lunate location_in_parent=(0.003992 -0.015054 0.002327) location=(0 0 0)
        Coordinate proximal_distal_r1: default_value=0 initial_value=0 range=(-99999.9 99999.9) clamped=false
        Coordinate proximal_distal_r3: default_value=-0.6013205 initial_value=-0.6013205 range=(-99999.9 99999.9)
            clamped=false
        SpatialTransform: axes_held_at_zero=(rotation2 translation1 translation2 translation3)
          TransformAxis rotation1: axis=(0.8991357 -0.3490529 -0.2640399) coordinates=proximal_distal_r1
          TransformAxis rotation3: axis=(0.9971185 0.01069999 -0.07510096) coordinates=proximal_distal_r3
    Body trapezium: mass=0 mass_center=(0 0 0) inertia_xx=0 inertia_yy=0 inertia_zz=0 meshes=trapezium.vtp
      WeldJoint cap_trpzm: parent_body=capitate location_in_parent=(0.015293 -0.004569 -0.010308) location=(0 0 0)
    Body trapezoid: mass=0 mass_center=(0 0 0) inertia_xx=0 inertia_yy=0 inertia_zz=0 meshes=trapezoid.vtp
      WeldJoint cap_trpzd: parent_body=capitate location_in_parent=(0.009143 -0.004062 -0.002464) location=(0 0 0)
    Body hamate: mass=0 mass_center=(0 0 0) inertia_xx=0 inertia_yy=0 inertia_zz=0 meshes=hamate.vtp
      WeldJoint cap_ham: parent_body=capitate location_in_parent=(-0.010969 -0.002495 -0.00075) location=(0 0 0)
    Body firstmc1: mass=0 mass_center=(0 0 0) inertia_xx=0 inertia_yy=0 inertia_zz=0
      CustomJoint CMC1a: parent_body=trapezium location_in_parent=(0 0 0) location=(0 0 0)
        Coordinate cmc_flexion: default_value=0 initial_value=0 range=(-0.2617994 0.7853982)
            keys=(c_key leftmouse_button) clamped=true
        SpatialTransform: axes_held_at_zero=(rotation1 rotation2 translation1 translation2 translation3)
          TransformAxis rotation3: axis=(-0.04239899 -0.6652859 0.7453838) coordinates=cmc_flexion
              LinearFunction(coefficients=1 0)
      WrapTorus APL: inner_radius=0.004 outer_radius=0.008 active=false
          xyz_body_rotation=(-1.609892 0.2478367 -0.0301942) translation=(0.0082 0.0023 -0.0101)
    Body firstmc: mass=0 mass_center=(0 0 0) inertia_xx=0 inertia_yy=0 inertia_zz=0 meshes=1mc.vtp
      CustomJoint CMC1b: parent_body=firstmc1 location_in_parent=(0.0072 -0.0054 -0.0025) location=(0 0 0)
        Coordinate cmc_abduction: default_value=0 initial_value=0 range=(-0.4363323 0.4363323)
            keys=(a_key leftmouse_button) clamped=true
        SpatialTransform: axes_held_at_zero=(rotation2 rotation3 translation1 translation2 translation3)
          TransformAxis rotation1: axis=(0.495557 0.731736 0.467959) coordinates=cmc_abduction
              LinearFunction(coefficients=1 0)
      WrapCylinder MPthumb: radius=0.0085 length=0.02 xyz_body_rotation=(0.3213151 0.1101303 -0.834791)
          translation=(0.0177 -0.0305 -0.0143)
    Body secondmc: mass=0 mass_center=(0 0 0) inertia_xx=0 inertia_yy=0 inertia_zz=0 meshes=2mc.vtp
      WeldJoint CMC2: parent_body=capitate location_in_parent=(0.014685 -0.03762 0.005032) location=(0 0 0)
      WrapEllipsoid 2ndmcp: dimensions=(0.005 0.005 0.03) xyz_body_rotation=(1.486671 -1.296605 2.43072)
          translation=(0.0059 -0.0304 -0.0006) quadrant=-x
    Body thirdmc: mass=0 mass_center=(0 0 0) inertia_xx=0 inertia_yy=0 inertia_zz=0 meshes=3mc.vtp
      WeldJoint CMC3: parent_body=capitate location_in_parent=(0.000477 -0.039239 0.007377) location=(0 0 0)
    Body fourthmc: mass=0 mass_center=(0 0 0) inertia_xx=0 inertia_yy=0 inertia_zz=0 meshes=4mc.vtp
      WeldJoint CMC4: parent_body=capitate location_in_parent=(-0.012046 -0.040519 0.003513) location=(0 0 0)
    Body fifthmc: mass=0 mass_center=(0 0 0) inertia_xx=0 inertia_yy=0 inertia_zz=0 meshes=5mc.vtp
      WeldJoint CMC5: parent_body=capitate location_in_parent=(-0.021896 -0.034683 -0.004218) location=(0 0 0)
    Body proximal_thumb: mass=0 mass_center=(0 0 0) inertia_xx=0 inertia_yy=0 inertia_zz=0 meshes=thumbprox.vtp
      CustomJoint MCP: parent_body=firstmc location_in_parent=(0.0165 -0.0292 -0.0127) location=(0 0 0)
        Coordinate mp_flexion: default_value=0 initial_value=0 range=(-0.7853982 0.6981317)
            keys=(m_key leftmouse_button) clamped=true
        SpatialTransform: axes_held_at_zero=(rotation1 rotation2 translation1 translation2 translation3)
          TransformAxis rotation3: axis=(-0.084295 -0.203488 0.9754419) coordinates=mp_flexion
              LinearFunction(coefficients=1 0)
      WrapCylinder IPthumb: radius=0.0045 length=0.01 xyz_body_rotation=(0.3047345 0.01291544 0.08796459)
          translation=(0.0121 -0.0302 -0.0096) quadrant=-x
    Body distal_thumb: mass=0 mass_center=(0 0 0) inertia_xx=0 inertia_yy=0 inertia_zz=0 meshes=thumbdist.vtp
      CustomJoint IP: parent_body=proximal_thumb location_in_parent=(0.014 -0.0259 -0.0101) location=(0 0 0)
        Coordinate ip_flexion: default_value=0 initial_value=0 range=(-1.308997 0.4363323)
            keys=(i_key leftmouse_button) clamped=true
        SpatialTransform: axes_held_at_zero=(rotation1 rotation2 translation1 translation2 translation3)
          TransformAxis rotation3: axis=(-0.05010201 -0.4796231 0.8760431) coordinates=ip_flexion
              LinearFunction(coefficients=1 0)
    Body 2proxph: mass=0 mass_center=(0 0 0) inertia_xx=0 inertia_yy=0 inertia_zz=0 meshes=2proxph.vtp
      CustomJoint 2MCP: parent_body=secondmc location_in_parent=(0.003501 -0.028243 0.00362) location=(0 0 0)
        Coordinate 2mcp_flexion: default_value=0 initial_value=0 range=(-0.8726646 1.570796) clamped=true
        Coordinate 2mcp_abduction: default_value=0 initial_value=0 range=(-0.2617994 0.2617994) clamped=true
        SpatialTransform: axes_held_at_zero=(rotation2 translation1 translation2 translation3)
          TransformAxis rotation1: axis=(0.9975061 -0.03949601 0.05849401) coordinates=2mcp_flexion
              LinearFunction(coefficients=1 0)
          TransformAxis rotation3: axis=(-0.05499898 0.08589897 0.9947846) coordinates=2mcp_abduction
              LinearFunction(coefficients=1 0)
      WrapCylinder Secondpm: radius=0.004 length=0.01 xyz_body_rotation=(0.7419395 -1.473931 0.7096509)
          translation=(0.0075 -0.0407 0.0061)
    Body 2midph: mass=0 mass_center=(0 0 0) inertia_xx=0 inertia_yy=0 inertia_zz=0 meshes=2midph.vtp
      CustomJoint 2prox-midph: parent_body=2proxph location_in_parent=(0.007517 -0.041273 0.007326) location=(0 0 0)
        Coordinate 2pm_flexion: default_value=0 initial_value=0 range=(0 2.094395) clamped=true
        SpatialTransform: axes_held_at_zero=(rotation2 rotation3 translation1 translation2 translation3)
          TransformAxis rotation1: axis=(0.9603449 0.040998 -0.275784) coordinates=2pm_flexion
              LinearFunction(coefficients=1 0)
      WrapCylinder Secondmd: radius=0.003 length=0.01 xyz_body_rotation=(0.5017822 -1.413019 0.6473426)
          translation=(0.0036 -0.0243 0.0003) quadrant=x
    Body 2distph: mass=0 mass_center=(0 0 0) inertia_xx=0 inertia_yy=0 inertia_zz=0 meshes=2distph.vtp
      CustomJoint 2mid-distph: parent_body=2midph location_in_parent=(0.003333 -0.024888 0.00122) location=(0 0 0)
        Coordinate 2md_flexion: default_value=0 initial_value=0 range=(0 1.570796) clamped=true
        SpatialTransform: axes_held_at_zero=(rotation2 rotation3 translation1 translation2 translation3)
          TransformAxis rotation1: axis=(0.9789773 0.07690602 -0.1889151) coordinates=2md_flexion
              LinearFunction(coefficients=1 0)
    Body 3proxph: mass=0 mass_center=(0 0 0) inertia_xx=0 inertia_yy=0 inertia_zz=0 meshes=3proxph.vtp
      WeldJoint 3MCP: parent_body=thirdmc location_in_parent=(0.00024 -0.02629 0.001778) location=(0 0 0)
    Body 3midph: mass=0 mass_center=(0 0 0) inertia_xx=0 inertia_yy=0 inertia_zz=0 meshes=3midph.vtp
      WeldJoint 3prox-midph: parent_body=3proxph location_in_parent=(0.00165 -0.044211 0.00623) location=(0 0 0)
    Body 3distph: mass=0 mass_center=(0 0 0) inertia_xx=0 inertia_yy=0 inertia_zz=0 meshes=3distph.vtp
      WeldJoint 3mid-distph: parent_body=3midph location_in_parent=(0.001365 -0.029047 0.001954) location=(0 0 0)
    Body 4proxph: mass=0 mass_center=(0 0 0) inertia_xx=0 inertia_yy=0 inertia_zz=0 meshes=4proxph.vtp
      WeldJoint 4MCP: parent_body=fourthmc location_in_parent=(-0.00183 -0.023689 -0.000173) location=(0 0 0)
    Body 4midph: mass=0 mass_center=(0 0 0) inertia_xx=0 inertia_yy=0 inertia_zz=0 meshes=4midph.vtp
      WeldJoint 4prox-midph: parent_body=4proxph location_in_parent=(-0.003528 -0.040255 0.001345) location=(0 0 0)
    Body 4distph: mass=0 mass_center=(0 0 0) inertia_xx=0 inertia_yy=0 inertia_zz=0 meshes=4distph.vtp
      WeldJoint 4mid-distph: parent_body=4midph location_in_parent=(-0.002317 -0.024789 0.000563) location=(0 0 0)
    Body 5proxph: mass=0 mass_center=(0 0 0) inertia_xx=0 inertia_yy=0 inertia_zz=0 meshes=5proxph.vtp
      WeldJoint 5MCP: parent_body=fifthmc location_in_parent=(-0.001597 -0.021431 -0.001496) location=(0 0 0)
    Body 5midph: mass=0 mass_center=(0 0 0) inertia_xx=0 inertia_yy=0 inertia_zz=0 meshes=5midph.vtp
      WeldJoint 5prox-midph: parent_body=5proxph location_in_parent=(-0.005279 -0.035563 -0.002879) location=(0 0 0)
    Body 5distph: mass=0 mass_center=(0 0 0) inertia_xx=0 inertia_yy=0 inertia_zz=0 meshes=5distph.vtp
      WeldJoint 5mid-distph: parent_body=5midph location_in_parent=(-0.002871 -0.020677 -0.002243) location=(0 0 0)
    Body bicpt: mass=0 mass_center=(0 0 0) inertia_xx=0 inertia_yy=0 inertia_zz=0
      CustomJoint bicpt: parent_body=radius location_in_parent=(0 0 0) location=(0 0 0)
        Coordinate bicpt_tx: default_value=-0.0001 initial_value=-0.0001 range=(-99999.9 99999.9) clamped=false
        Coordinate bicpt_ty: default_value=-0.0276 initial_value=-0.0276 range=(-99999.9 99999.9) clamped=false
        Coordinate bicpt_tz: default_value=-0.0043 initial_value=-0.0043 range=(-99999.9 99999.9) clamped=false
        SpatialTransform: axes_held_at_zero=(rotation1 rotation2 rotation3)
          TransformAxis translation1: axis=(1 0 0) coordinates=bicpt_tx
          TransformAxis translation2: axis=(0 1 0) coordinates=bicpt_ty
          TransformAxis translation3: axis=(0 0 1) coordinates=bicpt_tz
    Body bicpt2: mass=0 mass_center=(0 0 0) inertia_xx=0 inertia_yy=0 inertia_zz=0
      CustomJoint bicpt2: parent_body=radius location_in_parent=(0 0 0) location=(0 0 0)
        Coordinate bicpt2_tx: default_value=0.01 initial_value=0.01 range=(-99999.9 99999.9) clamped=false
        Coordinate bicpt2_ty: default_value=-0.0102 initial_value=-0.0102 range=(-99999.9 99999.9) clamped=false
        Coordinate bicpt2_tz: default_value=-0.011533 initial_value=-0.011533 range=(-99999.9 99999.9) clamped=false
        SpatialTransform: axes_held_at_zero=(rotation1 rotation2 rotation3)
          TransformAxis translation1: axis=(1 0 0) coordinates=bicpt2_tx
          TransformAxis translation2: axis=(0 1 0) coordinates=bicpt2_ty
          TransformAxis translation3: axis=(0 0 1) coordinates=bicpt2_tz
    Body ptpt: mass=0 mass_center=(0 0 0) inertia_xx=0 inertia_yy=0 inertia_zz=0
      CustomJoint ptpt: parent_body=ulna location_in_parent=(0 0 0) location=(0 0 0)
        Coordinate ptpt_tx: default_value=0.0142 initial_value=0.0142 range=(-99999.9 99999.9) clamped=false
        Coordinate ptpt_ty: default_value=8099.939 initial_value=8099.939 range=(-99999.9 99999.9) clamped=false
        Coordinate ptpt_tz: default_value=-1.#QNAN0000000 initial_value=-1.#QNAN0000000 range=(-99999.9 99999.9)
            clamped=false
        SpatialTransform: axes_held_at_zero=(rotation1 rotation2 rotation3)
          TransformAxis translation1: axis=(1 0 0) coordinates=ptpt_tx
          TransformAxis translation2: axis=(0 1 0) coordinates=ptpt_ty
          TransformAxis translation3: axis=(0 0 1) coordinates=ptpt_tz
    Body FCUpt: mass=0 mass_center=(0 0 0) inertia_xx=0 inertia_yy=0 inertia_zz=0
      CustomJoint FCUpt: parent_body=radius location_in_parent=(0 0 0) location=(0 0 0)
        Coordinate FCUpt_tx: default_value=0.004 initial_value=0.004 range=(-99999.9 99999.9) clamped=false
        Coordinate FCUpt_ty: default_value=-1.#QNAN0000000 initial_value=-1.#QNAN0000000 range=(-99999.9 99999.9)
            clamped=false
        Coordinate FCUpt_tz: default_value=0.0005 initial_value=0.0005 range=(-99999.9 99999.9) clamped=false
        SpatialTransform: axes_held_at_zero=(rotation1 rotation2 rotation3)
          TransformAxis translation1: axis=(1 0 0) coordinates=FCUpt_tx
          TransformAxis translation2: axis=(0 1 0) coordinates=FCUpt_ty
          TransformAxis translation3: axis=(0 0 1) coordinates=FCUpt_tz
    Body EDCpt: mass=0 mass_center=(0 0 0) inertia_xx=0 inertia_yy=0 inertia_zz=0
      CustomJoint EDCpt: parent_body=radius location_in_parent=(0 0 0) location=(0 0 0)
        Coordinate EDCpt_tx: default_value=0 initial_value=0 range=(-99999.9 99999.9) clamped=false
        Coordinate EDCpt_ty: default_value=0 initial_value=0 range=(-99999.9 99999.9) clamped=false
        Coordinate EDCpt_tz: default_value=0 initial_value=0 range=(-99999.9 99999.9) clamped=false
        SpatialTransform: axes_held_at_zero=(rotation1 rotation2 rotation3)
          TransformAxis translation1: axis=(1 0 0) coordinates=EDCpt_tx
          TransformAxis translation2: axis=(0 1 0) coordinates=EDCpt_ty
          TransformAxis translation3: axis=(0 0 1) coordinates=EDCpt_tz
    Body APLpt: mass=0 mass_center=(0 0 0) inertia_xx=0 inertia_yy=0 inertia_zz=0
      CustomJoint APLpt: parent_body=capitate location_in_parent=(0 0 0) location=(0 0 0)
        Coordinate APLpt_tx: default_value=0 initial_value=0 range=(-99999.9 99999.9) clamped=false
        Coordinate APLpt_ty: default_value=0 initial_value=0 range=(-99999.9 99999.9) clamped=false
        Coordinate APLpt_tz: default_value=0 initial_value=0 range=(-99999.9 99999.9) clamped=false
        SpatialTransform: axes_held_at_zero=(rotation1 rotation2 rotation3)
          TransformAxis translation1: axis=(1 0 0) coordinates=APLpt_tx
          TransformAxis translation2: axis=(0 1 0) coordinates=APLpt_ty
          TransformAxis translation3: axis=(0 0 1) coordinates=APLpt_tz
    Body FPLpt: mass=0 mass_center=(0 0 0) inertia_xx=0 inertia_yy=0 inertia_zz=0
      CustomJoint FPLpt: parent_body=capitate location_in_parent=(0 0 0) location=(0 0 0)
        Coordinate FPLpt_tx: default_value=0 initial_value=0 range=(-99999.9 99999.9) clamped=false
        Coordinate FPLpt_ty: default_value=0 initial_value=0 range=(-99999.9 99999.9) clamped=false
        Coordinate FPLpt_tz: default_value=0 initial_value=0 range=(-99999.9 99999.9) clamped=false
        SpatialTransform: axes_held_at_zero=(rotation1 rotation2 rotation3)
          TransformAxis translation1: axis=(1 0 0) coordinates=FPLpt_tx
          TransformAxis translation2: axis=(0 1 0) coordinates=FPLpt_ty
          TransformAxis translation3: axis=(0 0 1) coordinates=FPLpt_tz
    Body FPLpt2: mass=0 mass_center=(0 0 0) inertia_xx=0 inertia_yy=0 inertia_zz=0
      CustomJoint FPLpt2: parent_body=capitate location_in_parent=(0 0 0) location=(0 0 0)
        Coordinate FPLpt2_tx: default_value=-1.#QNAN0000000 initial_value=-1.#QNAN0000000 range=(-99999.9 99999.9)
            clamped=false
        Coordinate FPLpt2_ty: default_value=0 initial_value=0 range=(-99999.9 99999.9) clamped=false
        Coordinate FPLpt2_tz: default_value=0 initial_value=0 range=(-99999.9 99999.9) clamped=false
        SpatialTransform: axes_held_at_zero=(rotation1 rotation2 rotation3)
          TransformAxis translation1: axis=(1 0 0) coordinates=FPLpt2_tx
          TransformAxis translation2: axis=(0 1 0) coordinates=FPLpt2_ty
          TransformAxis translation3: axis=(0 0 1) coordinates=FPLpt2_tz
    Body PEC1pt2: mass=0 mass_center=(0 0 0) inertia_xx=0 inertia_yy=0 inertia_zz=0
      CustomJoint PEC1pt2: parent_body=humerus location_in_parent=(0 0 0) location=(0 0 0)
        Coordinate PEC1pt2_tx: default_value=0 initial_value=0 range=(-99999.9 99999.9) clamped=false
        Coordinate PEC1pt2_ty: default_value=0 initial_value=0 range=(-99999.9 99999.9) clamped=false
        Coordinate PEC1pt2_tz: default_value=0 initial_value=0 range=(-99999.9 99999.9) clamped=false
        SpatialTransform: axes_held_at_zero=(rotation1 rotation2 rotation3)
          TransformAxis translation1: axis=(1 0 0) coordinates=PEC1pt2_tx
          TransformAxis translation2: axis=(0 1 0) coordinates=PEC1pt2_ty
          TransformAxis translation3: axis=(0 0 1) coordinates=PEC1pt2_tz
    Body PEC1pt3: mass=0 mass_center=(0 0 0) inertia_xx=0 inertia_yy=0 inertia_zz=0
      CustomJoint PEC1pt3: parent_body=thorax location_in_parent=(0 0 0) location=(0 0 0)
        Coordinate PEC1pt3_tx: default_value=0 initial_value=0 range=(-99999.9 99999.9) clamped=false
        Coordinate PEC1pt3_ty: default_value=0 initial_value=0 range=(-99999.9 99999.9) clamped=false
        Coordinate PEC1pt3_tz: default_value=0 initial_value=0 range=(-99999.9 99999.9) clamped=false
        SpatialTransform: axes_held_at_zero=(rotation1 rotation2 rotation3)
          TransformAxis translation1: axis=(1 0 0) coordinates=PEC1pt3_tx
          TransformAxis translation2: axis=(0 1 0) coordinates=PEC1pt3_ty
          TransformAxis translation3: axis=(0 0 1) coordinates=PEC1pt3_tz
    Body PEC2pt2: mass=0 mass_center=(0 0 0) inertia_xx=0 inertia_yy=0 inertia_zz=0
      CustomJoint PEC2pt2: parent_body=humerus location_in_parent=(0 0 0) location=(0 0 0)
        Coordinate PEC2pt2_tx: default_value=0 initial_value=0 range=(-99999.9 99999.9) clamped=false
        Coordinate PEC2pt2_ty: default_value=0 initial_value=0 range=(-99999.9 99999.9) clamped=false
        Coordinate PEC2pt2_tz: default_value=0 initial_value=0 range=(-99999.9 99999.9) clamped=false
        SpatialTransform: axes_held_at_zero=(rotation1 rotation2 rotation3)
          TransformAxis translation1: axis=(1 0 0) coordinates=PEC2pt2_tx
          TransformAxis translation2: axis=(0 1 0) coordinates=PEC2pt2_ty
          TransformAxis translation3: axis=(0 0 1) coordinates=PEC2pt2_tz
    Body PEC2pt3: mass=0 mass_center=(0 0 0) inertia_xx=0 inertia_yy=0 inertia_zz=0
      CustomJoint PEC2pt3: parent_body=thorax location_in_parent=(0 0 0) location=(0 0 0)
        Coordinate PEC2pt3_tx: default_value=0 initial_value=0 range=(-99999.9 99999.9) clamped=false
        Coordinate PEC2pt3_ty: default_value=0 initial_value=0 range=(-99999.9 99999.9) clamped=false
        Coordinate PEC2pt3_tz: default_value=0 initial_value=0 range=(-99999.9 99999.9) clamped=false
        SpatialTransform: axes_held_at_zero=(rotation1 rotation2 rotation3)
          TransformAxis translation1: axis=(1 0 0) coordinates=PEC2pt3_tx
          TransformAxis translation2: axis=(0 1 0) coordinates=PEC2pt3_ty
          TransformAxis translation3: axis=(0 0 1) coordinates=PEC2pt3_tz
    Body PEC3pt2: mass=0 mass_center=(0 0 0) inertia_xx=0 inertia_yy=0 inertia_zz=0
      CustomJoint PEC3pt2: parent_body=humerus location_in_parent=(0 0 0) location=(0 0 0)
        Coordinate PEC3pt2_tx: default_value=0 initial_value=0 range=(-99999.9 99999.9) clamped=false
        Coordinate PEC3pt2_ty: default_value=0 initial_value=0 range=(-99999.9 99999.9) clamped=false
        Coordinate PEC3pt2_tz: default_value=0 initial_value=0 range=(-99999.9 99999.9) clamped=false
        SpatialTransform: axes_held_at_zero=(rotation1 rotation2 rotation3)
          TransformAxis translation1: axis=(1 0 0) coordinates=PEC3pt2_tx
          TransformAxis translation2: axis=(0 1 0) coordinates=PEC3pt2_ty
          TransformAxis translation3: axis=(0 0 1) coordinates=PEC3pt2_tz
    Body PEC3pt3: mass=0 mass_center=(0 0 0) inertia_xx=0 inertia_yy=0 inertia_zz=0
      CustomJoint PEC3pt3: parent_body=thorax location_in_parent=(0 0 0) location=(0 0 0)
        Coordinate PEC3pt3_tx: default_value=0 initial_value=0 range=(-99999.9 99999.9) clamped=false
        Coordinate PEC3pt3_ty: default_value=0.000222 initial_value=0.000222 range=(-99999.9 99999.9) clamped=false
        Coordinate PEC3pt3_tz: default_value=0 initial_value=0 range=(-99999.9 99999.9) clamped=false
        SpatialTransform: axes_held_at_zero=(rotation1 rotation2 rotation3)
          TransformAxis translation1: axis=(1 0 0) coordinates=PEC3pt3_tx
          TransformAxis translation2: axis=(0 1 0) coordinates=PEC3pt3_ty
          TransformAxis translation3: axis=(0 0 1) coordinates=PEC3pt3_tz
    Body DELT2pt2a: mass=0 mass_center=(0 0 0) inertia_xx=0 inertia_yy=0 inertia_zz=0
      CustomJoint DELT2pt2a: parent_body=humerus location_in_parent=(0 0 0) location=(0 0 0)
        Coordinate DELT2pt2a_tx: default_value=0 initial_value=0 range=(-99999.9 99999.9) clamped=false
        Coordinate DELT2pt2a_ty: default_value=0 initial_value=0 range=(-99999.9 99999.9) clamped=false
        Coordinate DELT2pt2a_tz: default_value=0 initial_value=0 range=(-99999.9 99999.9) clamped=false
        SpatialTransform: axes_held_at_zero=(rotation1 rotation2 rotation3)
          TransformAxis translation1: axis=(1 0 0) coordinates=DELT2pt2a_tx
          TransformAxis translation2: axis=(0 1 0) coordinates=DELT2pt2a_ty
          TransformAxis translation3: axis=(0 0 1) coordinates=DELT2pt2a_tz
    Body DELT2pt2: mass=0 mass_center=(0 0 0) inertia_xx=0 inertia_yy=0 inertia_zz=0
      CustomJoint DELT2pt2: parent_body=DELT2pt2a location_in_parent=(0 0 0) location=(0 0 0)
        Coordinate DELT2pt2_tx: default_value=0.000049 initial_value=0.000049 range=(-99999.9 99999.9) clamped=false
        Coordinate DELT2pt2_ty: default_value=-0.000139 initial_value=-0.000139 range=(-99999.9 99999.9) clamped=false
        Coordinate DELT2pt2_tz: default_value=0 initial_value=0 range=(-99999.9 99999.9) clamped=false
        SpatialTransform: axes_held_at_zero=(rotation1 rotation2 rotation3)
          TransformAxis translation1: axis=(1 0 0) coordinates=DELT2pt2_tx
          TransformAxis translation2: axis=(0 1 0) coordinates=DELT2pt2_ty
          TransformAxis translation3: axis=(0 0 1) coordinates=DELT2pt2_tz
    Body LAT1pt2: mass=0 mass_center=(0 0 0) inertia_xx=0 inertia_yy=0 inertia_zz=0
      CustomJoint LAT1pt2: parent_body=scapula location_in_parent=(0 0 0) location=(0 0 0)
        Coordinate LAT1pt2_tx: default_value=0 initial_value=0 range=(-99999.9 99999.9) clamped=false
        Coordinate LAT1pt2_ty: default_value=0 initial_value=0 range=(-99999.9 99999.9) clamped=false
        Coordinate LAT1pt2_tz: default_value=0 initial_value=0 range=(-99999.9 99999.9) clamped=false
        SpatialTransform: axes_held_at_zero=(rotation1 rotation2 rotation3)
          TransformAxis translation1: axis=(1 0 0) coordinates=LAT1pt2_tx
          TransformAxis translation2: axis=(0 1 0) coordinates=LAT1pt2_ty
          TransformAxis translation3: axis=(0 0 1) coordinates=LAT1pt2_tz
    Body LAT1pt3: mass=0 mass_center=(0 0 0) inertia_xx=0 inertia_yy=0 inertia_zz=0
      CustomJoint LAT1pt3: parent_body=scapula location_in_parent=(0 0 0) location=(0 0 0)
        Coordinate LAT1pt3_tx: default_value=0 initial_value=0 range=(-99999.9 99999.9) clamped=false
        Coordinate LAT1pt3_ty: default_value=0 initial_value=0 range=(-99999.9 99999.9) clamped=false
        Coordinate LAT1pt3_tz: default_value=0 initial_value=0 range=(-99999.9 99999.9) clamped=false
        SpatialTransform: axes_held_at_zero=(rotation1 rotation2 rotation3)
          TransformAxis translation1: axis=(1 0 0) coordinates=LAT1pt3_tx
          TransformAxis translation2: axis=(0 1 0) coordinates=LAT1pt3_ty
          TransformAxis translation3: axis=(0 0 1) coordinates=LAT1pt3_tz
    Body LAT2pt2: mass=0 mass_center=(0 0 0) inertia_xx=0 inertia_yy=0 inertia_zz=0
      CustomJoint LAT2pt2: parent_body=scapula location_in_parent=(0 0 0) location=(0 0 0)
        Coordinate LAT2pt2_tx: default_value=0 initial_value=0 range=(-99999.9 99999.9) clamped=false
        Coordinate LAT2pt2_ty: default_value=0 initial_value=0 range=(-99999.9 99999.9) clamped=false
        Coordinate LAT2pt2_tz: default_value=0 initial_value=0 range=(-99999.9 99999.9) clamped=false
        SpatialTransform: axes_held_at_zero=(rotation1 rotation2 rotation3)
          TransformAxis translation1: axis=(1 0 0) coordinates=LAT2pt2_tx
          TransformAxis translation2: axis=(0 1 0) coordinates=LAT2pt2_ty
          TransformAxis translation3: axis=(0 0 1) coordinates=LAT2pt2_tz
    Body LAT2pt3: mass=0 mass_center=(0 0 0) inertia_xx=0 inertia_yy=0 inertia_zz=0
      CustomJoint LAT2pt3: parent_body=scapula location_in_parent=(0 0 0) location=(0 0 0)
        Coordinate LAT2pt3_tx: default_value=0 initial_value=0 range=(-99999.9 99999.9) clamped=false
        Coordinate LAT2pt3_ty: default_value=0 initial_value=0 range=(-99999.9 99999.9) clamped=false
        Coordinate LAT2pt3_tz: default_value=0 initial_value=0 range=(-99999.9 99999.9) clamped=false
        SpatialTransform: axes_held_at_zero=(rotation1 rotation2 rotation3)
          TransformAxis translation1: axis=(1 0 0) coordinates=LAT2pt3_tx
          TransformAxis translation2: axis=(0 1 0) coordinates=LAT2pt3_ty
          TransformAxis translation3: axis=(0 0 1) coordinates=LAT2pt3_tz
    Body LAT3pt2: mass=0 mass_center=(0 0 0) inertia_xx=0 inertia_yy=0 inertia_zz=0
      CustomJoint LAT3pt2: parent_body=scapula location_in_parent=(0 0 0) location=(0 0 0)
        Coordinate LAT3pt2_tx: default_value=0 initial_value=0 range=(-99999.9 99999.9) clamped=false
        Coordinate LAT3pt2_ty: default_value=0 initial_value=0 range=(-99999.9 99999.9) clamped=false
        Coordinate LAT3pt2_tz: default_value=0 initial_value=0 range=(-99999.9 99999.9) clamped=false
        SpatialTransform: axes_held_at_zero=(rotation1 rotation2 rotation3)
          TransformAxis translation1: axis=(1 0 0) coordinates=LAT3pt2_tx
          TransformAxis translation2: axis=(0 1 0) coordinates=LAT3pt2_ty
          TransformAxis translation3: axis=(0 0 1) coordinates=LAT3pt2_tz
    Body LAT3pt3: mass=0 mass_center=(0 0 0) inertia_xx=0 inertia_yy=0 inertia_zz=0
      CustomJoint LAT3pt3: parent_body=scapula location_in_parent=(0 0 0) location=(0 0 0)
        Coordinate LAT3pt3_tx: default_value=0 initial_value=0 range=(-99999.9 99999.9) clamped=false
        Coordinate LAT3pt3_ty: default_value=0 initial_value=0 range=(-99999.9 99999.9) clamped=false
        Coordinate LAT3pt3_tz: default_value=0 initial_value=0 range=(-99999.9 99999.9) clamped=false
        SpatialTransform: axes_held_at_zero=(rotation1 rotation2 rotation3)
          TransformAxis translation1: axis=(1 0 0) coordinates=LAT3pt3_tx
          TransformAxis translation2: axis=(0 1 0) coordinates=LAT3pt3_ty
          TransformAxis translation3: axis=(0 0 1) coordinates=LAT3pt3_tz
  ConstraintSet:
    CoordinateCouplerConstraint sternoclavicular_r2_con: dependent_coordinate_name=sternoclavicular_r2
        independent_coordinate_names=shoulder_elv
      coupled_coordinates_function f0:
        NaturalCubicSpline: x=(0 2.617994) y=(0 -0.6335545)
    CoordinateCouplerConstraint sternoclavicular_r3_con: dependent_coordinate_name=sternoclavicular_r3
        independent_coordinate_names=shoulder_elv
      coupled_coordinates_function f1:
        NaturalCubicSpline: x=(0 3.141593) y=(0 0.3220132)
    CoordinateCouplerConstraint unrotscap_r2_con: dependent_coordinate_name=unrotscap_r2
        independent_coordinate_names=shoulder_elv
      coupled_coordinates_function f2:
        NaturalCubicSpline: x=(0 2.617994) y=(0 0.6335545)
    CoordinateCouplerConstraint unrotscap_r3_con: dependent_coordinate_name=unrotscap_r3
        independent_coordinate_names=shoulder_elv
      coupled_coordinates_function f3:
        NaturalCubicSpline: x=(0 3.141593) y=(0 -0.3220132)
    CoordinateCouplerConstraint acromioclavicular_r1_con: dependent_coordinate_name=acromioclavicular_r1
        independent_coordinate_names=shoulder_elv
      coupled_coordinates_function f4:
        NaturalCubicSpline: x=(0 2.617994) y=(0 0.4660029)
    CoordinateCouplerConstraint acromioclavicular_r2_con: dependent_coordinate_name=acromioclavicular_r2
        independent_coordinate_names=shoulder_elv
      coupled_coordinates_function f5:
        NaturalCubicSpline: x=(0 2.617994) y=(0 -0.1282817)
    CoordinateCouplerConstraint acromioclavicular_r3_con: dependent_coordinate_name=acromioclavicular_r3
        independent_coordinate_names=shoulder_elv
      coupled_coordinates_function f6:
        NaturalCubicSpline: x=(0 2.617994) y=(0 1.036726)
    CoordinateCouplerConstraint unrothum_r1_con: dependent_coordinate_name=unrothum_r1
        independent_coordinate_names=shoulder_elv
      coupled_coordinates_function f7:
        NaturalCubicSpline: x=(0 2.617994) y=(0 -0.4660029)
    CoordinateCouplerConstraint unrothum_r2_con: dependent_coordinate_name=unrothum_r2
        independent_coordinate_names=shoulder_elv
      coupled_coordinates_function f8:
        NaturalCubicSpline: x=(0 2.617994) y=(0 0.1282817)
    CoordinateCouplerConstraint unrothum_r3_con: dependent_coordinate_name=unrothum_r3
        independent_coordinate_names=shoulder_elv
      coupled_coordinates_function f9:
        NaturalCubicSpline: x=(0 2.617994) y=(0 -1.036726)
    CoordinateCouplerConstraint shoulder1_r2_con: dependent_coordinate_name=shoulder1_r2
        independent_coordinate_names=elv_angle
      coupled_coordinates_function f11:
        NaturalCubicSpline: x=(-1.570796 3.141593) y=(1.570796 -3.141593)
    CoordinateCouplerConstraint proximal_distal_r1_con: dependent_coordinate_name=proximal_distal_r1
        independent_coordinate_names=deviation
      coupled_coordinates_function f18:
        NaturalCubicSpline: x=(-0.1745329 0 0.4363323) y=(-0.2617994 0 0.4363323)
    CoordinateCouplerConstraint proximal_distal_r3_con: dependent_coordinate_name=proximal_distal_r3
        independent_coordinate_names=flexion
      coupled_coordinates_function f19:
        NaturalCubicSpline: x=(-1.22173 1.22173) y=(-0.6108652 0.6108652)
    CoordinateCouplerConstraint bicpt_tx_con: dependent_coordinate_name=bicpt_tx
        independent_coordinate_names=elbow_flexion
      coupled_coordinates_function f70:
        NaturalCubicSpline: x=(0 2.268928) y=(-0.0001 0.0042)
    CoordinateCouplerConstraint bicpt_ty_con: dependent_coordinate_name=bicpt_ty
        independent_coordinate_names=elbow_flexion
      coupled_coordinates_function f71:
        NaturalCubicSpline: x=(0 2.268928) y=(-0.0276 -0.0425)
    CoordinateCouplerConstraint bicpt_tz_con: dependent_coordinate_name=bicpt_tz
        independent_coordinate_names=elbow_flexion
      coupled_coordinates_function f72:
        NaturalCubicSpline: x=(0 2.268928) y=(-0.0043 -0.0067)
    CoordinateCouplerConstraint bicpt2_tx_con: dependent_coordinate_name=bicpt2_tx independent_coordinate_names=pro_sup
      coupled_coordinates_function f80:
        NaturalCubicSpline: x=(-1.570796 -0.6108652 1.578228) y=(-0.003 0.01 0.01376)
    CoordinateCouplerConstraint bicpt2_ty_con: dependent_coordinate_name=bicpt2_ty
        independent_coordinate_names=elbow_flexion
      coupled_coordinates_function f81:
        NaturalCubicSpline: x=(0 2.274834) y=(-0.0102 -0.045607)
    CoordinateCouplerConstraint bicpt2_tz_con: dependent_coordinate_name=bicpt2_tz independent_coordinate_names=pro_sup
      coupled_coordinates_function f82:
        NaturalCubicSpline: x=(-1.570796 -0.6108652 1.575614) y=(-0.0095 -0.011533 -0.000331)
    CoordinateCouplerConstraint ptpt_tx_con: dependent_coordinate_name=ptpt_tx independent_coordinate_names=pro_sup
      coupled_coordinates_function f90:
        NaturalCubicSpline: x=(-1.570796 1.570796) y=(0.0142 0.0009)
    CoordinateCouplerConstraint ptpt_ty_con: dependent_coordinate_name=ptpt_ty independent_coordinate_names=pro_sup
      coupled_coordinates_function f91:
        NaturalCubicSpline: x=(-1.570796 1.570796) y=(-0.0606 -0.0692)
    CoordinateCouplerConstraint ptpt_tz_con: dependent_coordinate_name=ptpt_tz independent_coordinate_names=pro_sup
      coupled_coordinates_function f92:
        NaturalCubicSpline: x=(-1.570796 1.570796) y=(0.0072 -0.0073)
    CoordinateCouplerConstraint FCUpt_tx_con: dependent_coordinate_name=FCUpt_tx independent_coordinate_names=pro_sup
      coupled_coordinates_function f100:
        NaturalCubicSpline: x=(-1.570796 0 1.570796) y=(-0.0027 0.004 0.0132)
    CoordinateCouplerConstraint FCUpt_ty_con: dependent_coordinate_name=FCUpt_ty independent_coordinate_names=pro_sup
      coupled_coordinates_function f101:
        NaturalCubicSpline: x=(-1.570796 0 1.570796) y=(-0.1838 -0.1841 -0.1821)
    CoordinateCouplerConstraint FCUpt_tz_con: dependent_coordinate_name=FCUpt_tz independent_coordinate_names=pro_sup
      coupled_coordinates_function f102:
        NaturalCubicSpline: x=(-1.570796 0 1.570796) y=(0.0069 0.0005 0.0002)
    CoordinateCouplerConstraint EDCpt_tx_con: dependent_coordinate_name=EDCpt_tx independent_coordinate_names=pro_sup
      coupled_coordinates_function f110:
        NaturalCubicSpline: x=(-1.570796 0 1.570796) y=(0.0108 0 -0.0108)
    CoordinateCouplerConstraint EDCpt_ty_con: dependent_coordinate_name=EDCpt_ty independent_coordinate_names=pro_sup
      coupled_coordinates_function f111:
        NaturalCubicSpline: x=(-1.570796 0 1.570796) y=(-0.0013 0 0.0038)
    CoordinateCouplerConstraint EDCpt_tz_con: dependent_coordinate_name=EDCpt_tz independent_coordinate_names=pro_sup
      coupled_coordinates_function f112:
        NaturalCubicSpline: x=(-1.570796 0 1.570796) y=(-0.0035 0 -0.00089)
    CoordinateCouplerConstraint APLpt_tx_con: dependent_coordinate_name=APLpt_tx independent_coordinate_names=flexion
      coupled_coordinates_function f120:
        NaturalCubicSpline: x=(-1.22173 0 1.22173) y=(0 0 -0.0025)
    CoordinateCouplerConstraint APLpt_ty_con: dependent_coordinate_name=APLpt_ty independent_coordinate_names=flexion
      coupled_coordinates_function f121:
        NaturalCubicSpline: x=(-1.22173 0 1.22173) y=(0 0 -0.001)
    CoordinateCouplerConstraint APLpt_tz_con: dependent_coordinate_name=APLpt_tz independent_coordinate_names=flexion
      coupled_coordinates_function f122:
        NaturalCubicSpline: x=(-1.22173 0 1.22173) y=(0 0 -0.005)
    CoordinateCouplerConstraint FPLpt_tx_con: dependent_coordinate_name=FPLpt_tx independent_coordinate_names=flexion
      coupled_coordinates_function f130:
        NaturalCubicSpline: x=(-1.22173 0 1.22173) y=(0 0 -0.0032)
    CoordinateCouplerConstraint FPLpt_ty_con: dependent_coordinate_name=FPLpt_ty independent_coordinate_names=flexion
      coupled_coordinates_function f131:
        NaturalCubicSpline: x=(-1.22173 0 1.22173) y=(0 0 -0.0096)
    CoordinateCouplerConstraint FPLpt_tz_con: dependent_coordinate_name=FPLpt_tz independent_coordinate_names=flexion
      coupled_coordinates_function f132:
        NaturalCubicSpline: x=(-1.22173 0 1.22173) y=(0 0 -0.0054)
    CoordinateCouplerConstraint FPLpt2_tx_con: dependent_coordinate_name=FPLpt2_tx
        independent_coordinate_names=cmc_flexion
      coupled_coordinates_function f140:
        NaturalCubicSpline: x=(-0.2617994 0 0.08726646 0.1836751 0.3764925 0.7853032)
            y=(-0.0032 0 0.00004 0.000032 0.000008 0)
    CoordinateCouplerConstraint FPLpt2_ty_con: dependent_coordinate_name=FPLpt2_ty
        independent_coordinate_names=cmc_flexion
      coupled_coordinates_function f141:
        NaturalCubicSpline: x=(-0.2617994 0 0.7853982) y=(0.0005 0 0)
    CoordinateCouplerConstraint FPLpt2_tz_con: dependent_coordinate_name=FPLpt2_tz
        independent_coordinate_names=cmc_flexion
      coupled_coordinates_function f142:
        NaturalCubicSpline: x=(-0.2617994 0 0.7853982) y=(0.0006 0 0)
    CoordinateCouplerConstraint PEC1pt2_tx_con: dependent_coordinate_name=PEC1pt2_tx
        independent_coordinate_names=shoulder_elv
      coupled_coordinates_function f150:
        NaturalCubicSpline: x=(0 3.141593) y=(0 0.0059)
    CoordinateCouplerConstraint PEC1pt2_ty_con: dependent_coordinate_name=PEC1pt2_ty
        independent_coordinate_names=shoulder_elv
      coupled_coordinates_function f151:
        NaturalCubicSpline: x=(0 3.141593) y=(0 0.0207)
    CoordinateCouplerConstraint PEC1pt2_tz_con: dependent_coordinate_name=PEC1pt2_tz
        independent_coordinate_names=shoulder_elv
      coupled_coordinates_function f152:
        NaturalCubicSpline: x=(0 3.141593) y=(0 0.0144)
    CoordinateCouplerConstraint PEC1pt3_tx_con: dependent_coordinate_name=PEC1pt3_tx
        independent_coordinate_names=shoulder_elv
      coupled_coordinates_function f160:
        NaturalCubicSpline: x=(0 3.141593) y=(0 -0.0193)
    CoordinateCouplerConstraint PEC1pt3_ty_con: dependent_coordinate_name=PEC1pt3_ty
        independent_coordinate_names=shoulder_elv
      coupled_coordinates_function f161:
        NaturalCubicSpline: x=(0 3.141593) y=(0 0.0466)
    CoordinateCouplerConstraint PEC1pt3_tz_con: dependent_coordinate_name=PEC1pt3_tz
        independent_coordinate_names=shoulder_elv
      coupled_coordinates_function f162:
        NaturalCubicSpline: x=(0 3.141593) y=(0 -0.0442)
    CoordinateCouplerConstraint PEC2pt2_tx_con: dependent_coordinate_name=PEC2pt2_tx
        independent_coordinate_names=shoulder_elv
      coupled_coordinates_function f170:
        NaturalCubicSpline: x=(0 3.141593) y=(0 0.0059)
    CoordinateCouplerConstraint PEC2pt2_ty_con: dependent_coordinate_name=PEC2pt2_ty
        independent_coordinate_names=shoulder_elv
      coupled_coordinates_function f171:
        NaturalCubicSpline: x=(0 3.141593) y=(0 0.0207)
    CoordinateCouplerConstraint PEC2pt2_tz_con: dependent_coordinate_name=PEC2pt2_tz
        independent_coordinate_names=shoulder_elv
      coupled_coordinates_function f172:
        NaturalCubicSpline: x=(0 3.141593) y=(0 0.0144)
    CoordinateCouplerConstraint PEC2pt3_tx_con: dependent_coordinate_name=PEC2pt3_tx
        independent_coordinate_names=shoulder_elv
      coupled_coordinates_function f180:
        NaturalCubicSpline: x=(0 3.141593) y=(0 0.0013)
    CoordinateCouplerConstraint PEC2pt3_ty_con: dependent_coordinate_name=PEC2pt3_ty
        independent_coordinate_names=shoulder_elv
      coupled_coordinates_function f181:
        NaturalCubicSpline: x=(0 3.141593) y=(0 0.0432)
    CoordinateCouplerConstraint PEC2pt3_tz_con: dependent_coordinate_name=PEC2pt3_tz
        independent_coordinate_names=shoulder_elv
      coupled_coordinates_function f182:
        NaturalCubicSpline: x=(0 3.141593) y=(0 -0.0227)
    CoordinateCouplerConstraint PEC3pt2_tx_con: dependent_coordinate_name=PEC3pt2_tx
        independent_coordinate_names=shoulder_elv
      coupled_coordinates_function f190:
        NaturalCubicSpline: x=(0 0.7475172 3.141593) y=(0 0.002482 0.0059)
    CoordinateCouplerConstraint PEC3pt2_ty_con: dependent_coordinate_name=PEC3pt2_ty
        independent_coordinate_names=shoulder_elv
      coupled_coordinates_function f191:
        NaturalCubicSpline: x=(0 3.131491) y=(0 0.011474)
    CoordinateCouplerConstraint PEC3pt2_tz_con: dependent_coordinate_name=PEC3pt2_tz
        independent_coordinate_names=shoulder_elv
      coupled_coordinates_function f192:
        NaturalCubicSpline: x=(0 0.6230557 2.291237 3.125328) y=(0 0.009968 0.018193 0.017746)
    CoordinateCouplerConstraint PEC3pt3_tx_con: dependent_coordinate_name=PEC3pt3_tx
        independent_coordinate_names=shoulder_elv
      coupled_coordinates_function f200:
        NaturalCubicSpline: x=(0 3.141593) y=(0 0)
    CoordinateCouplerConstraint PEC3pt3_ty_con: dependent_coordinate_name=PEC3pt3_ty
        independent_coordinate_names=shoulder_elv
      coupled_coordinates_function f201:
        NaturalCubicSpline: x=(0.01010158 1.59605 3.141593) y=(0.000222 0.011219 0.0441)
    CoordinateCouplerConstraint PEC3pt3_tz_con: dependent_coordinate_name=PEC3pt3_tz
        independent_coordinate_names=shoulder_elv
      coupled_coordinates_function f202:
        NaturalCubicSpline: x=(0 3.141593) y=(0 0)
    CoordinateCouplerConstraint DELT2pt2a_tx_con: dependent_coordinate_name=DELT2pt2a_tx
        independent_coordinate_names=shoulder_elv
      coupled_coordinates_function f210:
        NaturalCubicSpline: x=(0 3.141593) y=(0 -0.0169)
    CoordinateCouplerConstraint DELT2pt2a_ty_con: dependent_coordinate_name=DELT2pt2a_ty
        independent_coordinate_names=shoulder_elv
      coupled_coordinates_function f211:
        NaturalCubicSpline: x=(0 3.141593) y=(0 -0.0781)
    CoordinateCouplerConstraint DELT2pt2a_tz_con: dependent_coordinate_name=DELT2pt2a_tz
        independent_coordinate_names=shoulder_elv
      coupled_coordinates_function f212:
        NaturalCubicSpline: x=(0 1.222292 3.141593) y=(0 -0.005395 -0.0363)
    CoordinateCouplerConstraint DELT2pt2_tx_con: dependent_coordinate_name=DELT2pt2_tx
        independent_coordinate_names=shoulder_rot
      coupled_coordinates_function f220:
        NaturalCubicSpline: x=(-1.570796 -0.01015029 0.349046) y=(0.0214 0.000049 -0.020005)
    CoordinateCouplerConstraint DELT2pt2_ty_con: dependent_coordinate_name=DELT2pt2_ty
        independent_coordinate_names=shoulder_rot
      coupled_coordinates_function f221:
        NaturalCubicSpline: x=(-1.570796 -1.181885 -0.1694821 0 0.3490659) y=(-0.0029 -0.002148 -0.000139 0 -0.001644)
    CoordinateCouplerConstraint DELT2pt2_tz_con: dependent_coordinate_name=DELT2pt2_tz
        independent_coordinate_names=shoulder_rot
      coupled_coordinates_function f222:
        NaturalCubicSpline: x=(-1.570796 -0.4966612 0 0.3428927) y=(-0.0455 -0.006762 0 -0.00573)
    CoordinateCouplerConstraint LAT1pt2_tx_con: dependent_coordinate_name=LAT1pt2_tx
        independent_coordinate_names=shoulder_elv
      coupled_coordinates_function f230:
        NaturalCubicSpline: x=(0 3.141593) y=(0 -0.0021)
    CoordinateCouplerConstraint LAT1pt2_ty_con: dependent_coordinate_name=LAT1pt2_ty
        independent_coordinate_names=shoulder_elv
      coupled_coordinates_function f231:
        NaturalCubicSpline: x=(0 3.141593) y=(0 0.0352)
    CoordinateCouplerConstraint LAT1pt2_tz_con: dependent_coordinate_name=LAT1pt2_tz
        independent_coordinate_names=shoulder_elv
      coupled_coordinates_function f232:
        NaturalCubicSpline: x=(0 3.141593) y=(0 -0.0144)
    CoordinateCouplerConstraint LAT1pt3_tx_con: dependent_coordinate_name=LAT1pt3_tx
        independent_coordinate_names=shoulder_elv
      coupled_coordinates_function f240:
        NaturalCubicSpline: x=(0 3.141593) y=(0 0.0058)
    CoordinateCouplerConstraint LAT1pt3_ty_con: dependent_coordinate_name=LAT1pt3_ty
        independent_coordinate_names=shoulder_elv
      coupled_coordinates_function f241:
        NaturalCubicSpline: x=(0 3.141593) y=(0 0.0508)
    CoordinateCouplerConstraint LAT1pt3_tz_con: dependent_coordinate_name=LAT1pt3_tz
        independent_coordinate_names=shoulder_elv
      coupled_coordinates_function f242:
        NaturalCubicSpline: x=(0 3.141593) y=(0 -0.042)
    CoordinateCouplerConstraint LAT2pt2_tx_con: dependent_coordinate_name=LAT2pt2_tx
        independent_coordinate_names=shoulder_elv
      coupled_coordinates_function f250:
        NaturalCubicSpline: x=(0 3.141593) y=(0 -0.0141)
    CoordinateCouplerConstraint LAT2pt2_ty_con: dependent_coordinate_name=LAT2pt2_ty
        independent_coordinate_names=shoulder_elv
      coupled_coordinates_function f251:
        NaturalCubicSpline: x=(0 3.141593) y=(0 0.0305)
    CoordinateCouplerConstraint LAT2pt2_tz_con: dependent_coordinate_name=LAT2pt2_tz
        independent_coordinate_names=shoulder_elv
      coupled_coordinates_function f252:
        NaturalCubicSpline: x=(0 3.141593) y=(0 -0.0129)
    CoordinateCouplerConstraint LAT2pt3_tx_con: dependent_coordinate_name=LAT2pt3_tx
        independent_coordinate_names=shoulder_elv
      coupled_coordinates_function f260:
        NaturalCubicSpline: x=(0 3.141593) y=(0 -0.0294)
    CoordinateCouplerConstraint LAT2pt3_ty_con: dependent_coordinate_name=LAT2pt3_ty
        independent_coordinate_names=shoulder_elv
      coupled_coordinates_function f261:
        NaturalCubicSpline: x=(0 3.141593) y=(0 0.0644)
    CoordinateCouplerConstraint LAT2pt3_tz_con: dependent_coordinate_name=LAT2pt3_tz
        independent_coordinate_names=shoulder_elv
      coupled_coordinates_function f262:
        NaturalCubicSpline: x=(0 3.141593) y=(0 -0.0721)
    CoordinateCouplerConstraint LAT3pt2_tx_con: dependent_coordinate_name=LAT3pt2_tx
        independent_coordinate_names=shoulder_elv
      coupled_coordinates_function f270:
        NaturalCubicSpline: x=(0 3.141593) y=(0 -0.0552)
    CoordinateCouplerConstraint LAT3pt2_ty_con: dependent_coordinate_name=LAT3pt2_ty
        independent_coordinate_names=shoulder_elv
      coupled_coordinates_function f271:
        NaturalCubicSpline: x=(0 3.141593) y=(0 0.0341)
    CoordinateCouplerConstraint LAT3pt2_tz_con: dependent_coordinate_name=LAT3pt2_tz
        independent_coordinate_names=shoulder_elv
      coupled_coordinates_function f272:
        NaturalCubicSpline: x=(0 3.141593) y=(0 -0.0173)
    CoordinateCouplerConstraint LAT3pt3_tx_con: dependent_coordinate_name=LAT3pt3_tx
        independent_coordinate_names=shoulder_elv
      coupled_coordinates_function f280:
        NaturalCubicSpline: x=(0 3.141593) y=(0 -0.0366)
    CoordinateCouplerConstraint LAT3pt3_ty_con: dependent_coordinate_name=LAT3pt3_ty
        independent_coordinate_names=shoulder_elv
      coupled_coordinates_function f281:
        NaturalCubicSpline: x=(0 3.141593) y=(0 0.0744)
    CoordinateCouplerConstraint LAT3pt3_tz_con: dependent_coordinate_name=LAT3pt3_tz
        independent_coordinate_names=shoulder_elv
      coupled_coordinates_function f282:
        NaturalCubicSpline: x=(0 3.141593) y=(0 -0.0901)
