# OpenSim document version 30000
ScaleTool Stanford VA Upper Limb Model-scaled:
  mass: 30.53506 [kg]
  height: -1
  age: -1
  GenericModelMaker:
    marker_set_file: kinect_markers.xml
  ModelScaler:
    apply: true
    scaling_order: measurements
    marker_file: motion.trc
    time_range: 0.04 12.747
    preserve_mass_distribution: false
    MeasurementSet:
      Measurement humerus: apply=true
        MarkerPair: markers=(NUI_SKELETON_POSITION_SHOULDER_RIGHT NUI_SKELETON_POSITION_ELBOW_RIGHT)
        BodyScale humerus: axes=(X Y Z)
      Measurement ulna: apply=true
        MarkerPair: markers=(NUI_SKELETON_POSITION_ELBOW_RIGHT NUI_SKELETON_POSITION_WRIST_RIGHT)
        BodyScale ulna: axes=(X Y Z)
      Measurement radius: apply=true
        MarkerPair: markers=(NUI_SKELETON_POSITION_ELBOW_RIGHT NUI_SKELETON_POSITION_WRIST_RIGHT)
        BodyScale radius: axes=(X Y Z)
      Measurement: apply=false
  MarkerPlacer:
    apply: true
    marker_file: motion.trc
    time_range: 0.04 1
    max_marker_movement: -1
    IKTaskSet:
      IKMarkerTask NUI_SKELETON_POSITION_SHOULDER_RIGHT: apply=true weight=1
      IKMarkerTask NUI_SKELETON_POSITION_ELBOW_RIGHT: apply=true weight=1
      IKMarkerTask NUI_SKELETON_POSITION_WRIST_RIGHT: apply=true weight=1
      IKMarkerTask NUI_SKELETON_POSITION_HAND_RIGHT2: apply=true weight=1
