# OpenSim document version 30000
ForwardTool FDS:
  replace_force_set: false
  results_directory: output
  output_precision: 20
  initial_time: 0.62
  final_time: 3.99
  solve_for_equilibrium_for_auxiliary_states: false
  maximum_number_of_integrator_steps: 20000
  maximum_integrator_step_size: 1
  minimum_integrator_step_size: 1e-8
  integrator_error_tolerance: 1e-5
  states_file: CMC_Reach8_states_abbrev.sto
  use_specified_dt: false
  ControllerSet Controllers:
    ControlSetController: controls_file=CMC_Reach8_controls.sto
