# OpenSim document version 30000
Model NoTremor Upper Limb Model:
  length_units: meters
  force_units: N
  gravity: 0 -9.80665 0
  defaults: Millard2012EquilibriumMuscle default:
    FiberForceLengthCurve: strain_at_zero_force=2 strain_at_one_norm_force=3 stiffness_at_low_force=0.01
        stiffness_at_one_norm_force=1.2 curviness=1
  BodySet:
    Body ground: mass=0 mass_center=(0 0 0) inertia_xx=0 inertia_yy=0 inertia_zz=0
    Body thorax: mass=26.83 mass_center=(0 -0.16 0) inertia_xx=1.4745 inertia_yy=0.7555 inertia_zz=1.4314
        meshes=thorax.vtp
      WeldJoint ground_thorax: parent_body=ground location_in_parent=(0 0 0) location=(0 0 0)
      WrapEllipsoid Thorax: xyz_body_rotation=(0.0434587 -0.331962 0.189892) translation=(-0.0386 -0.1273 0.0709)
          dimensions=(0.1 0.135 0.08)
    Body clavicle: mass=0.156 mass_center=(-0.011096 0.0063723 0.054168) inertia_xx=0.00024259 inertia_yy=0.00025526
        inertia_zz=4.442e-5 inertia_xy=-1.898e-5 inertia_xz=-6.994e-5 inertia_yz=5.371e-5 meshes=clavicle.vtp
      CustomJoint sternoclavicular: parent_body=thorax location_in_parent=(0.006325 0.00693 0.025465) location=(0 0 0)
        Coordinate sternoclavicular_r2: motion_type=rotational default_value=-0.1788866 range=(-99999.9 99999.9)
            clamped=false
        Coordinate sternoclavicular_r3: motion_type=rotational default_value=0.07576793 range=(-99999.9 99999.9)
            clamped=false
        SpatialTransform: axes_held_at_zero=(rotation3 translation1 translation2 translation3)
          TransformAxis rotation1: coordinates=sternoclavicular_r2 axis=(0.0153 0.9892987 -0.1451)
              LinearFunction(coefficients=1 0)
          TransformAxis rotation2: coordinates=sternoclavicular_r3 axis=(-0.9944725 0 -0.104997)
              LinearFunction(coefficients=1 0)
    Body clavphant: mass=0.0001 mass_center=(0 0 0) inertia_xx=1 inertia_yy=1 inertia_zz=1
      CustomJoint unrotscap: parent_body=clavicle location_in_parent=(-0.01433 0.02007 0.135535) location=(0 0 0)
        Coordinate unrotscap_r3: motion_type=rotational default_value=-0.07576793 range=(-99999.9 99999.9)
            clamped=false
        Coordinate unrotscap_r2: motion_type=rotational default_value=0.1788866 range=(-99999.9 99999.9) clamped=false
        SpatialTransform: axes_held_at_zero=(rotation3 translation1 translation2 translation3)
          TransformAxis rotation1: coordinates=unrotscap_r3 axis=(-0.9944725 0 -0.104997)
              LinearFunction(coefficients=1 0)
          TransformAxis rotation2: coordinates=unrotscap_r2 axis=(0.0153 0.9892987 -0.1451)
              LinearFunction(coefficients=1 0)
    Body scapula: mass=0.70396 mass_center=(-0.054694 -0.035032 -0.043734) inertia_xx=0.0012429 inertia_yy=0.0011504
        inertia_zz=0.0013651 inertia_xy=0.0004494 inertia_xz=0.00040922 inertia_yz=0.0002411 meshes=scapula.vtp
      CustomJoint acromioclavicular: parent_body=clavphant location_in_parent=(0 0 0) location=(0 0 0)
        Coordinate acromioclavicular_r2: motion_type=rotational default_value=-0.0362209 range=(-99999.9 99999.9)
            clamped=false
        Coordinate acromioclavicular_r3: motion_type=rotational default_value=0.2927246 range=(-99999.9 99999.9)
            clamped=false
        Coordinate acromioclavicular_r1: motion_type=rotational default_value=0.1315777 range=(-99999.9 99999.9)
            clamped=false
        SpatialTransform: axes_held_at_zero=(translation1 translation2 translation3)
          TransformAxis rotation1: coordinates=acromioclavicular_r2 axis=(0.1570949 0.9472686 -0.2792909)
              LinearFunction(coefficients=1 0)
          TransformAxis rotation2: coordinates=acromioclavicular_r3 axis=(-0.754084 0.297594 0.585487)
              LinearFunction(coefficients=1 0)
          TransformAxis rotation3: coordinates=acromioclavicular_r1 axis=(0.6376999 0.1186 0.7610998)
              LinearFunction(coefficients=1 0)
      WrapEllipsoid Deltoid2: xyz_body_rotation=(3.13042 -1.54881 -1.31423) translation=(-0.0058 -0.0378 0.0096)
          active=false quadrant=-y dimensions=(0.03 0.04 0.035)
      WrapTorus Delt3: xyz_body_rotation=(0.620988 0.32882 -0.560774) translation=(-0.0973 -0.0428 -0.037) active=false
          inner_radius=0.04 outer_radius=0.06
      WrapTorus INFSP: xyz_body_rotation=(0.0253073 0.58835 0.151844) translation=(-0.0561 -0.0199 -0.0112)
          inner_radius=0.008 outer_radius=0.019
      WrapEllipsoid TMIN: xyz_body_rotation=(-2.09754 -0.280823 -1.76348) translation=(-0.0418 -0.0519 -0.0359)
          quadrant=x dimensions=(0.03 0.03 0.05)
      WrapCylinder TRIlongglen: xyz_body_rotation=(1.37532 -0.294612 2.43596) translation=(-0.0359 -0.0309 -0.0132)
          quadrant=x radius=0.003 length=0.03
    Body scapphant: mass=0.0001 mass_center=(0 0 0) inertia_xx=1 inertia_yy=1 inertia_zz=1
      CustomJoint unrothum: parent_body=scapula location_in_parent=(-0.00955 -0.034 0.009) location=(0 0 0)
        Coordinate unrothum_r1: motion_type=rotational default_value=-0.1315777 range=(-99999.9 99999.9) clamped=false
        Coordinate unrothum_r3: motion_type=rotational default_value=-0.2927246 range=(-99999.9 99999.9) clamped=false
        Coordinate unrothum_r2: motion_type=rotational default_value=0.0362209 range=(-99999.9 99999.9) clamped=false
        SpatialTransform: axes_held_at_zero=(translation1 translation2 translation3)
          TransformAxis rotation1: coordinates=unrothum_r1 axis=(0.6376999 0.1186 0.7610998)
              LinearFunction(coefficients=1 0)
          TransformAxis rotation2: coordinates=unrothum_r3 axis=(-0.754084 0.297594 0.585487)
              LinearFunction(coefficients=1 0)
          TransformAxis rotation3: coordinates=unrothum_r2 axis=(0.1570949 0.9472686 -0.2792909)
              LinearFunction(coefficients=1 0)
    Body humphant: mass=0.0001 mass_center=(0 0 0) inertia_xx=1 inertia_yy=1 inertia_zz=1
      CustomJoint shoulder0: parent_body=scapphant location_in_parent=(0 0 0) location=(0 0 0)
        Coordinate elv_angle: motion_type=rotational default_value=4.03437e-8 range=(-1.570796 2.268928) clamped=true
        SpatialTransform: axes_held_at_zero=(rotation1 rotation3 translation1 translation2 translation3)
          TransformAxis rotation2: coordinates=elv_angle axis=(0.004800001 0.9990892 0.04240001)
              LinearFunction(coefficients=1 0)
    Body humphant1: mass=0.0001 mass_center=(0 0 0) inertia_xx=1 inertia_yy=1 inertia_zz=1
      CustomJoint shoulder1: parent_body=humphant location_in_parent=(0 0 0) location=(0 0 0)
        Coordinate shoulder_elv: motion_type=rotational default_value=0.7391993 range=(0 3.141593) clamped=true
        Coordinate shoulder1_r2: motion_type=rotational default_value=-4.03437e-8 range=(-99999.9 99999.9)
            clamped=false
        SpatialTransform: axes_held_at_zero=(rotation1 translation1 translation2 translation3)
          TransformAxis rotation2: coordinates=shoulder_elv axis=(-0.9982614 0.002300001 0.05889802)
              LinearFunction(coefficients=1 0)
          TransformAxis rotation3: coordinates=shoulder1_r2 axis=(0.004800001 0.9990892 0.04240001)
              LinearFunction(coefficients=1 0)
    Body humerus: mass=1.99757 mass_center=(0.018064 -0.140141 -0.012746) inertia_xx=0.01227763 inertia_yy=0.00255133
        inertia_zz=0.01257888 inertia_xy=-0.00034741 inertia_xz=-0.0002325 inertia_yz=0.0012293 meshes=humerus.vtp
      CustomJoint shoulder2: parent_body=humphant1 location_in_parent=(0 0 0) location=(0 0 0)
        Coordinate shoulder_rot: motion_type=rotational default_value=-4.263944e-8 range=(-1.570796 0.3490659)
            clamped=true
        SpatialTransform: axes_held_at_zero=(rotation1 rotation3 translation1 translation2 translation3)
          TransformAxis rotation2: coordinates=shoulder_rot axis=(0.004800001 0.9990892 0.04240001)
              LinearFunction(coefficients=1 0)
      WrapEllipsoid DELT1hh: xyz_body_rotation=(0.0584685 1.00461 0.570374) translation=(-0.0139 -0.0127 -0.0262)
          quadrant=z dimensions=(0.03 0.1 0.05)
      WrapCylinder delt2hum: xyz_body_rotation=(1.68093 -0.0249582 0.0516617) translation=(0.0017 -0.0958 0.0011)
          radius=0.0094 length=0.05
      WrapEllipsoid delt3hum: xyz_body_rotation=(1.72735 0.0759218 -2.74313) translation=(0.0019 -0.0592 0.0011)
          quadrant=x dimensions=(0.01 0.01 0.05)
      WrapEllipsoid SUPSP: xyz_body_rotation=(0.0380482 0.00855211 -1.30673) translation=(0.0002 0.0077 0.0043)
          dimensions=(0.02 0.02 0.02)
      WrapEllipsoid INFSP_and_TMIN_hum_head: xyz_body_rotation=(-0.286583 -0.00907571 -0.0684169)
          translation=(-0.0003 0.0026 0.0038) dimensions=(0.02 0.025 0.02)
      WrapEllipsoid SUBSCAP: xyz_body_rotation=(-0.924501 0.288852 0.381529) translation=(-0.0025 0.0007 -0.0045)
          dimensions=(0.02 0.017 0.028)
      WrapCylinder TMINhum: xyz_body_rotation=(1.75353 0.0692896 2.74628) translation=(-0.0014 -0.0455 0) quadrant=x
          radius=0.007 length=0.07
      WrapSphere TMAJ_LAT_PEC_CORBhh: translation=(0.0007 0 0.006) radius=0.03
      WrapCylinder TMAJ_LAThum: xyz_body_rotation=(1.53641 -0.0637045 1.41424) translation=(0.0007 -0.0443 -0.0055)
          quadrant=-x radius=0.007 length=0.04
      WrapEllipsoid PEC1hh: xyz_body_rotation=(-0.620465 -0.310494 0.363727) translation=(-0.0037 0.0005 -0.0025)
          quadrant=-z dimensions=(0.03 0.02 0.02)
      WrapCylinder PEC12hum: xyz_body_rotation=(1.55928 -0.0774926 -0.925897) translation=(0.002 -0.0508 -0.0017)
          quadrant=x radius=0.009 length=0.07
      WrapSphere PEC23hh: translation=(-0.0086 0.0021 -0.0004) radius=0.02
      WrapCylinder PEC3hum: xyz_body_rotation=(1.44094 -0.0561996 1.75196) translation=(0.0009 -0.0551 -0.0004)
          quadrant=-x radius=0.008 length=0.07
      WrapCylinder LAT_TMAJhh: xyz_body_rotation=(-0.305084 -0.018326 -0.686613) translation=(-0.0224 0.0102 0.0094)
          quadrant=-y radius=0.007 length=0.045
      WrapSphere LAT_TMAJ2hh: xyz_body_rotation=(-0.127235 0.276111 0.0197222) translation=(-0.0016 0.0092 0.0052)
          quadrant=-z radius=0.03
      WrapCylinder CORBhum: xyz_body_rotation=(-1.60832 0.0959931 0.875283) translation=(0.0027 -0.1202 -0.0059)
          quadrant=x radius=0.008 length=0.05
      WrapEllipsoid TRIlonghh: xyz_body_rotation=(3.00162 -0.853466 2.57419) translation=(-0.0078 -0.0041 -0.0014)
          quadrant=z dimensions=(0.035 0.02 0.02)
      WrapCylinder TRI: xyz_body_rotation=(-0.14015 -0.00628319 0.154985) translation=(0.0028 -0.2919 -0.0119)
          radius=0.016 length=0.04
      WrapEllipsoid ANC: xyz_body_rotation=(0.00750492 -0.196699 1.04929) translation=(0.0134 -0.2861 -0.0008)
          quadrant=-x dimensions=(0.02 0.02 0.02)
      WrapEllipsoid BIClong: xyz_body_rotation=(-2.00434 -1.00164 0.975465) translation=(0.0033 0.0073 0.0003)
          quadrant=-y dimensions=(0.025 0.02 0.02)
      WrapEllipsoid Elbow_BIC_BRD: xyz_body_rotation=(-0.128631 0.137532 0.0307178) translation=(0.0019 -0.289 -0.014)
          quadrant=x dimensions=(0.015 0.015 0.1)
      WrapEllipsoid Elbow_PT_ECRL: xyz_body_rotation=(-0.161094 -0.110828 0.61453) translation=(0.003 -0.2872 -0.0069)
          quadrant=x dimensions=(0.018 0.025 0.035)
    Body ulna: mass=1.1053 mass_center=(0.00971783 -0.0959509 0.024286) inertia_xx=0.00541309 inertia_yy=0.00115318
        inertia_zz=0.00494361 inertia_xy=0.00031686 inertia_xz=-7.615e-5 inertia_yz=0.00109169 meshes=ulna.vtp
      CustomJoint elbow: parent_body=humerus location_in_parent=(0.0061 -0.2904 -0.0123) location=(0 0 0)
        Coordinate elbow_flexion: motion_type=rotational default_value=1.601601 range=(0 2.268928) clamped=true
        SpatialTransform: axes_held_at_zero=(rotation1 rotation2 translation1 translation2 translation3)
          TransformAxis rotation3: coordinates=elbow_flexion axis=(0.04940001 0.03660001 0.9981082)
              LinearFunction(coefficients=1 0)
      WrapCylinder PQ2: xyz_body_rotation=(1.39138 0.0689405 1.52245) translation=(-0.0012 -0.2092 0.0428) radius=0.007
          length=0.01
    Body radius: mass=0.23359 mass_center=(0.0336341 -0.181559 0.0156) inertia_xx=0.00043855 inertia_yy=8.859e-5
        inertia_zz=0.00040258 inertia_xy=3.014e-5 inertia_xz=-4.24e-6 inertia_yz=6.418e-5 meshes=radius.vtp
      CustomJoint radioulnar: parent_body=ulna location_in_parent=(0.0004 -0.011503 0.019999) location=(0 0 0)
        Coordinate pro_sup: motion_type=rotational default_value=0.5544038 range=(-1.570796 1.570796) clamped=true
        SpatialTransform: axes_held_at_zero=(rotation1 rotation3 translation1 translation2 translation3)
          TransformAxis rotation2: coordinates=pro_sup axis=(-0.01716099 0.9926656 -0.119668)
              LinearFunction(coefficients=1 0)
      WrapCylinder SUP: xyz_body_rotation=(1.44775 0.304036 -2.44102) translation=(0.0045 -0.0437 0.0059) quadrant=-x
          radius=0.008 length=0.04
      WrapTorus ECU: xyz_body_rotation=(-0.986635 -0.148877 0.222704) translation=(-0.0163 -0.2417 0.0349)
          inner_radius=0.006 outer_radius=0.009
      WrapCylinder PQ1: xyz_body_rotation=(-1.60762 -0.0127409 -2.69025) translation=(0.0281 -0.1986 0.0288)
          radius=0.01 length=0.01
    Body hand: mass=0.5819 mass_center=(-0.00301314 -0.0424993 -0.00112205) inertia_xx=0.00011 inertia_yy=6e-5
        inertia_zz=0.00015 inertia_xy=9e-7 inertia_xz=-2e-7 inertia_yz=1.2e-5
        meshes=(pisiform_rvs.vtp lunate_rvs.vtp scaphoid_rvs.vtp triquetrum_rvs.vtp hamate_rvs.vtp capitate_rvs.vtp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)
      WeldJoint radiocarpal: parent_body=radius location_in_parent=(0.015 -0.24 0.025)
          orientation_in_parent=(0 1.57 -0.4) location=(0 0 0)
    Body bicpt: mass=0.0001 mass_center=(0 0 0) inertia_xx=1 inertia_yy=1 inertia_zz=1
      CustomJoint bicpt: parent_body=radius location_in_parent=(0 0 0) location=(0 0 0)
        Coordinate bicpt_tx: motion_type=translational default_value=0.002935301 range=(-99999.9 99999.9) clamped=false
        Coordinate bicpt_ty: motion_type=translational default_value=-0.03811767 range=(-99999.9 99999.9) clamped=false
        Coordinate bicpt_tz: motion_type=translational default_value=-0.005994122 range=(-99999.9 99999.9)
            clamped=false
        SpatialTransform: axes_held_at_zero=(rotation1 rotation2 rotation3)
          TransformAxis translation1: coordinates=bicpt_tx axis=(1 0 0) LinearFunction(coefficients=1 0)
          TransformAxis translation2: coordinates=bicpt_ty axis=(0 1 0) LinearFunction(coefficients=1 0)
          TransformAxis translation3: coordinates=bicpt_tz axis=(0 0 1) LinearFunction(coefficients=1 0)
    Body bicpt2: mass=0.0001 mass_center=(0 0 0) inertia_xx=1 inertia_yy=1 inertia_zz=1
      CustomJoint bicpt2: parent_body=radius location_in_parent=(0 0 0) location=(0 0 0)
        Coordinate bicpt2_tx: motion_type=translational default_value=0.01648145 range=(-99999.9 99999.9) clamped=false
        Coordinate bicpt2_ty: motion_type=translational default_value=-0.03512841 range=(-99999.9 99999.9)
            clamped=false
        Coordinate bicpt2_tz: motion_type=translational default_value=-0.008301587 range=(-99999.9 99999.9)
            clamped=false
        SpatialTransform: axes_held_at_zero=(rotation1 rotation2 rotation3)
          TransformAxis translation1: coordinates=bicpt2_tx axis=(1 0 0) LinearFunction(coefficients=1 0)
          TransformAxis translation2: coordinates=bicpt2_ty axis=(0 1 0) LinearFunction(coefficients=1 0)
          TransformAxis translation3: coordinates=bicpt2_tz axis=(0 0 1) LinearFunction(coefficients=1 0)
    Body ptpt: mass=0.0001 mass_center=(0 0 0) inertia_xx=1 inertia_yy=1 inertia_zz=1
      CustomJoint ptpt: parent_body=ulna location_in_parent=(0 0 0) location=(0 0 0)
        Coordinate ptpt_tx: motion_type=translational default_value=0.005202925 range=(-99999.9 99999.9) clamped=false
        Coordinate ptpt_ty: motion_type=translational default_value=-0.06641766 range=(-99999.9 99999.9) clamped=false
        Coordinate ptpt_tz: motion_type=translational default_value=-0.002608841 range=(-99999.9 99999.9) clamped=false
        SpatialTransform: axes_held_at_zero=(rotation1 rotation2 rotation3)
          TransformAxis translation1: coordinates=ptpt_tx axis=(1 0 0) LinearFunction(coefficients=1 0)
          TransformAxis translation2: coordinates=ptpt_ty axis=(0 1 0) LinearFunction(coefficients=1 0)
          TransformAxis translation3: coordinates=ptpt_tz axis=(0 0 1) LinearFunction(coefficients=1 0)
    Body FCUpt: mass=0.0001 mass_center=(0 0 0) inertia_xx=1 inertia_yy=1 inertia_zz=1
      CustomJoint FCUpt: parent_body=radius location_in_parent=(0 0 0) location=(0 0 0)
        Coordinate FCUpt_tx: motion_type=translational default_value=0.004 range=(-99999.9 99999.9) clamped=false
        Coordinate FCUpt_ty: motion_type=translational default_value=-0.1841 range=(-99999.9 99999.9) clamped=false
        Coordinate FCUpt_tz: motion_type=translational default_value=0.0005 range=(-99999.9 99999.9) clamped=false
        SpatialTransform: axes_held_at_zero=(rotation1 rotation2 rotation3)
          TransformAxis translation1: coordinates=FCUpt_tx axis=(1 0 0) LinearFunction(coefficients=1 0)
          TransformAxis translation2: coordinates=FCUpt_ty axis=(0 1 0) LinearFunction(coefficients=1 0)
          TransformAxis translation3: coordinates=FCUpt_tz axis=(0 0 1) LinearFunction(coefficients=1 0)
    Body EDCpt: mass=0.0001 mass_center=(0 0 0) inertia_xx=1 inertia_yy=1 inertia_zz=1
      CustomJoint EDCpt: parent_body=radius location_in_parent=(0 0 0) location=(0 0 0)
        Coordinate EDCpt_tx: motion_type=translational default_value=0 range=(-99999.9 99999.9) clamped=false
        Coordinate EDCpt_ty: motion_type=translational default_value=-1 range=(-99999.9 99999.9) clamped=false
        Coordinate EDCpt_tz: motion_type=translational default_value=0 range=(-99999.9 99999.9) clamped=false
        SpatialTransform: axes_held_at_zero=(rotation1 rotation2 rotation3)
          TransformAxis translation1: coordinates=EDCpt_tx axis=(1 0 0) LinearFunction(coefficients=1 0)
          TransformAxis translation2: coordinates=EDCpt_ty axis=(0 1 0) LinearFunction(coefficients=1 0)
          TransformAxis translation3: coordinates=EDCpt_tz axis=(0 0 1) LinearFunction(coefficients=1 0)
    Body PEC1pt2: mass=0.0001 mass_center=(0 0 0) inertia_xx=1 inertia_yy=1 inertia_zz=1
      CustomJoint PEC1pt2: parent_body=humerus location_in_parent=(0 0 0) location=(0 0 0)
        Coordinate PEC1pt2_tx: motion_type=translational default_value=0.001388238 range=(-99999.9 99999.9)
            clamped=false
        Coordinate PEC1pt2_ty: motion_type=translational default_value=0.004870599 range=(-99999.9 99999.9)
            clamped=false
        Coordinate PEC1pt2_tz: motion_type=translational default_value=0.003388243 range=(-99999.9 99999.9)
            clamped=false
        SpatialTransform: axes_held_at_zero=(rotation1 rotation2 rotation3)
          TransformAxis translation1: coordinates=PEC1pt2_tx axis=(1 0 0) LinearFunction(coefficients=1 0)
          TransformAxis translation2: coordinates=PEC1pt2_ty axis=(0 1 0) LinearFunction(coefficients=1 0)
          TransformAxis translation3: coordinates=PEC1pt2_tz axis=(0 0 1) LinearFunction(coefficients=1 0)
    Body PEC1pt3: mass=0.0001 mass_center=(0 0 0) inertia_xx=1 inertia_yy=1 inertia_zz=1
      CustomJoint PEC1pt3: parent_body=thorax location_in_parent=(0 0 0) location=(0 0 0)
        Coordinate PEC1pt3_tx: motion_type=translational default_value=-0.004541187 range=(-99999.9 99999.9)
            clamped=false
        Coordinate PEC1pt3_ty: motion_type=translational default_value=0.01096473 range=(-99999.9 99999.9)
            clamped=false
        Coordinate PEC1pt3_tz: motion_type=translational default_value=-0.01040002 range=(-99999.9 99999.9)
            clamped=false
        SpatialTransform: axes_held_at_zero=(rotation1 rotation2 rotation3)
          TransformAxis translation1: coordinates=PEC1pt3_tx axis=(1 0 0) LinearFunction(coefficients=1 0)
          TransformAxis translation2: coordinates=PEC1pt3_ty axis=(0 1 0) LinearFunction(coefficients=1 0)
          TransformAxis translation3: coordinates=PEC1pt3_tz axis=(0 0 1) LinearFunction(coefficients=1 0)
    Body PEC2pt2: mass=0.0001 mass_center=(0 0 0) inertia_xx=1 inertia_yy=1 inertia_zz=1
      CustomJoint PEC2pt2: parent_body=humerus location_in_parent=(0 0 0) location=(0 0 0)
        Coordinate PEC2pt2_tx: motion_type=translational default_value=0.001388238 range=(-99999.9 99999.9)
            clamped=false
        Coordinate PEC2pt2_ty: motion_type=translational default_value=0.004870599 range=(-99999.9 99999.9)
            clamped=false
        Coordinate PEC2pt2_tz: motion_type=translational default_value=0.003388243 range=(-99999.9 99999.9)
            clamped=false
        SpatialTransform: axes_held_at_zero=(rotation1 rotation2 rotation3)
          TransformAxis translation1: coordinates=PEC2pt2_tx axis=(1 0 0) LinearFunction(coefficients=1 0)
          TransformAxis translation2: coordinates=PEC2pt2_ty axis=(0 1 0) LinearFunction(coefficients=1 0)
          TransformAxis translation3: coordinates=PEC2pt2_tz axis=(0 0 1) LinearFunction(coefficients=1 0)
    Body PEC2pt3: mass=0.0001 mass_center=(0 0 0) inertia_xx=1 inertia_yy=1 inertia_zz=1
      CustomJoint PEC2pt3: parent_body=thorax location_in_parent=(0 0 0) location=(0 0 0)
        Coordinate PEC2pt3_tx: motion_type=translational default_value=0.000305883 range=(-99999.9 99999.9)
            clamped=false
        Coordinate PEC2pt3_ty: motion_type=translational default_value=0.01016473 range=(-99999.9 99999.9)
            clamped=false
        Coordinate PEC2pt3_tz: motion_type=translational default_value=-0.005341188 range=(-99999.9 99999.9)
            clamped=false
        SpatialTransform: axes_held_at_zero=(rotation1 rotation2 rotation3)
          TransformAxis translation1: coordinates=PEC2pt3_tx axis=(1 0 0) LinearFunction(coefficients=1 0)
          TransformAxis translation2: coordinates=PEC2pt3_ty axis=(0 1 0) LinearFunction(coefficients=1 0)
          TransformAxis translation3: coordinates=PEC2pt3_tz axis=(0 0 1) LinearFunction(coefficients=1 0)
    Body PEC3pt2: mass=0.0001 mass_center=(0 0 0) inertia_xx=1 inertia_yy=1 inertia_zz=1
      CustomJoint PEC3pt2: parent_body=humerus location_in_parent=(0 0 0) location=(0 0 0)
        Coordinate PEC3pt2_tx: motion_type=translational default_value=0.002458087 range=(-99999.9 99999.9)
            clamped=false
        Coordinate PEC3pt2_ty: motion_type=translational default_value=0.002708478 range=(-99999.9 99999.9)
            clamped=false
        Coordinate PEC3pt2_tz: motion_type=translational default_value=0.01129859 range=(-99999.9 99999.9)
            clamped=false
        SpatialTransform: axes_held_at_zero=(rotation1 rotation2 rotation3)
          TransformAxis translation1: coordinates=PEC3pt2_tx axis=(1 0 0) LinearFunction(coefficients=1 0)
          TransformAxis translation2: coordinates=PEC3pt2_ty axis=(0 1 0) LinearFunction(coefficients=1 0)
          TransformAxis translation3: coordinates=PEC3pt2_tz axis=(0 0 1) LinearFunction(coefficients=1 0)
    Body PEC3pt3: mass=0.0001 mass_center=(0 0 0) inertia_xx=1 inertia_yy=1 inertia_zz=1
      CustomJoint PEC3pt3: parent_body=thorax location_in_parent=(0 0 0) location=(0 0 0)
        Coordinate PEC3pt3_tx: motion_type=translational default_value=0 range=(-99999.9 99999.9) clamped=false
        Coordinate PEC3pt3_ty: motion_type=translational default_value=0.002416619 range=(-99999.9 99999.9)
            clamped=false
        Coordinate PEC3pt3_tz: motion_type=translational default_value=0 range=(-99999.9 99999.9) clamped=false
        SpatialTransform: axes_held_at_zero=(rotation1 rotation2 rotation3)
          TransformAxis translation1: coordinates=PEC3pt3_tx axis=(1 0 0) LinearFunction(coefficients=1 0)
          TransformAxis translation2: coordinates=PEC3pt3_ty axis=(0 1 0) LinearFunction(coefficients=1 0)
          TransformAxis translation3: coordinates=PEC3pt3_tz axis=(0 0 1) LinearFunction(coefficients=1 0)
    Body DELT2pt2a: mass=0.0001 mass_center=(0 0 0) inertia_xx=1 inertia_yy=1 inertia_zz=1
      CustomJoint DELT2pt2a: parent_body=humerus location_in_parent=(0 0 0) location=(0 0 0)
        Coordinate DELT2pt2a_tx: motion_type=translational default_value=-0.003976479 range=(-99999.9 99999.9)
            clamped=false
        Coordinate DELT2pt2a_ty: motion_type=translational default_value=-0.01837651 range=(-99999.9 99999.9)
            clamped=false
        Coordinate DELT2pt2a_tz: motion_type=translational default_value=-0.00193411 range=(-99999.9 99999.9)
            clamped=false
        SpatialTransform: axes_held_at_zero=(rotation1 rotation2 rotation3)
          TransformAxis translation1: coordinates=DELT2pt2a_tx axis=(1 0 0) LinearFunction(coefficients=1 0)
          TransformAxis translation2: coordinates=DELT2pt2a_ty axis=(0 1 0) LinearFunction(coefficients=1 0)
          TransformAxis translation3: coordinates=DELT2pt2a_tz axis=(0 0 1) LinearFunction(coefficients=1 0)
    Body DELT2pt2: mass=0.0001 mass_center=(0 0 0) inertia_xx=1 inertia_yy=1 inertia_zz=1
      CustomJoint DELT2pt2: parent_body=DELT2pt2a location_in_parent=(0 0 0) location=(0 0 0)
        Coordinate DELT2pt2_tx: motion_type=translational default_value=-0.0004399079 range=(-99999.9 99999.9)
            clamped=false
        Coordinate DELT2pt2_ty: motion_type=translational default_value=1.618745e-11 range=(-99999.9 99999.9)
            clamped=false
        Coordinate DELT2pt2_tz: motion_type=translational default_value=1.015851e-10 range=(-99999.9 99999.9)
            clamped=false
        SpatialTransform: axes_held_at_zero=(rotation1 rotation2 rotation3)
          TransformAxis translation1: coordinates=DELT2pt2_tx axis=(1 0 0) LinearFunction(coefficients=1 0)
          TransformAxis translation2: coordinates=DELT2pt2_ty axis=(0 1 0) LinearFunction(coefficients=1 0)
          TransformAxis translation3: coordinates=DELT2pt2_tz axis=(0 0 1) LinearFunction(coefficients=1 0)
    Body LAT1pt2: mass=0.0001 mass_center=(0 0 0) inertia_xx=1 inertia_yy=1 inertia_zz=1
      CustomJoint LAT1pt2: parent_body=scapula location_in_parent=(0 0 0) location=(0 0 0)
        Coordinate LAT1pt2_tx: motion_type=translational default_value=-0.0004941187 range=(-99999.9 99999.9)
            clamped=false
        Coordinate LAT1pt2_ty: motion_type=translational default_value=0.008282371 range=(-99999.9 99999.9)
            clamped=false
        Coordinate LAT1pt2_tz: motion_type=translational default_value=-0.003388243 range=(-99999.9 99999.9)
            clamped=false
        SpatialTransform: axes_held_at_zero=(rotation1 rotation2 rotation3)
          TransformAxis translation1: coordinates=LAT1pt2_tx axis=(1 0 0) LinearFunction(coefficients=1 0)
          TransformAxis translation2: coordinates=LAT1pt2_ty axis=(0 1 0) LinearFunction(coefficients=1 0)
          TransformAxis translation3: coordinates=LAT1pt2_tz axis=(0 0 1) LinearFunction(coefficients=1 0)
    Body LAT1pt3: mass=0.0001 mass_center=(0 0 0) inertia_xx=1 inertia_yy=1 inertia_zz=1
      CustomJoint LAT1pt3: parent_body=scapula location_in_parent=(0 0 0) location=(0 0 0)
        Coordinate LAT1pt3_tx: motion_type=translational default_value=0.001364709 range=(-99999.9 99999.9)
            clamped=false
        Coordinate LAT1pt3_ty: motion_type=translational default_value=0.01195297 range=(-99999.9 99999.9)
            clamped=false
        Coordinate LAT1pt3_tz: motion_type=translational default_value=-0.009882375 range=(-99999.9 99999.9)
            clamped=false
        SpatialTransform: axes_held_at_zero=(rotation1 rotation2 rotation3)
          TransformAxis translation1: coordinates=LAT1pt3_tx axis=(1 0 0) LinearFunction(coefficients=1 0)
          TransformAxis translation2: coordinates=LAT1pt3_ty axis=(0 1 0) LinearFunction(coefficients=1 0)
          TransformAxis translation3: coordinates=LAT1pt3_tz axis=(0 0 1) LinearFunction(coefficients=1 0)
    Body LAT2pt2: mass=0.0001 mass_center=(0 0 0) inertia_xx=1 inertia_yy=1 inertia_zz=1
      CustomJoint LAT2pt2: parent_body=scapula location_in_parent=(0 0 0) location=(0 0 0)
        Coordinate LAT2pt2_tx: motion_type=translational default_value=-0.003317654 range=(-99999.9 99999.9)
            clamped=false
        Coordinate LAT2pt2_ty: motion_type=translational default_value=0.007176486 range=(-99999.9 99999.9)
            clamped=false
        Coordinate LAT2pt2_tz: motion_type=translational default_value=-0.003035301 range=(-99999.9 99999.9)
            clamped=false
        SpatialTransform: axes_held_at_zero=(rotation1 rotation2 rotation3)
          TransformAxis translation1: coordinates=LAT2pt2_tx axis=(1 0 0) LinearFunction(coefficients=1 0)
          TransformAxis translation2: coordinates=LAT2pt2_ty axis=(0 1 0) LinearFunction(coefficients=1 0)
          TransformAxis translation3: coordinates=LAT2pt2_tz axis=(0 0 1) LinearFunction(coefficients=1 0)
    Body LAT2pt3: mass=0.0001 mass_center=(0 0 0) inertia_xx=1 inertia_yy=1 inertia_zz=1
      CustomJoint LAT2pt3: parent_body=scapula location_in_parent=(0 0 0) location=(0 0 0)
        Coordinate LAT2pt3_tx: motion_type=translational default_value=-0.006917662 range=(-99999.9 99999.9)
            clamped=false
        Coordinate LAT2pt3_ty: motion_type=translational default_value=0.01515297 range=(-99999.9 99999.9)
            clamped=false
        Coordinate LAT2pt3_tz: motion_type=translational default_value=-0.01696474 range=(-99999.9 99999.9)
            clamped=false
        SpatialTransform: axes_held_at_zero=(rotation1 rotation2 rotation3)
          TransformAxis translation1: coordinates=LAT2pt3_tx axis=(1 0 0) LinearFunction(coefficients=1 0)
          TransformAxis translation2: coordinates=LAT2pt3_ty axis=(0 1 0) LinearFunction(coefficients=1 0)
          TransformAxis translation3: coordinates=LAT2pt3_tz axis=(0 0 1) LinearFunction(coefficients=1 0)
    Body LAT3pt2: mass=0.0001 mass_center=(0 0 0) inertia_xx=1 inertia_yy=1 inertia_zz=1
      CustomJoint LAT3pt2: parent_body=scapula location_in_parent=(0 0 0) location=(0 0 0)
        Coordinate LAT3pt2_tx: motion_type=translational default_value=-0.01298826 range=(-99999.9 99999.9)
            clamped=false
        Coordinate LAT3pt2_ty: motion_type=translational default_value=0.008023547 range=(-99999.9 99999.9)
            clamped=false
        Coordinate LAT3pt2_tz: motion_type=translational default_value=-0.004070597 range=(-99999.9 99999.9)
            clamped=false
        SpatialTransform: axes_held_at_zero=(rotation1 rotation2 rotation3)
          TransformAxis translation1: coordinates=LAT3pt2_tx axis=(1 0 0) LinearFunction(coefficients=1 0)
          TransformAxis translation2: coordinates=LAT3pt2_ty axis=(0 1 0) LinearFunction(coefficients=1 0)
          TransformAxis translation3: coordinates=LAT3pt2_tz axis=(0 0 1) LinearFunction(coefficients=1 0)
    Body LAT3pt3: mass=0.0001 mass_center=(0 0 0) inertia_xx=1 inertia_yy=1 inertia_zz=1
      CustomJoint LAT3pt3: parent_body=scapula location_in_parent=(0 0 0) location=(0 0 0)
        Coordinate LAT3pt3_tx: motion_type=translational default_value=-0.008611784 range=(-99999.9 99999.9)
            clamped=false
        Coordinate LAT3pt3_ty: motion_type=translational default_value=0.01750592 range=(-99999.9 99999.9)
            clamped=false
        Coordinate LAT3pt3_tz: motion_type=translational default_value=-0.02120005 range=(-99999.9 99999.9)
            clamped=false
        SpatialTransform: axes_held_at_zero=(rotation1 rotation2 rotation3)
          TransformAxis translation1: coordinates=LAT3pt3_tx axis=(1 0 0) LinearFunction(coefficients=1 0)
          TransformAxis translation2: coordinates=LAT3pt3_ty axis=(0 1 0) LinearFunction(coefficients=1 0)
          TransformAxis translation3: coordinates=LAT3pt3_tz axis=(0 0 1) LinearFunction(coefficients=1 0)
  ConstraintSet:
    CoordinateCouplerConstraint [values shared by the 68 below unless stated]: independent_coordinate_names=shoulder_elv
    CoordinateCouplerConstraint sternoclavicular_r2_con: dependent_coordinate_name=sternoclavicular_r2
      coupled_coordinates_function: SimmSpline: x=(0 2.61799) y=(0 -0.633555)
    CoordinateCouplerConstraint sternoclavicular_r3_con: dependent_coordinate_name=sternoclavicular_r3
      coupled_coordinates_function: SimmSpline: x=(0 3.14159) y=(0 0.322013)
    CoordinateCouplerConstraint unrotscap_r2_con: dependent_coordinate_name=unrotscap_r2
      coupled_coordinates_function: SimmSpline: x=(0 2.61799) y=(0 0.633555)
    CoordinateCouplerConstraint unrotscap_r3_con: dependent_coordinate_name=unrotscap_r3
      coupled_coordinates_function: SimmSpline: x=(0 3.14159) y=(0 -0.322013)
    CoordinateCouplerConstraint acromioclavicular_r1_con: dependent_coordinate_name=acromioclavicular_r1
      coupled_coordinates_function: SimmSpline: x=(0 2.61799) y=(0 0.466003)
    CoordinateCouplerConstraint acromioclavicular_r2_con: dependent_coordinate_name=acromioclavicular_r2
      coupled_coordinates_function: SimmSpline: x=(0 2.61799) y=(0 -0.128282)
    CoordinateCouplerConstraint acromioclavicular_r3_con: dependent_coordinate_name=acromioclavicular_r3
      coupled_coordinates_function: SimmSpline: x=(0 2.61799) y=(0 1.03673)
    CoordinateCouplerConstraint unrothum_r1_con: dependent_coordinate_name=unrothum_r1
      coupled_coordinates_function: SimmSpline: x=(0 2.61799) y=(0 -0.466003)
    CoordinateCouplerConstraint unrothum_r2_con: dependent_coordinate_name=unrothum_r2
      coupled_coordinates_function: SimmSpline: x=(0 2.61799) y=(0 0.128282)
    CoordinateCouplerConstraint unrothum_r3_con: dependent_coordinate_name=unrothum_r3
      coupled_coordinates_function: SimmSpline: x=(0 2.61799) y=(0 -1.03673)
    CoordinateCouplerConstraint shoulder1_r2_con: independent_coordinate_names=elv_angle
        dependent_coordinate_name=shoulder1_r2
      coupled_coordinates_function: SimmSpline: x=(-1.5708 3.14159) y=(1.5708 -3.14159)
    CoordinateCouplerConstraint bicpt_tx_con: independent_coordinate_names=elbow_flexion
        dependent_coordinate_name=bicpt_tx
      coupled_coordinates_function: SimmSpline: x=(0 2.26893) y=(-0.0001 0.0042)
    CoordinateCouplerConstraint bicpt_ty_con: independent_coordinate_names=elbow_flexion
        dependent_coordinate_name=bicpt_ty
      coupled_coordinates_function: SimmSpline: x=(0 2.26893) y=(-0.0276 -0.0425)
    CoordinateCouplerConstraint bicpt_tz_con: independent_coordinate_names=elbow_flexion
        dependent_coordinate_name=bicpt_tz
      coupled_coordinates_function: SimmSpline: x=(0 2.26893) y=(-0.0043 -0.0067)
    CoordinateCouplerConstraint bicpt2_tx_con: independent_coordinate_names=pro_sup dependent_coordinate_name=bicpt2_tx
      coupled_coordinates_function: SimmSpline: x=(-1.5708 -0.610865 1.57823) y=(-0.003 0.01 0.01376)
    CoordinateCouplerConstraint bicpt2_ty_con: independent_coordinate_names=elbow_flexion
        dependent_coordinate_name=bicpt2_ty
      coupled_coordinates_function: SimmSpline: x=(0 2.27483) y=(-0.0102 -0.045607)
    CoordinateCouplerConstraint bicpt2_tz_con: independent_coordinate_names=pro_sup dependent_coordinate_name=bicpt2_tz
      coupled_coordinates_function: SimmSpline: x=(-1.5708 -0.610865 1.57561) y=(-0.0095 -0.011533 -0.000331)
    CoordinateCouplerConstraint ptpt_tx_con: independent_coordinate_names=pro_sup dependent_coordinate_name=ptpt_tx
      coupled_coordinates_function: SimmSpline: x=(-1.5708 1.5708) y=(0.0142 0.0009)
    CoordinateCouplerConstraint ptpt_ty_con: independent_coordinate_names=pro_sup dependent_coordinate_name=ptpt_ty
      coupled_coordinates_function: SimmSpline: x=(-1.5708 1.5708) y=(-0.0606 -0.0692)
    CoordinateCouplerConstraint ptpt_tz_con: independent_coordinate_names=pro_sup dependent_coordinate_name=ptpt_tz
      coupled_coordinates_function: SimmSpline: x=(-1.5708 1.5708) y=(0.0072 -0.0073)
    CoordinateCouplerConstraint FCUpt_tx_con: independent_coordinate_names=pro_sup dependent_coordinate_name=FCUpt_tx
      coupled_coordinates_function: SimmSpline: x=(-1.5708 0 1.5708) y=(-0.0027 0.004 0.0132)
    CoordinateCouplerConstraint FCUpt_ty_con: independent_coordinate_names=pro_sup dependent_coordinate_name=FCUpt_ty
      coupled_coordinates_function: SimmSpline: x=(-1.5708 0 1.5708) y=(-0.1838 -0.1841 -0.1821)
    CoordinateCouplerConstraint FCUpt_tz_con: independent_coordinate_names=pro_sup dependent_coordinate_name=FCUpt_tz
      coupled_coordinates_function: SimmSpline: x=(-1.5708 0 1.5708) y=(0.0069 0.0005 0.0002)
    CoordinateCouplerConstraint EDCpt_tx_con: independent_coordinate_names=pro_sup dependent_coordinate_name=EDCpt_tx
      coupled_coordinates_function: SimmSpline: x=(-1.5708 0 1.5708) y=(0.0108 0 -0.0108)
    CoordinateCouplerConstraint EDCpt_ty_con: independent_coordinate_names=pro_sup dependent_coordinate_name=EDCpt_ty
      coupled_coordinates_function: SimmSpline: x=(-1.5708 0 1.5708) y=(-0.0013 0 0.0038)
    CoordinateCouplerConstraint EDCpt_tz_con: independent_coordinate_names=pro_sup dependent_coordinate_name=EDCpt_tz
      coupled_coordinates_function: SimmSpline: x=(-1.5708 0 1.5708) y=(-0.0035 0 -0.00089)
    CoordinateCouplerConstraint PEC1pt2_tx_con: dependent_coordinate_name=PEC1pt2_tx
      coupled_coordinates_function: SimmSpline: x=(0 3.14159) y=(0 0.0059)
    CoordinateCouplerConstraint PEC1pt2_ty_con: dependent_coordinate_name=PEC1pt2_ty
      coupled_coordinates_function: SimmSpline: x=(0 3.14159) y=(0 0.0207)
    CoordinateCouplerConstraint PEC1pt2_tz_con: dependent_coordinate_name=PEC1pt2_tz
      coupled_coordinates_function: SimmSpline: x=(0 3.14159) y=(0 0.0144)
    CoordinateCouplerConstraint PEC1pt3_tx_con: dependent_coordinate_name=PEC1pt3_tx
      coupled_coordinates_function: SimmSpline: x=(0 3.14159) y=(0 -0.0193)
    CoordinateCouplerConstraint PEC1pt3_ty_con: dependent_coordinate_name=PEC1pt3_ty
      coupled_coordinates_function: SimmSpline: x=(0 3.14159) y=(0 0.0466)
    CoordinateCouplerConstraint PEC1pt3_tz_con: dependent_coordinate_name=PEC1pt3_tz
      coupled_coordinates_function: SimmSpline: x=(0 3.14159) y=(0 -0.0442)
    CoordinateCouplerConstraint PEC2pt2_tx_con: dependent_coordinate_name=PEC2pt2_tx
      coupled_coordinates_function: SimmSpline: x=(0 3.14159) y=(0 0.0059)
    CoordinateCouplerConstraint PEC2pt2_ty_con: dependent_coordinate_name=PEC2pt2_ty
      coupled_coordinates_function: SimmSpline: x=(0 3.14159) y=(0 0.0207)
    CoordinateCouplerConstraint PEC2pt2_tz_con: dependent_coordinate_name=PEC2pt2_tz
      coupled_coordinates_function: SimmSpline: x=(0 3.14159) y=(0 0.0144)
    CoordinateCouplerConstraint PEC2pt3_tx_con: dependent_coordinate_name=PEC2pt3_tx
      coupled_coordinates_function: SimmSpline: x=(0 3.14159) y=(0 0.0013)
    CoordinateCouplerConstraint PEC2pt3_ty_con: dependent_coordinate_name=PEC2pt3_ty
      coupled_coordinates_function: SimmSpline: x=(0 3.14159) y=(0 0.0432)
    CoordinateCouplerConstraint PEC2pt3_tz_con: dependent_coordinate_name=PEC2pt3_tz
      coupled_coordinates_function: SimmSpline: x=(0 3.14159) y=(0 -0.0227)
    CoordinateCouplerConstraint PEC3pt2_tx_con: dependent_coordinate_name=PEC3pt2_tx
      coupled_coordinates_function: SimmSpline: x=(0 0.747517 3.14159) y=(0 0.002482 0.0059)
    CoordinateCouplerConstraint PEC3pt2_ty_con: dependent_coordinate_name=PEC3pt2_ty
      coupled_coordinates_function: SimmSpline: x=(0 3.13149) y=(0 0.011474)
    CoordinateCouplerConstraint PEC3pt2_tz_con: dependent_coordinate_name=PEC3pt2_tz
      coupled_coordinates_function: SimmSpline: x=(0 0.623056 2.29124 3.12533) y=(0 0.009968 0.018193 0.017746)
    CoordinateCouplerConstraint PEC3pt3_tx_con: dependent_coordinate_name=PEC3pt3_tx
      coupled_coordinates_function: SimmSpline: x=(0 3.14159) y=(0 0)
    CoordinateCouplerConstraint PEC3pt3_ty_con: dependent_coordinate_name=PEC3pt3_ty
      coupled_coordinates_function: SimmSpline: x=(0.0101016 1.59605 3.14159) y=(0.000222 0.011219 0.0441)
    CoordinateCouplerConstraint PEC3pt3_tz_con: dependent_coordinate_name=PEC3pt3_tz
      coupled_coordinates_function: SimmSpline: x=(0 3.14159) y=(0 0)
    CoordinateCouplerConstraint DELT2pt2a_tx_con: dependent_coordinate_name=DELT2pt2a_tx
      coupled_coordinates_function: SimmSpline: x=(0 3.14159) y=(0 -0.0169)
    CoordinateCouplerConstraint DELT2pt2a_ty_con: dependent_coordinate_name=DELT2pt2a_ty
      coupled_coordinates_function: SimmSpline: x=(0 3.14159) y=(0 -0.0781)
    CoordinateCouplerConstraint DELT2pt2a_tz_con: dependent_coordinate_name=DELT2pt2a_tz
      coupled_coordinates_function: SimmSpline: x=(0 1.22229 3.14159) y=(0 -0.005395 -0.0363)
    CoordinateCouplerConstraint DELT2pt2_tx_con: independent_coordinate_names=shoulder_rot
        dependent_coordinate_name=DELT2pt2_tx
      coupled_coordinates_function: SimmSpline: x=(-1.5708 -0.0101503 0.349046) y=(0.0214 4.9e-5 -0.020005)
    CoordinateCouplerConstraint DELT2pt2_ty_con: independent_coordinate_names=shoulder_rot
        dependent_coordinate_name=DELT2pt2_ty
      coupled_coordinates_function: SimmSpline: x=(-1.5708 -1.18189 -0.169482 0 0.349066)
          y=(-0.0029 -0.002148 -0.000139 0 -0.001644)
    CoordinateCouplerConstraint DELT2pt2_tz_con: independent_coordinate_names=shoulder_rot
        dependent_coordinate_name=DELT2pt2_tz
      coupled_coordinates_function: SimmSpline: x=(-1.5708 -0.496661 0 0.342893) y=(-0.0455 -0.006762 0 -0.00573)
    CoordinateCouplerConstraint LAT1pt2_tx_con: dependent_coordinate_name=LAT1pt2_tx
      coupled_coordinates_function: SimmSpline: x=(0 3.14159) y=(0 -0.0021)
    CoordinateCouplerConstraint LAT1pt2_ty_con: dependent_coordinate_name=LAT1pt2_ty
      coupled_coordinates_function: SimmSpline: x=(0 3.14159) y=(0 0.0352)
    CoordinateCouplerConstraint LAT1pt2_tz_con: dependent_coordinate_name=LAT1pt2_tz
      coupled_coordinates_function: SimmSpline: x=(0 3.14159) y=(0 -0.0144)
    CoordinateCouplerConstraint LAT1pt3_tx_con: dependent_coordinate_name=LAT1pt3_tx
      coupled_coordinates_function: SimmSpline: x=(0 3.14159) y=(0 0.0058)
    CoordinateCouplerConstraint LAT1pt3_ty_con: dependent_coordinate_name=LAT1pt3_ty
      coupled_coordinates_function: SimmSpline: x=(0 3.14159) y=(0 0.0508)
    CoordinateCouplerConstraint LAT1pt3_tz_con: dependent_coordinate_name=LAT1pt3_tz
      coupled_coordinates_function: SimmSpline: x=(0 3.14159) y=(0 -0.042)
    CoordinateCouplerConstraint LAT2pt2_tx_con: dependent_coordinate_name=LAT2pt2_tx
      coupled_coordinates_function: SimmSpline: x=(0 3.14159) y=(0 -0.0141)
    CoordinateCouplerConstraint LAT2pt2_ty_con: dependent_coordinate_name=LAT2pt2_ty
      coupled_coordinates_function: SimmSpline: x=(0 3.14159) y=(0 0.0305)
    CoordinateCouplerConstraint LAT2pt2_tz_con: dependent_coordinate_name=LAT2pt2_tz
      coupled_coordinates_function: SimmSpline: x=(0 3.14159) y=(0 -0.0129)
    CoordinateCouplerConstraint LAT2pt3_tx_con: dependent_coordinate_name=LAT2pt3_tx
      coupled_coordinates_function: SimmSpline: x=(0 3.14159) y=(0 -0.0294)
    CoordinateCouplerConstraint LAT2pt3_ty_con: dependent_coordinate_name=LAT2pt3_ty
      coupled_coordinates_function: SimmSpline: x=(0 3.14159) y=(0 0.0644)
    CoordinateCouplerConstraint LAT2pt3_tz_con: dependent_coordinate_name=LAT2pt3_tz
      coupled_coordinates_function: SimmSpline: x=(0 3.14159) y=(0 -0.0721)
    CoordinateCouplerConstraint LAT3pt2_tx_con: dependent_coordinate_name=LAT3pt2_tx
      coupled_coordinates_function: SimmSpline: x=(0 3.14159) y=(0 -0.0552)
    CoordinateCouplerConstraint LAT3pt2_ty_con: dependent_coordinate_name=LAT3pt2_ty
      coupled_coordinates_function: SimmSpline: x=(0 3.14159) y=(0 0.0341)
    CoordinateCouplerConstraint LAT3pt2_tz_con: dependent_coordinate_name=LAT3pt2_tz
      coupled_coordinates_function: SimmSpline: x=(0 3.14159) y=(0 -0.0173)
    CoordinateCouplerConstraint LAT3pt3_tx_con: dependent_coordinate_name=LAT3pt3_tx
      coupled_coordinates_function: SimmSpline: x=(0 3.14159) y=(0 -0.0366)
    CoordinateCouplerConstraint LAT3pt3_ty_con: dependent_coordinate_name=LAT3pt3_ty
      coupled_coordinates_function: SimmSpline: x=(0 3.14159) y=(0 0.0744)
    CoordinateCouplerConstraint LAT3pt3_tz_con: dependent_coordinate_name=LAT3pt3_tz
      coupled_coordinates_function: SimmSpline: x=(0 3.14159) y=(0 -0.0901)
  ForceSet:
    Millard2012EquilibriumMuscle [values shared by the 26 below unless stated]:
      ActiveForceLengthCurve: minimum_value=0
      ForceVelocityCurve: concentric_slope_at_vmax=0 concentric_slope_near_vmax=0.25 isometric_slope=5
          eccentric_slope_at_vmax=0 eccentric_slope_near_vmax=0.15 max_eccentric_velocity_force_multiplier=1.4
      FiberForceLengthCurve: strain_at_zero_force=2 strain_at_one_norm_force=3 stiffness_at_low_force=0.01
          stiffness_at_one_norm_force=1.2 curviness=1
      TendonForceLengthCurve
    Millard2012EquilibriumMuscle DELT1: max_isometric_force=1142.6 optimal_fiber_length=0.0976
        tendon_slack_length=0.093 pennation_angle_at_optimal=0.3839724 [radians] minimum_activation=0.01
      PathPoint P1: humerus (0.00896 -0.11883 0.00585)
      PathPoint P2: humerus (0.01623 -0.11033 0.00412)
      PathPoint P3: scapula (0.04347 -0.03252 0.00099)
      PathPoint P4: clavicle (-0.014 0.01106 0.08021)
      PathWrap: wrap_object=delt2hum
      PathWrap: wrap_object=DELT1hh method=hybrid range=(2 3)
    Millard2012EquilibriumMuscle DELT2: max_isometric_force=1142.6 optimal_fiber_length=0.1078
        tendon_slack_length=0.1095 pennation_angle_at_optimal=0.2617994 minimum_activation=0.01
      PathPoint P1: humerus (0.00461 -0.13611 0.0056)
      PathPoint P2: DELT2pt2 (0.0272 0.00535 0.04807)
      PathPoint P3: scapula (5e-5 0.00294 0.02233)
      PathPoint P4: scapula (-0.01078 -0.00034 0.0062)
      PathWrap: wrap_object=Deltoid2 method=hybrid
      PathWrap: wrap_object=delt2hum
      PathWrap: wrap_object=TMAJ_LAT_PEC_CORBhh
    Millard2012EquilibriumMuscle DELT3: max_isometric_force=259.88 optimal_fiber_length=0.1367
        tendon_slack_length=0.038 pennation_angle_at_optimal=0.3141593 minimum_activation=0.01
      PathPoint P1: scapula (-0.05573 0.00122 -0.02512)
      PathPoint P2: scapula (-0.07247 -0.03285 0.01233)
      PathPoint P3: humerus (0.00206 -0.07602 0.01045)
      PathWrap: wrap_object=Delt3
      PathWrap: wrap_object=delt3hum method=hybrid
      PathWrap: wrap_object=TMAJ_LAT_PEC_CORBhh
    Millard2012EquilibriumMuscle SUPSP: max_isometric_force=487.82 optimal_fiber_length=0.0682
        tendon_slack_length=0.0395 pennation_angle_at_optimal=0.122173 minimum_activation=0.01
      PathPoint P1: humerus (0.00256 0.01063 0.02593)
      PathPoint P2: scapula (-0.01918 0.00127 -0.01271)
      PathPoint P3: scapula (-0.044 -0.01512 -0.05855)
      PathWrap: wrap_object=SUPSP method=hybrid
    Millard2012EquilibriumMuscle INFSP: max_isometric_force=1210.84 optimal_fiber_length=0.0755
        tendon_slack_length=0.0308 pennation_angle_at_optimal=0.3228859 minimum_activation=0.01
      PathPoint P1: humerus (-0.00887 0.00484 0.02448)
      PathPoint P2: scapula (-0.07382 -0.05476 -0.04781)
      PathWrap: wrap_object=INFSP
      PathWrap: wrap_object=INFSP_and_TMIN_hum_head method=hybrid
    Millard2012EquilibriumMuscle SUBSC: max_isometric_force=1377.81 optimal_fiber_length=0.0873
        tendon_slack_length=0.033 pennation_angle_at_optimal=0.3490659 minimum_activation=0.01
      PathPoint P1: humerus (0.01403 0.0084 -0.01331)
      PathPoint P2: scapula (-0.01831 -0.05223 -0.02457)
      PathPoint P3: scapula (-0.07246 -0.03943 -0.06475)
      PathWrap: wrap_object=SUBSCAP method=hybrid
    Millard2012EquilibriumMuscle TMIN: max_isometric_force=354.25 optimal_fiber_length=0.0741
        tendon_slack_length=0.0713 pennation_angle_at_optimal=0.418879 minimum_activation=0.01
      PathPoint P1: humerus (-0.0011 -0.01264 0.02156)
      PathPoint P2: scapula (-0.09473 -0.07991 -0.04737)
      PathPoint P3: scapula (-0.09643 -0.08121 -0.05298)
      PathWrap: wrap_object=TMIN method=hybrid range=(1 2)
      PathWrap: wrap_object=INFSP_and_TMIN_hum_head method=hybrid range=(1 2)
      PathWrap: wrap_object=TMINhum range=(1 2)
    Millard2012EquilibriumMuscle TMAJ: max_isometric_force=425.39 optimal_fiber_length=0.1624 tendon_slack_length=0.02
        pennation_angle_at_optimal=0.2792527 minimum_activation=0.01
      PathPoint P1: humerus (0.00998 -0.05419 -0.00568)
      PathPoint P2: scapula (-0.10264 -0.10319 -0.05829)
      PathPoint P3: scapula (-0.10489 -0.10895 -0.07117)
      PathWrap: wrap_object=TMAJ_LAThum
      PathWrap: wrap_object=LAT_TMAJhh range=(1 2)
      PathWrap: wrap_object=LAT_TMAJ2hh
    Millard2012EquilibriumMuscle PECM1: max_isometric_force=364.41 optimal_fiber_length=0.1442
        tendon_slack_length=0.0028 pennation_angle_at_optimal=0.296706 minimum_activation=0.01
      PathPoint P1: humerus (0.01169 -0.04191 0.0078)
      PathPoint P2: PEC1pt2 (0.01615 -0.04045 -0.00577)
      PathPoint P3: PEC1pt3 (0.00958 -0.01509 0.12664)
      PathPoint P4: clavicle (0.00321 -0.00013 0.05113)
      PathWrap: wrap_object=Thorax method=hybrid
      PathWrap: wrap_object=PEC12hum range=(2 3)
      PathWrap: wrap_object=PEC1hh method=hybrid
    Millard2012EquilibriumMuscle PECM2: max_isometric_force=515.41 optimal_fiber_length=0.1385
        tendon_slack_length=0.089 pennation_angle_at_optimal=0.4363323 minimum_activation=0.01
      PathPoint P1: humerus (0.01274 -0.04289 0.00785)
      PathPoint P2: PEC2pt2 (0.01453 -0.04568 -0.00687)
      PathPoint P3: PEC2pt3 (0.02018 -0.04165 0.1269)
      PathPoint P4: thorax (0.03091 -0.03922 0.09705)
      PathPoint P5: thorax (0.02769 -0.04498 0.02271)
      PathWrap: wrap_object=Thorax method=hybrid
      PathWrap: wrap_object=PEC12hum range=(2 3)
      PathWrap: wrap_object=TMAJ_LAT_PEC_CORBhh
      PathWrap: wrap_object=PEC23hh
    Millard2012EquilibriumMuscle PECM3: max_isometric_force=390.55 optimal_fiber_length=0.1385
        tendon_slack_length=0.132 pennation_angle_at_optimal=0.4363323 minimum_activation=0.01
      PathPoint P1: humerus (0.01269 -0.04375 0.0075)
      PathPoint P2: PEC3pt2 (0.01243 -0.05157 -0.01807)
      PathPoint P3: PEC3pt3 (0.02984 -0.071 0.1151)
      PathPoint P4: thorax (0.0525 -0.08417 0.08935)
      PathPoint P5: thorax (0.05724 -0.11654 0.03787)
      PathWrap: wrap_object=Thorax method=hybrid
      PathWrap: wrap_object=PEC3hum range=(2 3)
      PathWrap: wrap_object=PEC23hh
    Millard2012EquilibriumMuscle LAT1: max_isometric_force=389.1 optimal_fiber_length=0.254 tendon_slack_length=0.12
        pennation_angle_at_optimal=0.4363323 minimum_activation=0.01
      PathPoint P1: humerus (0.0105 -0.03415 -0.00653)
      PathPoint P2: LAT1pt2 (-0.07947 -0.08581 -0.02188)
      PathPoint P3: LAT1pt3 (-0.11215 -0.09779 -0.05322)
      PathPoint P4: thorax (-0.11828 -0.10118 0.03316)
      PathPoint P5: thorax (-0.09578 -0.11724 0.00882)
      PathWrap: wrap_object=TMAJ_LAThum
      PathWrap: wrap_object=LAT_TMAJhh range=(1 2)
      PathWrap: wrap_object=LAT_TMAJ2hh
    Millard2012EquilibriumMuscle LAT2: max_isometric_force=389.1 optimal_fiber_length=0.2324 tendon_slack_length=0.1765
        pennation_angle_at_optimal=0.3316126 minimum_activation=0.01
      PathPoint P1: humerus (0.00968 -0.04071 -0.00611)
      PathPoint P2: LAT2pt2 (-0.0764 -0.1022 -0.01808)
      PathPoint P3: LAT2pt3 (-0.10054 -0.13969 -0.05258)
      PathPoint P4: thorax (-0.10992 -0.16908 0.02878)
      PathPoint P5: thorax (-0.07186 -0.18818 0.00815)
      PathWrap: wrap_object=TMAJ_LAThum
      PathWrap: wrap_object=LAT_TMAJhh range=(1 2)
      PathWrap: wrap_object=LAT_TMAJ2hh
    Millard2012EquilibriumMuscle LAT3: max_isometric_force=281.66 optimal_fiber_length=0.2789
        tendon_slack_length=0.1403 pennation_angle_at_optimal=0.3665191 minimum_activation=0.01
      PathPoint P1: humerus (0.01208 -0.03922 -0.00416)
      PathPoint P2: LAT3pt2 (-0.05678 -0.13303 -0.0213)
      PathPoint P3: LAT3pt3 (-0.09449 -0.17553 -0.04606)
      PathPoint P4: thorax (-0.11157 -0.19387 0.05532)
      PathPoint P5: thorax (-0.07117 -0.24858 0.00907)
      PathWrap: wrap_object=TMAJ_LAThum
      PathWrap: wrap_object=LAT_TMAJhh range=(1 2)
      PathWrap: wrap_object=LAT_TMAJ2hh
    Millard2012EquilibriumMuscle CORB: max_isometric_force=242.46 optimal_fiber_length=0.0932 tendon_slack_length=0.097
        pennation_angle_at_optimal=0 minimum_activation=0.01
      PathPoint P1: scapula (0.0125 -0.04127 -0.02652)
      PathPoint P2: scapula (0.00483 -0.06958 -0.01563)
      PathPoint P3: humerus (0.00743 -0.15048 -0.00782)
      PathWrap: wrap_object=CORBhum
      PathWrap: wrap_object=TMAJ_LAT_PEC_CORBhh
    Millard2012EquilibriumMuscle TRIlong: max_isometric_force=798.52 optimal_fiber_length=0.134
        tendon_slack_length=0.143 pennation_angle_at_optimal=0.2094395 minimum_activation=0.01
      PathPoint P1: scapula (-0.04565 -0.04073 -0.01377)
      PathPoint P2: humerus (-0.02714 -0.11441 -0.00664)
      PathPoint P3: humerus (-0.03184 -0.22637 -0.01217)
      PathPoint P4: humerus (-0.01743 -0.26757 -0.01208)
      PathPoint P5: ulna (-0.0219 0.01046 -0.00078)
      PathWrap: wrap_object=TRI
      PathWrap: wrap_object=TRIlonghh method=hybrid
      PathWrap: wrap_object=TRIlongglen
    Millard2012EquilibriumMuscle TRIlat: max_isometric_force=624.3 optimal_fiber_length=0.1138
        tendon_slack_length=0.098 pennation_angle_at_optimal=0.1570796 minimum_activation=0.01
      PathPoint P1: humerus (-0.00599 -0.12646 0.00428)
      PathPoint P2: humerus (-0.02344 -0.14528 0.00928)
      PathPoint P3: humerus (-0.03184 -0.22637 -0.01217)
      PathPoint P4: humerus (-0.01743 -0.26757 -0.01208)
      PathPoint P5: ulna (-0.0219 0.01046 -0.00078)
      PathWrap: wrap_object=TRI
    Millard2012EquilibriumMuscle TRImed: max_isometric_force=624.3 optimal_fiber_length=0.1138
        tendon_slack_length=0.0908 pennation_angle_at_optimal=0.1570796 minimum_activation=0.01
      PathPoint P1: humerus (-0.00838 -0.13695 -0.00906)
      PathPoint P2: humerus (-0.02601 -0.15139 -0.0108)
      PathPoint P3: humerus (-0.03184 -0.22637 -0.01217)
      PathPoint P4: humerus (-0.01743 -0.26757 -0.01208)
      PathPoint P5: ulna (-0.0219 0.01046 -0.00078)
      PathWrap: wrap_object=TRI
    Millard2012EquilibriumMuscle ANC: max_isometric_force=350 optimal_fiber_length=0.027 tendon_slack_length=0.018
        pennation_angle_at_optimal=0 minimum_activation=0.01
      PathPoint P1: humerus (-0.00744 -0.28359 0.00979)
      PathPoint P2: ulna (-0.02532 -0.00124 0.006)
      PathWrap: wrap_object=ANC method=hybrid
    Millard2012EquilibriumMuscle SUP: max_isometric_force=476 optimal_fiber_length=0.033 tendon_slack_length=0.028
        pennation_angle_at_optimal=0 minimum_activation=0.01
      PathPoint P1: radius (0.00996 -0.06096 0.00075)
      PathPoint P2: radius (0.01201 -0.0517 -0.00107)
      PathPoint P3: ulna (-0.0136 -0.03384 0.02013)
      PathWrap: wrap_object=SUP
    Millard2012EquilibriumMuscle BIClong: max_isometric_force=624.3 optimal_fiber_length=0.1157
        tendon_slack_length=0.2723 pennation_angle_at_optimal=0 minimum_activation=0.01
      PathPoint P1: scapula (-0.03123 -0.02353 -0.01305)
      PathPoint P2: scapula (-0.02094 -0.01309 -0.00461)
      PathPoint P3: humerus (0.02131 0.01793 0.01028)
      PathPoint P4: humerus (0.02378 -0.00511 0.01201)
      PathPoint P5: humerus (0.01345 -0.02827 0.00136)
      PathPoint P6: humerus (0.01068 -0.07736 -0.00165)
      PathPoint P7: humerus (0.01703 -0.12125 0.00024)
      PathPoint P8: humerus (0.0228 -0.1754 -0.0063)
      PathPoint P9: bicpt2 (0 0 0)
      ConditionalPathPoint P10: bicpt (0 0 0) range=(-0.638791 1.5708) coordinate=pro_sup
      PathPoint P11: radius (-0.002 -0.0375 -0.002)
      PathWrap: wrap_object=Elbow_BIC_BRD method=hybrid
      PathWrap: wrap_object=BIClong method=hybrid range=(2 3)
    Millard2012EquilibriumMuscle BICshort: max_isometric_force=435.56 optimal_fiber_length=0.1321
        tendon_slack_length=0.1923 pennation_angle_at_optimal=0 minimum_activation=0.01
      PathPoint P1: scapula (0.01268 -0.03931 -0.02625)
      PathPoint P2: scapula (0.00093 -0.06704 -0.01593)
      PathPoint P3: humerus (0.01117 -0.07576 -0.01101)
      PathPoint P4: humerus (0.01703 -0.12125 -0.01079)
      PathPoint P5: humerus (0.0228 -0.1754 -0.0063)
      PathPoint P6: bicpt2 (0 0 0)
      ConditionalPathPoint P7: bicpt (0 0 0) range=(-0.638791 1.5708) coordinate=pro_sup
      PathPoint P8: radius (-0.002 -0.0375 -0.002)
      PathWrap: wrap_object=Elbow_BIC_BRD method=hybrid
    Millard2012EquilibriumMuscle BRA: max_isometric_force=987.26 optimal_fiber_length=0.0858 tendon_slack_length=0.0535
        pennation_angle_at_optimal=0 minimum_activation=0.01
      PathPoint P1: humerus (0.0068 -0.1739 -0.0036)
      ConditionalPathPoint P2: humerus (0.01894 -0.28559 -0.01105) range=(0 0.813149) coordinate=elbow_flexion
      ConditionalPathPoint P3: ulna (0.00498 -0.01463 0.00128) range=(0 0.813149) coordinate=elbow_flexion
      PathPoint P4: ulna (-0.0032 -0.0239 0.0009)
    Millard2012EquilibriumMuscle BRD: max_isometric_force=261.33 optimal_fiber_length=0.1726 tendon_slack_length=0.133
        pennation_angle_at_optimal=0 minimum_activation=0.01
      PathPoint P1: humerus (-0.0098 -0.19963 0.00223)
      PathPoint P2: radius (0.03577 -0.12742 0.02315)
      PathPoint P3: radius (0.0419 -0.221 0.0224)
      PathWrap: wrap_object=Elbow_BIC_BRD method=hybrid
    Millard2012EquilibriumMuscle PT: max_isometric_force=566.22 optimal_fiber_length=0.0492 tendon_slack_length=0.098
        pennation_angle_at_optimal=0.1745329 minimum_activation=0.01
      PathPoint P1: humerus (0.0036 -0.2759 -0.0365)
      PathPoint P2: ulna (0.00846 -0.03373 -0.01432)
      PathPoint P3: ptpt (0.00464 -0.00026 -0.00214)
      ConditionalPathPoint P4: radius (0.0236 -0.0934 0.0094) range=(-1.5708 0.509636) coordinate=pro_sup
      PathPoint P5: radius (0.0254 -0.1088 0.0198)
      PathWrap: wrap_object=Elbow_PT_ECRL method=hybrid
    Millard2012EquilibriumMuscle PQ: max_isometric_force=75.48 optimal_fiber_length=0.0282 tendon_slack_length=0.005
        pennation_angle_at_optimal=0.1745329 minimum_activation=0.01
      PathPoint P1: radius (0.03245 -0.19998 0.01962)
      PathPoint P2: ulna (0.00193 -0.20972 0.03632)
      PathWrap: wrap_object=PQ2
      PathWrap: wrap_object=PQ1
    ObjectGroup shoulder: members=(CORB DELT1 DELT2 DELT3 INFSP LAT1 LAT2 LAT3 PECM1 PECM2 PECM3 SUBSC SUPSP TMAJ TMIN)
    ObjectGroup elbow: members=(ANC BIClong BICshort BRA BRD PT TRIlat TRIlong TRImed)
    ObjectGroup forearm: members=(PQ PT SUP)
    ObjectGroup extensor
    ObjectGroup radial
    ObjectGroup wrist
    ObjectGroup ulnar
    ObjectGroup flexor
    ObjectGroup hand
    ObjectGroup thumb
