# OpenSim document version 30000
Model NoTremor Upper Limb Model:
  length_units: meters
  force_units: N
  gravity: 0 -9.80665 0
  defaults: Millard2012EquilibriumMuscle default: default_activation=0 minimum_activation=0
    FiberForceLengthCurve: strain_at_zero_force=1 strain_at_one_norm_force=1.6 stiffness_at_low_force=0.2
        stiffness_at_one_norm_force=2.86 curviness=1
  BodySet:
    Body ground: mass=0 mass_center=(0 0 0) inertia_xx=1 inertia_yy=1 inertia_zz=1
    Body thorax: mass=26.83 mass_center=(0 -0.16 0) inertia_xx=1.4745 inertia_yy=0.7555 inertia_zz=1.4314
        meshes=thorax.vtp
      WeldJoint ground_thorax: parent_body=ground location_in_parent=(0 0 0) location=(0 0 0)
      WrapEllipsoid Thorax: xyz_body_rotation=(0.0434587 -0.331962 0.189892) translation=(-0.0386 -0.1273 0.0709)
          dimensions=(0.1 0.135 0.08)
    Body clavicle: mass=0.156 mass_center=(-0.011096 0.0063723 0.054168) inertia_xx=0.00024259 inertia_yy=0.00025526
        inertia_zz=4.442e-5 inertia_xy=-1.898e-5 inertia_xz=-6.994e-5 inertia_yz=5.371e-5 meshes=clavicle.vtp
      WeldJoint sternoclavicular: parent_body=thorax location_in_parent=(0.006325 0.00693 0.025465) location=(0 0 0)
    Body scapula: mass=0.70396 mass_center=(-0.054694 -0.035032 -0.043734) inertia_xx=0.0012429 inertia_yy=0.0011504
        inertia_zz=0.0013651 inertia_xy=0.0004494 inertia_xz=0.00040922 inertia_yz=0.0002411 meshes=scapula.vtp
      WeldJoint acromioclavicular: parent_body=clavicle location_in_parent=(-0.01433 0.02007 0.135535) location=(0 0 0)
      WrapEllipsoid Deltoid2: xyz_body_rotation=(3.13042 -1.54881 -1.31423) translation=(-0.0058 -0.0378 0.0096)
          active=false quadrant=-y dimensions=(0.03 0.04 0.035)
      WrapTorus Delt3: xyz_body_rotation=(0.620988 0.32882 -0.560774) translation=(-0.0973 -0.0428 -0.037) active=false
          inner_radius=0.04 outer_radius=0.06
      WrapTorus INFSP: xyz_body_rotation=(0.0253073 0.58835 0.151844) translation=(-0.0561 -0.0199 -0.0112)
          inner_radius=0.008 outer_radius=0.019
      WrapEllipsoid TMIN: xyz_body_rotation=(-2.09754 -0.280823 -1.76348) translation=(-0.0418 -0.0519 -0.0359)
          quadrant=x dimensions=(0.03 0.03 0.05)
      WrapCylinder TRIlongglen: xyz_body_rotation=(1.37532 -0.294612 2.43596) translation=(-0.0359 -0.0309 -0.0132)
          quadrant=x radius=0.003 length=0.03
    Body humerus: mass=1.99757 mass_center=(0.018064 -0.140141 -0.012746) inertia_xx=0.01227763 inertia_yy=0.00255133
        inertia_zz=0.01257888 inertia_xy=-0.00034741 inertia_xz=-0.0002325 inertia_yz=0.0012293 meshes=humerus.vtp
      CustomJoint shoulder: parent_body=scapula location_in_parent=(-0.00955 -0.034 0.009) location=(0 0 0)
        Coordinate shoulder_elv: motion_type=rotational default_value=0.7853982 range=(0 3.141593) clamped=true
        Coordinate shoulder_rot: motion_type=rotational default_value=0 range=(-1.570796 1.570796) clamped=true
        Coordinate elv_angle: motion_type=rotational default_value=0 range=(-1.570796 1.570796) clamped=true
        SpatialTransform: axes_held_at_zero=(translation1 translation2 translation3)
          TransformAxis rotation1: coordinates=shoulder_elv axis=(-1 0 0) LinearFunction(coefficients=1 0)
          TransformAxis rotation2: coordinates=shoulder_rot axis=(0 1 0) LinearFunction(coefficients=1 0)
          TransformAxis rotation3: coordinates=elv_angle axis=(0 0 1) LinearFunction(coefficients=1 0)
      WrapEllipsoid DELT1hh: xyz_body_rotation=(0.0584685 1.00461 0.570374) translation=(-0.0139 -0.0127 -0.0262)
          quadrant=z dimensions=(0.03 0.1 0.05)
      WrapCylinder delt2hum: xyz_body_rotation=(1.68093 -0.0249582 0.0516617) translation=(0.0017 -0.0958 0.0011)
          radius=0.0094 length=0.05
      WrapEllipsoid delt3hum: xyz_body_rotation=(1.72735 0.0759218 -2.74313) translation=(0.0019 -0.0592 0.0011)
          quadrant=x dimensions=(0.01 0.01 0.05)
      WrapEllipsoid SUPSP: xyz_body_rotation=(0.0380482 0.00855211 -1.30673) translation=(0.0002 0.0077 0.0043)
          dimensions=(0.02 0.02 0.02)
      WrapEllipsoid INFSP_and_TMIN_hum_head: xyz_body_rotation=(-0.286583 -0.00907571 -0.0684169)
          translation=(-0.0003 0.0026 0.0038) dimensions=(0.02 0.025 0.02)
      WrapEllipsoid SUBSCAP: xyz_body_rotation=(-0.924501 0.288852 0.381529) translation=(-0.0025 0.0007 -0.0045)
          dimensions=(0.02 0.017 0.028)
      WrapCylinder TMINhum: xyz_body_rotation=(1.75353 0.0692896 2.74628) translation=(-0.0014 -0.0455 0) quadrant=x
          radius=0.007 length=0.07
      WrapSphere TMAJ_LAT_PEC_CORBhh: translation=(0.0007 0 0.006) radius=0.03
      WrapCylinder TMAJ_LAThum: xyz_body_rotation=(1.53641 -0.0637045 1.41424) translation=(0.0007 -0.0443 -0.0055)
          quadrant=-x radius=0.007 length=0.04
      WrapEllipsoid PEC1hh: xyz_body_rotation=(-0.620465 -0.310494 0.363727) translation=(-0.0037 0.0005 -0.0025)
          quadrant=-z dimensions=(0.03 0.02 0.02)
      WrapCylinder PEC12hum: xyz_body_rotation=(1.55928 -0.0774926 -0.925897) translation=(0.002 -0.0508 -0.0017)
          quadrant=x radius=0.009 length=0.07
      WrapSphere PEC23hh: translation=(-0.0086 0.0021 -0.0004) radius=0.02
      WrapCylinder PEC3hum: xyz_body_rotation=(1.44094 -0.0561996 1.75196) translation=(0.0009 -0.0551 -0.0004)
          quadrant=-x radius=0.008 length=0.07
      WrapCylinder LAT_TMAJhh: xyz_body_rotation=(-0.305084 -0.018326 -0.686613) translation=(-0.0224 0.0102 0.0094)
          quadrant=-y radius=0.007 length=0.045
      WrapSphere LAT_TMAJ2hh: xyz_body_rotation=(-0.127235 0.276111 0.0197222) translation=(-0.0016 0.0092 0.0052)
          quadrant=-z radius=0.03
      WrapCylinder CORBhum: xyz_body_rotation=(-1.60832 0.0959931 0.875283) translation=(0.0027 -0.1202 -0.0059)
          quadrant=x radius=0.008 length=0.05
      WrapEllipsoid TRIlonghh: xyz_body_rotation=(3.00162 -0.853466 2.57419) translation=(-0.0078 -0.0041 -0.0014)
          quadrant=z dimensions=(0.035 0.02 0.02)
      WrapCylinder TRI: xyz_body_rotation=(-0.14015 -0.00628319 0.154985) translation=(0.0028 -0.2919 -0.0119)
          radius=0.016 length=0.04
      WrapEllipsoid ANC: xyz_body_rotation=(0.00750492 -0.196699 1.04929) translation=(0.0134 -0.2861 -0.0008)
          quadrant=-x dimensions=(0.02 0.02 0.02)
      WrapEllipsoid BIClong: xyz_body_rotation=(-2.00434 -1.00164 0.975465) translation=(0.0033 0.0073 0.0003)
          quadrant=-y dimensions=(0.025 0.02 0.02)
      WrapEllipsoid Elbow_BIC_BRD: xyz_body_rotation=(-0.128631 0.137532 0.0307178) translation=(0.0019 -0.289 -0.014)
          quadrant=x dimensions=(0.015 0.015 0.1)
      WrapEllipsoid Elbow_PT_ECRL: xyz_body_rotation=(-0.161094 -0.110828 0.61453) translation=(0.003 -0.2872 -0.0069)
          quadrant=x dimensions=(0.018 0.025 0.035)
    Body ulna: mass=1.1053 mass_center=(0.00971783 -0.0959509 0.024286) inertia_xx=0.00541309 inertia_yy=0.00115318
        inertia_zz=0.00494361 inertia_xy=0.00031686 inertia_xz=-7.615e-5 inertia_yz=0.00109169 meshes=ulna.vtp
      CustomJoint elbow: parent_body=humerus location_in_parent=(0.0061 -0.2904 -0.0123) location=(0 0 0)
        Coordinate elbow_flexion: motion_type=rotational default_value=1.570796 range=(0 2.268928) clamped=true
        SpatialTransform: axes_held_at_zero=(rotation1 rotation2 translation1 translation2 translation3)
          TransformAxis rotation3: coordinates=elbow_flexion axis=(0.04940001 0.03660001 0.9981082)
              LinearFunction(coefficients=1 0)
      WrapCylinder PQ2: xyz_body_rotation=(1.39138 0.0689405 1.52245) translation=(-0.0012 -0.2092 0.0428) radius=0.007
          length=0.01
    Body radius: mass=0.23359 mass_center=(0.0336341 -0.181559 0.0156) inertia_xx=0.00043855 inertia_yy=8.859e-5
        inertia_zz=0.00040258 inertia_xy=3.014e-5 inertia_xz=-4.24e-6 inertia_yz=6.418e-5 meshes=radius.vtp
      CustomJoint radioulnar: parent_body=ulna location_in_parent=(0.0004 -0.011503 0.019999) location=(0 0 0)
        Coordinate pro_sup: motion_type=rotational default_value=0.9599311 range=(-1.570796 1.570796) clamped=true
        SpatialTransform: axes_held_at_zero=(rotation1 rotation3 translation1 translation2 translation3)
          TransformAxis rotation2: coordinates=pro_sup axis=(-0.01716099 0.9926656 -0.119668)
              LinearFunction(coefficients=1 0)
      WrapCylinder SUP: xyz_body_rotation=(1.44775 0.304036 -2.44102) translation=(0.0045 -0.0437 0.0059) quadrant=-x
          radius=0.008 length=0.04
      WrapTorus ECU: xyz_body_rotation=(-0.986635 -0.148877 0.222704) translation=(-0.0163 -0.2417 0.0349)
          inner_radius=0.006 outer_radius=0.009
      WrapCylinder PQ1: xyz_body_rotation=(-1.60762 -0.0127409 -2.69025) translation=(0.0281 -0.1986 0.0288)
          radius=0.01 length=0.01
    Body hand: mass=0.5819 mass_center=(-0.00301314 -0.0424993 -0.00112205) inertia_xx=0.00011 inertia_yy=6e-5
        inertia_zz=0.00015 inertia_xy=9e-7 inertia_xz=-2e-7 inertia_yz=1.2e-5
        meshes=(pisiform_rvs.vtp lunate_rvs.vtp scaphoid_rvs.vtp triquetrum_rvs.vtp hamate_rvs.vtp capitate_rvs.vtp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)
      WeldJoint radiocarpal: parent_body=radius location_in_parent=(0.015 -0.24 0.025)
          orientation_in_parent=(0 1.57 -0.4) location=(0 0 0)
    Body bicpt: mass=0.0001 mass_center=(0 0 0) inertia_xx=1 inertia_yy=1 inertia_zz=1
      CustomJoint bicpt: parent_body=radius location_in_parent=(0 0 0) location=(0 0 0)
        Coordinate bicpt_tx: motion_type=translational default_value=0.00287692 range=(-99999.9 99999.9) clamped=false
        Coordinate bicpt_ty: motion_type=translational default_value=-0.03791538 range=(-99999.9 99999.9) clamped=false
        Coordinate bicpt_tz: motion_type=translational default_value=-0.005961537 range=(-99999.9 99999.9)
            clamped=false
        SpatialTransform: axes_held_at_zero=(rotation1 rotation2 rotation3)
          TransformAxis translation1: coordinates=bicpt_tx axis=(1 0 0) LinearFunction(coefficients=1 0)
          TransformAxis translation2: coordinates=bicpt_ty axis=(0 1 0) LinearFunction(coefficients=1 0)
          TransformAxis translation3: coordinates=bicpt_tz axis=(0 0 1) LinearFunction(coefficients=1 0)
    Body bicpt2: mass=0.0001 mass_center=(0 0 0) inertia_xx=1 inertia_yy=1 inertia_zz=1
      CustomJoint bicpt2: parent_body=radius location_in_parent=(0 0 0) location=(0 0 0)
        Coordinate bicpt2_tx: motion_type=translational default_value=0.01634506 range=(-99999.9 99999.9) clamped=false
        Coordinate bicpt2_ty: motion_type=translational default_value=-0.03464894 range=(-99999.9 99999.9)
            clamped=false
        Coordinate bicpt2_tz: motion_type=translational default_value=-0.005711021 range=(-99999.9 99999.9)
            clamped=false
        SpatialTransform: axes_held_at_zero=(rotation1 rotation2 rotation3)
          TransformAxis translation1: coordinates=bicpt2_tx axis=(1 0 0) LinearFunction(coefficients=1 0)
          TransformAxis translation2: coordinates=bicpt2_ty axis=(0 1 0) LinearFunction(coefficients=1 0)
          TransformAxis translation3: coordinates=bicpt2_tz axis=(0 0 1) LinearFunction(coefficients=1 0)
    Body ptpt: mass=0.0001 mass_center=(0 0 0) inertia_xx=1 inertia_yy=1 inertia_zz=1
      CustomJoint ptpt: parent_body=ulna location_in_parent=(0 0 0) location=(0 0 0)
        Coordinate ptpt_tx: motion_type=translational default_value=0.003486121 range=(-99999.9 99999.9) clamped=false
        Coordinate ptpt_ty: motion_type=translational default_value=-0.06752777 range=(-99999.9 99999.9) clamped=false
        Coordinate ptpt_tz: motion_type=translational default_value=-0.004480545 range=(-99999.9 99999.9) clamped=false
        SpatialTransform: axes_held_at_zero=(rotation1 rotation2 rotation3)
          TransformAxis translation1: coordinates=ptpt_tx axis=(1 0 0) LinearFunction(coefficients=1 0)
          TransformAxis translation2: coordinates=ptpt_ty axis=(0 1 0) LinearFunction(coefficients=1 0)
          TransformAxis translation3: coordinates=ptpt_tz axis=(0 0 1) LinearFunction(coefficients=1 0)
  ConstraintSet:
    CoordinateCouplerConstraint bicpt_tx_con: independent_coordinate_names=elbow_flexion
        dependent_coordinate_name=bicpt_tx
      coupled_coordinates_function: SimmSpline: x=(0 2.26893) y=(-0.0001 0.0042)
    CoordinateCouplerConstraint bicpt_ty_con: independent_coordinate_names=elbow_flexion
        dependent_coordinate_name=bicpt_ty
      coupled_coordinates_function: SimmSpline: x=(0 2.26893) y=(-0.0276 -0.0425)
    CoordinateCouplerConstraint bicpt_tz_con: independent_coordinate_names=elbow_flexion
        dependent_coordinate_name=bicpt_tz
      coupled_coordinates_function: SimmSpline: x=(0 2.26893) y=(-0.0043 -0.0067)
    CoordinateCouplerConstraint bicpt2_tx_con: independent_coordinate_names=pro_sup dependent_coordinate_name=bicpt2_tx
      coupled_coordinates_function: SimmSpline: x=(-1.5708 -0.610865 1.57823) y=(-0.003 0.01 0.01376)
    CoordinateCouplerConstraint bicpt2_ty_con: independent_coordinate_names=elbow_flexion
        dependent_coordinate_name=bicpt2_ty
      coupled_coordinates_function: SimmSpline: x=(0 2.27483) y=(-0.0102 -0.045607)
    CoordinateCouplerConstraint bicpt2_tz_con: independent_coordinate_names=pro_sup dependent_coordinate_name=bicpt2_tz
      coupled_coordinates_function: SimmSpline: x=(-1.5708 -0.610865 1.57561) y=(-0.0095 -0.011533 -0.000331)
    CoordinateCouplerConstraint ptpt_tx_con: independent_coordinate_names=pro_sup dependent_coordinate_name=ptpt_tx
      coupled_coordinates_function: SimmSpline: x=(-1.5708 1.5708) y=(0.0142 0.0009)
    CoordinateCouplerConstraint ptpt_ty_con: independent_coordinate_names=pro_sup dependent_coordinate_name=ptpt_ty
      coupled_coordinates_function: SimmSpline: x=(-1.5708 1.5708) y=(-0.0606 -0.0692)
    CoordinateCouplerConstraint ptpt_tz_con: independent_coordinate_names=pro_sup dependent_coordinate_name=ptpt_tz
      coupled_coordinates_function: SimmSpline: x=(-1.5708 1.5708) y=(0.0072 -0.0073)
  ForceSet:
    Millard2012EquilibriumMuscle [values shared by the 31 below unless stated]:
      ActiveForceLengthCurve: minimum_value=0
      ForceVelocityCurve: concentric_slope_at_vmax=0 concentric_slope_near_vmax=0.25 isometric_slope=5
          eccentric_slope_at_vmax=0 eccentric_slope_near_vmax=0.15 max_eccentric_velocity_force_multiplier=1.4
      FiberForceLengthCurve: strain_at_zero_force=2 strain_at_one_norm_force=3 stiffness_at_low_force=0.01
          stiffness_at_one_norm_force=1.2 curviness=1
      TendonForceLengthCurve
    Millard2012EquilibriumMuscle DELT1: max_isometric_force=1142.6 optimal_fiber_length=0.0976
        tendon_slack_length=0.093 pennation_angle_at_optimal=0.3839724 [radians]
      PathPoint P1: humerus (0.00896 -0.11883 0.00585)
      PathPoint P2: humerus (0.01623 -0.11033 0.00412)
      PathPoint P3: scapula (0.04347 -0.03252 0.00099)
      PathPoint P4: clavicle (-0.014 0.01106 0.08021)
      PathWrap: wrap_object=delt2hum
      PathWrap: wrap_object=DELT1hh method=hybrid range=(2 3)
    Millard2012EquilibriumMuscle DELT2: max_isometric_force=1142.6 optimal_fiber_length=0.1078
        tendon_slack_length=0.1095 pennation_angle_at_optimal=0.2617994
      PathPoint P1: humerus (0.00461 -0.13611 0.0056)
      PathPoint P3: scapula (5e-5 0.00294 0.02233)
      PathPoint P4: scapula (-0.01078 -0.00034 0.0062)
      PathWrap: wrap_object=Deltoid2 method=hybrid
      PathWrap: wrap_object=delt2hum
      PathWrap: wrap_object=TMAJ_LAT_PEC_CORBhh
    Millard2012EquilibriumMuscle DELT3: max_isometric_force=259.88 optimal_fiber_length=0.1367
        tendon_slack_length=0.038 pennation_angle_at_optimal=0.3141593
      PathPoint P1: scapula (-0.05573 0.00122 -0.02512)
      PathPoint P2: scapula (-0.07247 -0.03285 0.01233)
      PathPoint P3: humerus (0.00206 -0.07602 0.01045)
      PathWrap: wrap_object=Delt3
      PathWrap: wrap_object=delt3hum method=hybrid
      PathWrap: wrap_object=TMAJ_LAT_PEC_CORBhh
    Millard2012EquilibriumMuscle SUPSP: max_isometric_force=487.82 optimal_fiber_length=0.0682
        tendon_slack_length=0.0395 pennation_angle_at_optimal=0.122173
      PathPoint P1: humerus (0.00256 0.01063 0.02593)
      PathPoint P2: scapula (-0.01918 0.00127 -0.01271)
      PathPoint P3: scapula (-0.044 -0.01512 -0.05855)
      PathWrap: wrap_object=SUPSP method=hybrid
    Millard2012EquilibriumMuscle INFSP: max_isometric_force=1210.84 optimal_fiber_length=0.0755
        tendon_slack_length=0.0308 pennation_angle_at_optimal=0.3228859
      PathPoint P1: humerus (-0.00887 0.00484 0.02448)
      PathPoint P2: scapula (-0.07382 -0.05476 -0.04781)
      PathWrap: wrap_object=INFSP
      PathWrap: wrap_object=INFSP_and_TMIN_hum_head method=hybrid
    Millard2012EquilibriumMuscle SUBSC: max_isometric_force=1377.81 optimal_fiber_length=0.0873
        tendon_slack_length=0.033 pennation_angle_at_optimal=0.3490659
      PathPoint P1: humerus (0.01403 0.0084 -0.01331)
      PathPoint P2: scapula (-0.01831 -0.05223 -0.02457)
      PathPoint P3: scapula (-0.07246 -0.03943 -0.06475)
      PathWrap: wrap_object=SUBSCAP method=hybrid
    Millard2012EquilibriumMuscle TMIN: max_isometric_force=354.25 optimal_fiber_length=0.0741
        tendon_slack_length=0.0713 pennation_angle_at_optimal=0.418879
      PathPoint P1: humerus (-0.0011 -0.01264 0.02156)
      PathPoint P2: scapula (-0.09473 -0.07991 -0.04737)
      PathPoint P3: scapula (-0.09643 -0.08121 -0.05298)
      PathWrap: wrap_object=TMIN method=hybrid range=(1 2)
      PathWrap: wrap_object=INFSP_and_TMIN_hum_head method=hybrid range=(1 2)
      PathWrap: wrap_object=TMINhum range=(1 2)
    Millard2012EquilibriumMuscle TMAJ: max_isometric_force=425.39 optimal_fiber_length=0.1624 tendon_slack_length=0.02
        pennation_angle_at_optimal=0.2792527
      PathPoint P1: humerus (0.00998 -0.05419 -0.00568)
      PathPoint P2: scapula (-0.10264 -0.10319 -0.05829)
      PathPoint P3: scapula (-0.10489 -0.10895 -0.07117)
      PathWrap: wrap_object=TMAJ_LAThum
      PathWrap: wrap_object=LAT_TMAJhh range=(1 2)
      PathWrap: wrap_object=LAT_TMAJ2hh
    Millard2012EquilibriumMuscle PECM1: max_isometric_force=364.41 optimal_fiber_length=0.1442
        tendon_slack_length=0.0028 pennation_angle_at_optimal=0.296706
      PathPoint P1: humerus (0.01169 -0.04191 0.0078)
      PathPoint P4: clavicle (0.00321 -0.00013 0.05113)
      PathWrap: wrap_object=Thorax method=hybrid
      PathWrap: wrap_object=PEC12hum range=(2 2)
      PathWrap: wrap_object=PEC1hh method=hybrid
    Millard2012EquilibriumMuscle PECM2: max_isometric_force=515.41 optimal_fiber_length=0.1385
        tendon_slack_length=0.089 pennation_angle_at_optimal=0.4363323
      PathPoint P1: humerus (0.01274 -0.04289 0.00785)
      PathPoint P4: thorax (0.03091 -0.03922 0.09705)
      PathPoint P5: thorax (0.02769 -0.04498 0.02271)
      PathWrap: wrap_object=Thorax method=hybrid
      PathWrap: wrap_object=PEC12hum method=hybrid range=(2 2)
      PathWrap: wrap_object=TMAJ_LAT_PEC_CORBhh method=hybrid
      PathWrap: wrap_object=PEC23hh method=hybrid
    Millard2012EquilibriumMuscle PECM3: max_isometric_force=390.55 optimal_fiber_length=0.1385
        tendon_slack_length=0.132 pennation_angle_at_optimal=0.4363323
      PathPoint P1: humerus (0.01269 -0.04375 0.0075)
      PathPoint P4: thorax (0.0525 -0.08417 0.08935)
      PathPoint P5: thorax (0.05724 -0.11654 0.03787)
      PathWrap: wrap_object=Thorax method=hybrid
      PathWrap: wrap_object=PEC3hum range=(2 2)
      PathWrap: wrap_object=PEC23hh
    Millard2012EquilibriumMuscle LAT1: max_isometric_force=389.1 optimal_fiber_length=0.254 tendon_slack_length=0.12
        pennation_angle_at_optimal=0.4363323
      PathPoint P1: humerus (0.0105 -0.03415 -0.00653)
      PathPoint P3: scapula (-0.110785 -0.085837 -0.0631024)
      PathPoint P4: thorax (-0.11828 -0.10118 0.03316)
      PathPoint P5: thorax (-0.09578 -0.11724 0.00882)
      PathWrap: wrap_object=TMAJ_LAThum
      PathWrap: wrap_object=LAT_TMAJhh range=(1 1)
      PathWrap: wrap_object=LAT_TMAJ2hh
    Millard2012EquilibriumMuscle LAT2: max_isometric_force=389.1 optimal_fiber_length=0.2324 tendon_slack_length=0.1765
        pennation_angle_at_optimal=0.3316126
      PathPoint P1: humerus (0.00968 -0.04071 -0.00611)
      PathPoint P2: scapula (-0.0797177 -0.0950235 -0.0211153)
      PathPoint P3: scapula (-0.107458 -0.124537 -0.0695447)
      PathPoint P4: thorax (-0.10992 -0.16908 0.02878)
      PathPoint P5: thorax (-0.07186 -0.18818 0.00815)
      PathWrap: wrap_object=TMAJ_LAThum
      PathWrap: wrap_object=LAT_TMAJhh range=(1 2)
      PathWrap: wrap_object=LAT_TMAJ2hh
    Millard2012EquilibriumMuscle LAT3: max_isometric_force=281.66 optimal_fiber_length=0.2789
        tendon_slack_length=0.1403 pennation_angle_at_optimal=0.3665191
      PathPoint P1: humerus (0.01208 -0.03922 -0.00416)
      PathPoint P3: thorax (-0.111107 -0.131024 0.09374)
      PathPoint P4: thorax (-0.11157 -0.19387 0.05532)
      PathPoint P5: thorax (-0.07117 -0.24858 0.00907)
      PathWrap: wrap_object=TMAJ_LAThum
      PathWrap: wrap_object=LAT_TMAJhh range=(1 1)
      PathWrap: wrap_object=LAT_TMAJ2hh
    Millard2012EquilibriumMuscle CORB: max_isometric_force=242.46 optimal_fiber_length=0.0932 tendon_slack_length=0.097
        pennation_angle_at_optimal=0
      PathPoint P1: scapula (0.0125 -0.04127 -0.02652)
      PathPoint P2: scapula (0.00483 -0.06958 -0.01563)
      PathPoint P3: humerus (0.00743 -0.15048 -0.00782)
      PathWrap: wrap_object=CORBhum
      PathWrap: wrap_object=TMAJ_LAT_PEC_CORBhh
    Millard2012EquilibriumMuscle TRIlong: max_isometric_force=798.52 optimal_fiber_length=0.134
        tendon_slack_length=0.143 pennation_angle_at_optimal=0.2094395
      PathPoint P1: scapula (-0.04565 -0.04073 -0.01377)
      PathPoint P2: humerus (-0.02714 -0.11441 -0.00664)
      PathPoint P3: humerus (-0.03184 -0.22637 -0.01217)
      PathPoint P4: humerus (-0.01743 -0.26757 -0.01208)
      PathPoint P5: ulna (-0.0219 0.01046 -0.00078)
      PathWrap: wrap_object=TRI
      PathWrap: wrap_object=TRIlonghh method=hybrid
      PathWrap: wrap_object=TRIlongglen
    Millard2012EquilibriumMuscle TRIlat: max_isometric_force=624.3 optimal_fiber_length=0.1138
        tendon_slack_length=0.098 pennation_angle_at_optimal=0.1570796
      PathPoint P1: humerus (-0.00599 -0.12646 0.00428)
      PathPoint P2: humerus (-0.02344 -0.14528 0.00928)
      PathPoint P3: humerus (-0.03184 -0.22637 -0.01217)
      PathPoint P4: humerus (-0.01743 -0.26757 -0.01208)
      PathPoint P5: ulna (-0.0219 0.01046 -0.00078)
      PathWrap: wrap_object=TRI
    Millard2012EquilibriumMuscle TRImed: max_isometric_force=624.3 optimal_fiber_length=0.1138
        tendon_slack_length=0.0908 pennation_angle_at_optimal=0.1570796
      PathPoint P1: humerus (-0.00838 -0.13695 -0.00906)
      PathPoint P2: humerus (-0.02601 -0.15139 -0.0108)
      PathPoint P3: humerus (-0.03184 -0.22637 -0.01217)
      PathPoint P4: humerus (-0.01743 -0.26757 -0.01208)
      PathPoint P5: ulna (-0.0219 0.01046 -0.00078)
      PathWrap: wrap_object=TRI
    Millard2012EquilibriumMuscle ANC: max_isometric_force=350 optimal_fiber_length=0.027 tendon_slack_length=0.018
        pennation_angle_at_optimal=0
      PathPoint P1: humerus (-0.00744 -0.28359 0.00979)
      PathPoint P2: ulna (-0.02532 -0.00124 0.006)
      PathWrap: wrap_object=ANC method=hybrid
    Millard2012EquilibriumMuscle SUP: max_isometric_force=476 optimal_fiber_length=0.033 tendon_slack_length=0.028
        pennation_angle_at_optimal=0
      PathPoint P1: radius (0.00996 -0.06096 0.00075)
      PathPoint P2: radius (0.01201 -0.0517 -0.00107)
      PathPoint P3: ulna (-0.0136 -0.03384 0.02013)
      PathWrap: wrap_object=SUP
    Millard2012EquilibriumMuscle BIClong: max_isometric_force=624.3 optimal_fiber_length=0.1157
        tendon_slack_length=0.2723 pennation_angle_at_optimal=0
      PathPoint P1: scapula (-0.03123 -0.02353 -0.01305)
      PathPoint P2: scapula (-0.02094 -0.01309 -0.00461)
      PathPoint P3: humerus (0.02131 0.01793 0.01028)
      PathPoint P4: humerus (0.02378 -0.00511 0.01201)
      PathPoint P5: humerus (0.01345 -0.02827 0.00136)
      PathPoint P6: humerus (0.01068 -0.07736 -0.00165)
      PathPoint P7: humerus (0.01703 -0.12125 0.00024)
      PathPoint P8: humerus (0.0226105 -0.1758 -0.00628434)
      PathPoint P9: bicpt2 (0 0 0)
      ConditionalPathPoint P10: bicpt (0 0 0) range=(-0.638791 1.5708) coordinate=pro_sup
      PathPoint P11: radius (-0.002 -0.0375 -0.002)
      PathWrap: wrap_object=Elbow_BIC_BRD method=hybrid
      PathWrap: wrap_object=BIClong method=hybrid range=(2 3)
    Millard2012EquilibriumMuscle BICshort: max_isometric_force=435.56 optimal_fiber_length=0.1321
        tendon_slack_length=0.1923 pennation_angle_at_optimal=0
      PathPoint P1: scapula (0.01268 -0.03931 -0.02625)
      PathPoint P2: scapula (0.00093 -0.06704 -0.01593)
      PathPoint P3: humerus (0.01117 -0.07576 -0.01101)
      PathPoint P4: humerus (0.01703 -0.12125 -0.01079)
      PathPoint P5: humerus (0.0228 -0.1754 -0.0063)
      PathPoint P6: bicpt2 (0 0 0)
      ConditionalPathPoint P7: bicpt (0 0 0) range=(-0.638791 1.5708) coordinate=pro_sup
      PathPoint P8: radius (-0.002 -0.0375 -0.002)
      PathWrap: wrap_object=Elbow_BIC_BRD method=hybrid
    Millard2012EquilibriumMuscle BRA: max_isometric_force=987.26 optimal_fiber_length=0.0858 tendon_slack_length=0.0535
        pennation_angle_at_optimal=0
      PathPoint P1: humerus (0.0068 -0.1739 -0.0036)
      ConditionalPathPoint P2: humerus (0.01894 -0.28559 -0.01105) range=(0 0.813149) coordinate=elbow_flexion
      ConditionalPathPoint P3: ulna (0.00498 -0.01463 0.00128) range=(0 0.813149) coordinate=elbow_flexion
      PathPoint P4: ulna (-0.0032 -0.0239 0.0009)
    Millard2012EquilibriumMuscle BRD: max_isometric_force=261.33 optimal_fiber_length=0.1726 tendon_slack_length=0.133
        pennation_angle_at_optimal=0
      PathPoint P1: humerus (-0.0098 -0.19963 0.00223)
      PathPoint P2: radius (0.03577 -0.12742 0.02315)
      PathPoint P3: radius (0.0419 -0.221 0.0224)
      PathWrap: wrap_object=Elbow_BIC_BRD method=hybrid
    Millard2012EquilibriumMuscle PT: max_isometric_force=566.22 optimal_fiber_length=0.0492 tendon_slack_length=0.098
        pennation_angle_at_optimal=0.1745329
      PathPoint P1: humerus (0.0036 -0.2759 -0.0365)
      PathPoint P2: ulna (0.00846 -0.03373 -0.01432)
      PathPoint P3: ptpt (0.00464 -0.00026 -0.00214)
      ConditionalPathPoint P4: radius (0.0236 -0.0934 0.0094) range=(-1.5708 0.509636) coordinate=pro_sup
      PathPoint P5: radius (0.0254 -0.1088 0.0198)
      PathWrap: wrap_object=Elbow_PT_ECRL method=hybrid
    Millard2012EquilibriumMuscle PQ: max_isometric_force=75.48 optimal_fiber_length=0.0282 tendon_slack_length=0.005
        pennation_angle_at_optimal=0.1745329
      PathPoint P1: radius (0.03245 -0.19998 0.01962)
      PathPoint P2: ulna (0.00193 -0.20972 0.03632)
      PathWrap: wrap_object=PQ2
      PathWrap: wrap_object=PQ1
    Millard2012EquilibriumMuscle ECRL: max_isometric_force=304.89 optimal_fiber_length=0.081 tendon_slack_length=0.224
        pennation_angle_at_optimal=0
      PathPoint P1: humerus (-0.0073 -0.2609 0.0091)
      PathPoint P2: radius (0.03195 -0.13463 0.02779)
      PathPoint P3: radius (0.04243 -0.23684 0.0362)
      PathWrap: wrap_object=Elbow_PT_ECRL method=hybrid
    Millard2012EquilibriumMuscle ECRB: max_isometric_force=100.52 optimal_fiber_length=0.0585
        tendon_slack_length=0.2223 pennation_angle_at_optimal=0.1553343
      PathPoint P1: humerus (0.01349 -0.29048 0.01698)
      PathPoint P2: radius (0.02905 -0.13086 0.02385)
      PathPoint P3: radius (0.03549 -0.22805 0.03937)
    Millard2012EquilibriumMuscle ECU: max_isometric_force=93.17 optimal_fiber_length=0.0622 tendon_slack_length=0.2285
        pennation_angle_at_optimal=0.06108652
      PathPoint P1: humerus (0.00083 -0.28955 0.0188)
      PathPoint P2: ulna (-0.01391 -0.03201 0.02947)
      PathPoint P3: ulna (-0.01705 -0.05428 0.02868)
      PathPoint P4: ulna (-0.01793 -0.09573 0.03278)
      PathPoint P5: radius (-0.01421 -0.22696 0.03481)
    Millard2012EquilibriumMuscle FCR: max_isometric_force=73.96 optimal_fiber_length=0.0628 tendon_slack_length=0.244
        pennation_angle_at_optimal=0.05410521
      PathPoint P1: humerus (0.00758 -0.27806 -0.03705)
      PathPoint P2: radius (0.0211 -0.21943 0.00127)
      PathWrap: wrap_object=Elbow_PT_ECRL method=hybrid
    Millard2012EquilibriumMuscle FCU: max_isometric_force=128.93 optimal_fiber_length=0.0509 tendon_slack_length=0.265
        pennation_angle_at_optimal=0.2111848
      PathPoint P1: humerus (0.00219 -0.2774 -0.0388)
      PathPoint P2: radius (0.009 -0.184 0.001)
      PathPoint P3: radius (0.01082 -0.22327 0.00969)
      PathWrap: wrap_object=Elbow_PT_ECRL method=hybrid
    ObjectGroup shoulder: members=(CORB DELT1 DELT2 DELT3 INFSP LAT1 LAT2 LAT3 PECM1 PECM2 PECM3 SUBSC SUPSP TMAJ TMIN)
    ObjectGroup elbow: members=(ANC BIClong BICshort BRA BRD PT TRIlat TRIlong TRImed)
    ObjectGroup forearm: members=(PQ PT SUP)
    ObjectGroup extensor
    ObjectGroup radial
    ObjectGroup wrist
    ObjectGroup ulnar
    ObjectGroup flexor
    ObjectGroup hand
    ObjectGroup thumb
