# OpenSim document version 30000
Model 3D Upper Limb Model:
  credits: Dimitar Stanev
  length_units: meters
  force_units: N
  gravity: 0 -9.80665 0
  defaults: Thelen2003Muscle default: max_isometric_force=546 optimal_fiber_length=0.0535 tendon_slack_length=0.078
      pennation_angle_at_optimal=0 [radians] activation_time_constant=0.01 deactivation_time_constant=0.04
      FmaxTendonStrain=0.033 FmaxMuscleStrain=0.6 KshapeActive=0.5 KshapePassive=4 Af=0.3 Flen=1.8
  BodySet:
    Body ground: mass=0 mass_center=(0 0 0) inertia_xx=0 inertia_yy=0 inertia_zz=0
    Body torso: mass=26.8266 mass_center=(-0.03 0.32 0) inertia_xx=1.4745 inertia_yy=0.7555 inertia_zz=1.4314
        meshes=(hat_spine.vtp hat_jaw.vtp hat_skull.vtp hat_ribs_scap.vtp)
      CustomJoint back: parent_body=ground location_in_parent=(-0.1007 0.0815 0) location=(0 0 0)
        Coordinate torso_tilt: motion_type=rotational default_value=0 range=(-1.570796 1.570796) clamped=true
            locked=true
        Coordinate torso_list: motion_type=rotational default_value=0 range=(-1.570796 1.570796) clamped=true
            locked=true
        Coordinate torso_rotation: motion_type=rotational default_value=0 range=(-1.570796 1.570796) clamped=true
            locked=true
        Coordinate torso_tx: motion_type=translational default_value=0 range=(-5 5) clamped=true locked=true
        Coordinate torso_ty: motion_type=translational default_value=0 range=(-1 2) clamped=true locked=true
        Coordinate torso_tz: motion_type=translational default_value=0 range=(-3 3) clamped=true locked=true
        SpatialTransform:
          TransformAxis rotation1: coordinates=torso_tilt axis=(0 0 1) LinearFunction(coefficients=1 0)
          TransformAxis rotation2: coordinates=torso_list axis=(1 0 0) LinearFunction(coefficients=1 0)
          TransformAxis rotation3: coordinates=torso_rotation axis=(0 1 0) LinearFunction(coefficients=1 0)
          TransformAxis translation1: coordinates=torso_tx axis=(1 0 0) LinearFunction(coefficients=1 0)
          TransformAxis translation2: coordinates=torso_ty axis=(0 1 0) LinearFunction(coefficients=1 0)
          TransformAxis translation3: coordinates=torso_tz axis=(0 0 1) LinearFunction(coefficients=1 0)
      WrapEllipsoid TRIlonghh: xyz_body_rotation=(3.00162 -0.853466 2.57419) translation=(-0.0078 0.36 0.17) quadrant=z
          dimensions=(0.035 0.02 0.02)
      WrapCylinder TRIlongglen: xyz_body_rotation=(1.37532 -0.294612 2.43596) translation=(-0.013905 0.36 0.1478)
          quadrant=x radius=0.003 length=0.03
      WrapEllipsoid Deltoid2: xyz_body_rotation=(3.13042 -1.54881 -1.31423) translation=(-0.0058 0.378 0.16)
          active=false quadrant=-y dimensions=(0.03 0.04 0.035)
      WrapTorus Delt3: xyz_body_rotation=(0.620988 0.32882 -0.560774) translation=(-0.0973 0.378 0.15) active=false
          inner_radius=0.04 outer_radius=0.06
    Body humerus_r: mass=2.0325 mass_center=(0 -0.164502 0) inertia_xx=0.011946 inertia_yy=0.004121 inertia_zz=0.013409
        meshes=humerus_rv.vtp
      CustomJoint acromial_r: parent_body=torso location_in_parent=(0.003155 0.3715 0.17) location=(0 0 0)
        Coordinate arm_flex_r: motion_type=rotational default_value=0 range=(-1.570796 3.141593) clamped=true
        Coordinate arm_add_r: motion_type=rotational default_value=0 range=(-3.141593 1.570796) clamped=true
        Coordinate arm_rot_r: motion_type=rotational default_value=0 range=(-1.570796 1.570796) clamped=true
        SpatialTransform: axes_held_at_zero=(translation1 translation2 translation3)
          TransformAxis rotation1: coordinates=arm_flex_r axis=(0 0 1) LinearFunction(coefficients=1 0)
          TransformAxis rotation2: coordinates=arm_add_r axis=(1 0 0) LinearFunction(coefficients=1 0)
          TransformAxis rotation3: coordinates=arm_rot_r axis=(0 1 0) LinearFunction(coefficients=1 0)
      WrapEllipsoid BIClonghh: xyz_body_rotation=(-2.00434 -1.00164 0.975465) translation=(0.0033 0.0073 0.0003)
          quadrant=-y dimensions=(0.025 0.02 0.02)
      WrapCylinder TRI: xyz_body_rotation=(-0.14015 -0.00628319 0.154985) translation=(0.0035 -0.2919 -0.005)
          quadrant=all radius=0.016 length=0.05
      WrapEllipsoid Elbow_PT_ECRL: xyz_body_rotation=(-0.161094 -0.110828 0.61453) translation=(0.003 -0.2872 -0.0069)
          quadrant=x dimensions=(0.018 0.025 0.035)
      WrapEllipsoid Elbow_BIC_BRD: xyz_body_rotation=(-0.128631 0.137532 0.0307178) translation=(0.0019 -0.289 -0.014)
          quadrant=x dimensions=(0.015 0.015 0.1)
      WrapEllipsoid DELT1hh: xyz_body_rotation=(0.0584685 1.00461 0.570374) translation=(-0.0139 -0.0127 -0.0262)
          quadrant=z dimensions=(0.03 0.1 0.05)
      WrapCylinder delt2hum: xyz_body_rotation=(1.68093 -0.0249582 0.0516617) translation=(0.0017 -0.0958 0.0011)
          radius=0.0094 length=0.05
      WrapSphere TMAJ_LAT_PEC_CORBhh: translation=(0.0007 0 0.006) radius=0.03
      WrapEllipsoid delt3hum: xyz_body_rotation=(1.72735 0.0759218 -2.74313) translation=(0.0019 -0.0592 0.0011)
          quadrant=x dimensions=(0.01 0.01 0.05)
    Body ulna_r: mass=0.6075 mass_center=(0 -0.120525 0) inertia_xx=0.002962 inertia_yy=0.000618 inertia_zz=0.003213
        meshes=ulna_rv.vtp
      CustomJoint elbow_r: parent_body=humerus_r location_in_parent=(0.013144 -0.286273 -0.009595) location=(0 0 0)
        Coordinate elbow_flex_r: motion_type=rotational default_value=0 range=(0 2.21) clamped=true
        SpatialTransform: axes_held_at_zero=(rotation2 rotation3 translation1 translation2 translation3)
          TransformAxis rotation1: coordinates=elbow_flex_r axis=(0.226047 0.022269 0.9738618)
              LinearFunction(coefficients=1 0)
    Body radius_r: mass=0.6075 mass_center=(0 -0.120525 0) inertia_xx=0.002962 inertia_yy=0.000618 inertia_zz=0.003213
        meshes=radius_rv.vtp
      CustomJoint radioulnar_r: parent_body=ulna_r location_in_parent=(-0.006727 -0.013007 0.026083) location=(0 0 0)
        Coordinate pro_sup_r: motion_type=rotational default_value=0 range=(0 2.094395) clamped=true
        SpatialTransform: axes_held_at_zero=(rotation2 rotation3 translation1 translation2 translation3)
          TransformAxis rotation1: coordinates=pro_sup_r axis=(0.05639803 0.9984065 0.001952)
              LinearFunction(coefficients=1 0)
    Body hand_r: mass=0.4575 mass_center=(0 -0.068095 0) inertia_xx=0.000892 inertia_yy=0.000547 inertia_zz=0.00134
        meshes=(pisiform_rvs.vtp lunate_rvs.vtp scaphoid_rvs.vtp triquetrum_rvs.vtp hamate_rvs.vtp capitate_rvs.vtp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)
      CustomJoint radius_hand_r: parent_body=radius_r location_in_parent=(-0.008797 -0.235841 0.01361) location=(0 0 0)
        Coordinate wrist_flex_r: motion_type=rotational default_value=0 range=(-1.22173 1.22173) clamped=true
            locked=true
        Coordinate wrist_dev_r: motion_type=rotational default_value=0 range=(-0.4363323 0.6108652) clamped=true
            locked=true
        SpatialTransform: axes_held_at_zero=(rotation3 translation1 translation2 translation3)
          TransformAxis rotation1: coordinates=wrist_flex_r axis=(0 0 1) LinearFunction(coefficients=1 0)
          TransformAxis rotation2: coordinates=wrist_dev_r axis=(1 0 0) LinearFunction(coefficients=1 0)
    Body humerus_l: mass=2.0325 mass_center=(0 -0.164502 0) inertia_xx=0.011946 inertia_yy=0.004121 inertia_zz=0.013409
        meshes=humerus_lv.vtp
      CustomJoint acromial_l: parent_body=torso location_in_parent=(0.003155 0.3715 -0.17) location=(0 0 0)
        Coordinate arm_flex_l: motion_type=rotational default_value=0 range=(-1.570796 3.141593) clamped=true
            locked=true
        Coordinate arm_add_l: motion_type=rotational default_value=0 range=(-3.141593 1.570796) clamped=true
            locked=true
        Coordinate arm_rot_l: motion_type=rotational default_value=0 range=(-1.570796 1.570796) clamped=true
            locked=true
        SpatialTransform: axes_held_at_zero=(translation1 translation2 translation3)
          TransformAxis rotation1: coordinates=arm_flex_l axis=(0 0 1) LinearFunction(coefficients=1 0)
          TransformAxis rotation2: coordinates=arm_add_l axis=(-1 0 0) LinearFunction(coefficients=1 0)
          TransformAxis rotation3: coordinates=arm_rot_l axis=(0 -1 0) LinearFunction(coefficients=1 0)
    Body ulna_l: mass=0.6075 mass_center=(0 -0.120525 0) inertia_xx=0.002962 inertia_yy=0.000618 inertia_zz=0.003213
        meshes=ulna_lv.vtp
      CustomJoint elbow_l: parent_body=humerus_l location_in_parent=(0.013144 -0.286273 0.009595) location=(0 0 0)
        Coordinate elbow_flex_l: motion_type=rotational default_value=0 range=(0 2.618) clamped=true locked=true
        SpatialTransform: axes_held_at_zero=(rotation2 rotation3 translation1 translation2 translation3)
          TransformAxis rotation1: coordinates=elbow_flex_l axis=(-0.226047 -0.022269 0.9738618)
              LinearFunction(coefficients=1 0)
    Body radius_l: mass=0.6075 mass_center=(0 -0.120525 0) inertia_xx=0.002962 inertia_yy=0.000618 inertia_zz=0.003213
        meshes=radius_lv.vtp
      CustomJoint radioulnar_l: parent_body=ulna_l location_in_parent=(-0.006727 -0.013007 -0.026083) location=(0 0 0)
        Coordinate pro_sup_l: motion_type=rotational default_value=0 range=(0 2.094395) clamped=true locked=true
        SpatialTransform: axes_held_at_zero=(rotation2 rotation3 translation1 translation2 translation3)
          TransformAxis rotation1: coordinates=pro_sup_l axis=(-0.05639803 -0.9984065 0.001952)
              LinearFunction(coefficients=1 0)
    Body hand_l: mass=0.4575 mass_center=(0 -0.068095 0) inertia_xx=0.000892 inertia_yy=0.000547 inertia_zz=0.00134
        meshes=(pisiform_lvs.vtp lunate_lvs.vtp scaphoid_lvs.vtp triquetrum_lvs.vtp hamate_lvs.vtp capitate_lvs.vtp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)
      CustomJoint radius_hand_l: parent_body=radius_l location_in_parent=(-0.008797 -0.235841 -0.01361)
          location=(0 0 0)
        Coordinate wrist_flex_l: motion_type=rotational default_value=0 range=(-1.22173 1.22173) clamped=true
            locked=true
        Coordinate wrist_dev_l: motion_type=rotational default_value=0 range=(-0.4363323 0.6108652) clamped=true
            locked=true
        SpatialTransform: axes_held_at_zero=(rotation3 translation1 translation2 translation3)
          TransformAxis rotation1: coordinates=wrist_flex_l axis=(0 0 1) LinearFunction(coefficients=1 0)
          TransformAxis rotation2: coordinates=wrist_dev_l axis=(-1 0 0) LinearFunction(coefficients=1 0)
  ForceSet:
    Thelen2003Muscle BIClong: min_control=0 max_control=1 optimal_force=1 max_isometric_force=624.3
        optimal_fiber_length=0.1157 tendon_slack_length=0.2723 pennation_angle_at_optimal=0 max_contraction_velocity=10
        activation_time_constant=0.01 deactivation_time_constant=0.04 FmaxTendonStrain=0.033 FmaxMuscleStrain=0.6
        KshapeActive=0.5 KshapePassive=4 Af=0.3 Flen=1.8
      PathPoint P1: torso (0 0.39 0.15056)
      PathPoint P2: torso (0 0.4 0.15639)
      PathPoint P3: humerus_r (0.02131 0.018 0.01028)
      PathPoint P4: humerus_r (0.02378 -0.00511 0.01201)
      PathPoint P5: humerus_r (0.01345 -0.02827 0.00136)
      PathPoint P6: humerus_r (0.01068 -0.07736 -0.00165)
      PathPoint P7: humerus_r (0.01703 -0.12125 0.00024)
      PathPoint P8: humerus_r (0.0228 -0.1754 -0.0063)
      PathPoint P9: ulna_r (-4.49708e-5 -0.0452882 0.0281659)
      PathWrap: wrap_object=BIClonghh method=hybrid range=(2 3)
      PathWrap: wrap_object=TRI method=hybrid range=(8 9)
    Thelen2003Muscle TRIlong: min_control=0 max_control=1 optimal_force=1 max_isometric_force=798.52
        optimal_fiber_length=0.134 tendon_slack_length=0.143 pennation_angle_at_optimal=0.2094395
        max_contraction_velocity=10 activation_time_constant=0.01 deactivation_time_constant=0.04
        FmaxTendonStrain=0.033 FmaxMuscleStrain=0.6 KshapeActive=0.5 KshapePassive=4 Af=0.3 Flen=1.8
      PathPoint P1: torso (-0.0234111 0.384123 0.154223)
      PathPoint P2: humerus_r (-0.02714 -0.11441 -0.00664)
      PathPoint P3: humerus_r (-0.03184 -0.22637 -0.01217)
      PathPoint P4: humerus_r (-0.0191464 -0.275554 -0.0127229)
      PathPoint P5: ulna_r (-0.0297364 0.00922285 -0.00548032)
      PathWrap: wrap_object=TRI method=hybrid
      PathWrap: wrap_object=TRIlonghh method=hybrid
      PathWrap: wrap_object=TRIlongglen method=hybrid
    Schutte1993Muscle_Deprecated PT: max_isometric_force=566.22 optimal_fiber_length=0.0492 tendon_slack_length=0.098
        pennation_angle_at_optimal=0.1745329 [radians]
      PathPoint P1: humerus_r (0.0036 -0.2759 -0.0365)
      PathPoint P2: ulna_r (0.00846 -0.03373 -0.01432)
      PathPoint P3: ulna_r (0.0124861 -0.0601881 0.00285469)
      ConditionalPathPoint P4: radius_r (0.017001 -0.0908868 0.00991144) range=(-1.5708 0.509636) coordinate=pro_sup_r
      PathPoint P5: radius_r (0.00671286 -0.106355 0.0237522)
      PathWrap: wrap_object=Elbow_PT_ECRL method=hybrid
    Schutte1993Muscle_Deprecated BRD: max_isometric_force=261.33 optimal_fiber_length=0.1726 tendon_slack_length=0.133
        pennation_angle_at_optimal=0
      PathPoint P1: humerus_r (-0.00459195 -0.198041 0.0102188)
      PathPoint P2: radius_r (0.00557363 -0.124053 0.0327071)
      PathPoint P3: radius_r (-0.00155199 -0.220757 0.03554)
      PathWrap: wrap_object=Elbow_BIC_BRD method=hybrid
    Schutte1993Muscle_Deprecated DELT1: max_isometric_force=1218.9 optimal_fiber_length=0.0976
        tendon_slack_length=0.093 pennation_angle_at_optimal=0.3839724
      PathPoint P1: humerus_r (0.00896 -0.11883 0.00585)
      PathPoint P2: humerus_r (0.01623 -0.11033 0.00412)
      PathPoint P3: torso (0.0453655 0.37902 0.15761)
      PathPoint P4: torso (0.00906747 0.401025 0.102279)
      PathWrap: wrap_object=delt2hum
      PathWrap: wrap_object=DELT1hh method=hybrid range=(2 3)
    Schutte1993Muscle_Deprecated DELT2: max_isometric_force=1103.5 optimal_fiber_length=0.1078
        tendon_slack_length=0.1095 pennation_angle_at_optimal=0.2617994
      PathPoint P1: humerus_r (0.00461 -0.13611 0.0056)
      PathPoint P2: humerus_r (0.0272 0.00535 0.04807)
      PathPoint P3: torso (0.01987 0.41202 0.175487)
      PathPoint P4: torso (0.0131297 0.407712 0.154951)
      PathWrap: wrap_object=Deltoid2 method=hybrid
      PathWrap: wrap_object=delt2hum
      PathWrap: wrap_object=TMAJ_LAT_PEC_CORBhh
    Schutte1993Muscle_Deprecated DELT3: max_isometric_force=201.6 optimal_fiber_length=0.1367 tendon_slack_length=0.038
        pennation_angle_at_optimal=0.3141593
      PathPoint P1: torso (-0.0445344 0.386787 0.140463)
      PathPoint P2: torso (-0.0531657 0.356346 0.184517)
      PathPoint P3: humerus_r (0.00206 -0.07602 0.01045)
      PathWrap: wrap_object=Delt3
      PathWrap: wrap_object=delt3hum method=hybrid
      PathWrap: wrap_object=TMAJ_LAT_PEC_CORBhh
